*Heading
** Job name: One element in 3D name: Model-1
** Created by: Gergely Molnar and Anthony Gravouil, 2016
** WEB: www.molnar-research.com
*Preprint, echo=NO, model=NO, history=NO, contact=NO
**
** PARTS
** Creating parts
*Part, name=Elem
**
** Crating nodes
*Node
      1,           1.,           1.,           1.
      2,           1.,           0.,           1.
      3,           1.,           1.,           0.
      4,           1.,           0.,           0.
      5,           0.,           1.,           1.
      6,           0.,           0.,           1.
      7,           0.,           1.,           0.
      8,           0.,           0.,           0.
***************************************************************
** Defining the first UEL (U1) - phase-field element
** Number of nodes: 8
** Properties: length scale parameter (lc)
**             fracture surface energy release (gc)
**
** Coordinates: x, y, z
** VARIABLES: Internal variables 2x8 (phase and history field at
**            each integration point)
**
*User element, nodes=8, type=U1, properties=2, coordinates=3, VARIABLES=16
4
***************************************************************
** Creating the first layer of finite elements
*Element, type=U1
1, 5, 6, 8, 7, 1, 2, 4, 3
***************************************************************
** Assigning the element element properties to the firs layer
**
*Elset, elset=AllPhase, generate
1,  1,     1
*Uel property, elset=AllPhase
0.1, 5e-3
**lc, gc
***************************************************************
** Defining the second UEL (U2) - displacemenet element
**
** Number of nodes: 8
** Properties: fracture surface energy release (Young's modulus)
**             length scale parameter (Poisson's ratio)
**             thickness (h)
**             stabiliy parameter (k)
**
** Coordinates: x, y, z
** VARIABLES: Internal variables 24x8 (displacement (x3), strain (x6),
**            stress (x6), elastic stress (x6), energy, elastic energy,
**            phase field at each integration point)
**
*User element, nodes=8, type=U2, properties=3, coordinates=3, VARIABLES=192
1,2,3
***************************************************************
** Creating the secound layer of finite elements
*Element, type=U2
2, 5, 6, 8, 7, 1, 2, 4, 3
***************************************************************
** Assigning the element element properties to the second layer
**
*Elset, elset=AllStress, generate
2,  2,  1
*Uel property, elset=AllStress
210.0, 0.3, 1.0e-7
**E, nu, k
***************************************************************
** Creating UMAT elements (third layer)
**
*Element, TYPE=C3D8, elset=umatelem
3, 5, 6, 8, 7, 1, 2, 4, 3
***************************************************************
*Solid Section, elset=dummy, material=umatelem
,
*End Part
***************************************************************
** ASSEMBLY
**
*Assembly, name=Assembly
**
*Instance, name=Elem-1, part=Elem
          0.,          0.,           0.
*End Instance
**
** --- Cearting sets for the boundary conditions ---
**
*Nset, nset=bottom, internal, instance=Elem-1
 3, 4, 7, 8
*Nset, nset=top, internal, instance=Elem-1
 1, 2, 5, 6
*Nset, nset=AllP, instance=Elem-1, generate
 1, 8, 1
**
** --- Cearting sets for post processing ---
**
*Elset, elset=umatelem, internal, instance=Elem-1
 3,
**
*End Assembly
***************************************************************
*Material, name=umatelem
*Depvar
26,
*User Material, constants=2
1.0e-11,0.3
***************************************************************
** STEP: Static
**
*Step, name=Static, nlgeom=NO, inc=1000
*Static, direct
0.001, 1.,
***************************************************************
** BOUNDARY CONDITIONS
**
** Name: Sup Type: Displacement/Rotation
*Boundary
bottom, 1, 1
bottom, 2, 2
bottom, 3, 3
** Name: Load Type: Load
*Boundary
top, 1, 1
top, 2, 2
top, 3, 3, 0.1
** ----------------------------------------------------------------
**
** OUTPUT REQUESTS
**
*Restart, write, frequency=0
**
** FIELD OUTPUT: F-Output-1
**
*Output, field
*Node Output, nset=AllP
RF, U
*element output, elset=umatelem
SDV
**
*End Step
