*Heading
** Minimal Abaqus/Standard user-subroutine smoke test.
** The model uses native elastic material behavior; UEXTERNALDB is present
** only to exercise user-subroutine compilation and linking.
*Preprint, echo=YES, model=YES, history=NO, contact=NO
*Node
1, 0., 0., 0.
2, 1., 0., 0.
3, 1., 1., 0.
4, 0., 1., 0.
5, 0., 0., 1.
6, 1., 0., 1.
7, 1., 1., 1.
8, 0., 1., 1.
*Element, type=C3D8, elset=EALL
1, 1,2,3,4,5,6,7,8
*Nset, nset=FIXED
1,4,5,8
*Nset, nset=LOADED
2,3,6,7
*Solid Section, elset=EALL, material=ELASTIC
*Material, name=ELASTIC
*Elastic
210000., 0.3
*Boundary
FIXED, 1, 3, 0.
LOADED, 2, 3, 0.
*Step, name=STATIC_SMOKE, nlgeom=NO
*Static
1., 1., 1e-05, 1.
*Boundary
LOADED, 1, 1, 1e-06
*Output, field
*Node Output
U, RF
*Element Output
S, E
*End Step
