*Heading
Pandey & Kumar (2025) Mode-II Literature-Faithful Adaptive Refined PFM Model
** ------------------------------------------------------------------------
** Underlying Finite Elements: 7865 (7641 quads, 224 tris)
** Total Abaqus Element Objects: 23595 (3 co-located layers x 7865)
** Unified 6-Slot Property ABI: 0.015, 0.0027, 210.0, 0.3, 1.0e-7, 7865.0
** ------------------------------------------------------------------------
*Preprint, echo=NO, model=NO, history=NO, contact=NO
*USER ELEMENT, NODES=4, TYPE=U1, PROPERTIES=6, COORDINATES=2, VARIABLES=18
3
*USER ELEMENT, NODES=4, TYPE=U2, PROPERTIES=6, COORDINATES=2, VARIABLES=18
1, 2
*USER ELEMENT, NODES=3, TYPE=U3, PROPERTIES=6, COORDINATES=2, VARIABLES=18
3
*USER ELEMENT, NODES=3, TYPE=U4, PROPERTIES=6, COORDINATES=2, VARIABLES=18
1, 2
*Node
       1, -5.00000000e-01, -4.03067097e-02
       2, -5.00000000e-01, -8.01118091e-02
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*Element, type=U1, elset=PHASE_QUAD
     225,       12,      605,     6790,      726
     226,      829,     6790,      792,     6795
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*Element, type=U3, elset=PHASE_TRI
       1,     6825,     6708,     1461
       2,      268,     2336,     2382
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*Element, type=U2, elset=DISP_QUAD
    8090,       12,      605,     6790,      726
    8091,      829,     6790,      792,     6795
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*Element, type=U4, elset=DISP_TRI
    7866,     6825,     6708,     1461
    7867,      268,     2336,     2382
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*Element, type=CPE4, elset=UMAT_QUAD
   15955,       12,      605,     6790,      726
   15956,      829,     6790,      792,     6795
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*Element, type=CPE3, elset=UMAT_TRI
   15731,     6825,     6708,     1461
   15732,      268,     2336,     2382
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*Elset, elset=All_elem
UMAT_QUAD
UMAT_TRI
*Elset, elset=All_phase
PHASE_QUAD
PHASE_TRI
*Elset, elset=All_disp
DISP_QUAD
DISP_TRI
*Nset, nset=RP
7920
*Nset, nset=bottom_nodes
13, 14, 15, 16, 17, 18
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*Nset, nset=top_nodes
61, 62, 63, 64, 65, 66
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*UEL Property, elset=PHASE_QUAD
 1.500000e-02, 2.700000e-03, 2.100000e+02, 3.000000e-01, 1.000000e-07, 7865.0
*UEL Property, elset=DISP_QUAD
 1.500000e-02, 2.700000e-03, 2.100000e+02, 3.000000e-01, 1.000000e-07, 7865.0
*UEL Property, elset=PHASE_TRI
 1.500000e-02, 2.700000e-03, 2.100000e+02, 3.000000e-01, 1.000000e-07, 7865.0
*UEL Property, elset=DISP_TRI
 1.500000e-02, 2.700000e-03, 2.100000e+02, 3.000000e-01, 1.000000e-07, 7865.0
*Solid Section, elset=All_elem, material=DUMMY_VIS
1.0
*Material, name=DUMMY_VIS
*User Material, constants=3
 210.0, 0.3, 7865.0
*Depvar
20
** Multipoint constraint: top edge horizontal displacement tied to RP
*Equation
2
61, 1, 1.0, 7920, 1, -1.0
*Equation
2
62, 1, 1.0, 7920, 1, -1.0
*Equation
2
63, 1, 1.0, 7920, 1, -1.0
*Equation
2
64, 1, 1.0, 7920, 1, -1.0
*Equation
2
65, 1, 1.0, 7920, 1, -1.0
*Equation
2
66, 1, 1.0, 7920, 1, -1.0
*Equation
2
67, 1, 1.0, 7920, 1, -1.0
*Equation
2
68, 1, 1.0, 7920, 1, -1.0
*Equation
2
69, 1, 1.0, 7920, 1, -1.0
*Equation
2
70, 1, 1.0, 7920, 1, -1.0
*Equation
2
71, 1, 1.0, 7920, 1, -1.0
*Equation
2
72, 1, 1.0, 7920, 1, -1.0
*Equation
2
73, 1, 1.0, 7920, 1, -1.0
*Equation
2
74, 1, 1.0, 7920, 1, -1.0
*Equation
2
75, 1, 1.0, 7920, 1, -1.0
*Equation
2
76, 1, 1.0, 7920, 1, -1.0
*Equation
2
77, 1, 1.0, 7920, 1, -1.0
*Equation
2
78, 1, 1.0, 7920, 1, -1.0
*Equation
2
79, 1, 1.0, 7920, 1, -1.0
*Equation
2
80, 1, 1.0, 7920, 1, -1.0
*Equation
2
81, 1, 1.0, 7920, 1, -1.0
*Equation
2
82, 1, 1.0, 7920, 1, -1.0
*Equation
2
83, 1, 1.0, 7920, 1, -1.0
*Equation
2
84, 1, 1.0, 7920, 1, -1.0
*Equation
2
85, 1, 1.0, 7920, 1, -1.0
*Equation
2
670, 1, 1.0, 7920, 1, -1.0
*Equation
2
671, 1, 1.0, 7920, 1, -1.0
*Equation
2
672, 1, 1.0, 7920, 1, -1.0
*Equation
2
673, 1, 1.0, 7920, 1, -1.0
*Equation
2
674, 1, 1.0, 7920, 1, -1.0
*Equation
2
675, 1, 1.0, 7920, 1, -1.0
*Equation
2
676, 1, 1.0, 7920, 1, -1.0
*Equation
2
677, 1, 1.0, 7920, 1, -1.0
*Equation
2
678, 1, 1.0, 7920, 1, -1.0
*Equation
2
679, 1, 1.0, 7920, 1, -1.0
*Equation
2
680, 1, 1.0, 7920, 1, -1.0
*Equation
2
681, 1, 1.0, 7920, 1, -1.0
*Equation
2
682, 1, 1.0, 7920, 1, -1.0
*Equation
2
683, 1, 1.0, 7920, 1, -1.0
*Equation
2
684, 1, 1.0, 7920, 1, -1.0
*Equation
2
685, 1, 1.0, 7920, 1, -1.0
*Equation
2
686, 1, 1.0, 7920, 1, -1.0
*Equation
2
687, 1, 1.0, 7920, 1, -1.0
*Equation
2
688, 1, 1.0, 7920, 1, -1.0
*Equation
2
689, 1, 1.0, 7920, 1, -1.0
*Equation
2
690, 1, 1.0, 7920, 1, -1.0
*Equation
2
691, 1, 1.0, 7920, 1, -1.0
*Equation
2
692, 1, 1.0, 7920, 1, -1.0
*Equation
2
693, 1, 1.0, 7920, 1, -1.0
*Equation
2
694, 1, 1.0, 7920, 1, -1.0
*Equation
2
695, 1, 1.0, 7920, 1, -1.0
*Equation
2
2931, 1, 1.0, 7920, 1, -1.0
*Equation
2
2932, 1, 1.0, 7920, 1, -1.0
*Equation
2
2933, 1, 1.0, 7920, 1, -1.0
*Step, name=Step-1, nlgeom=NO, inc=200000
Mode-II Adaptive Refined Phase-Field Fracture Analysis
*Static
1.000000e-05, 5.000000e-02, 1.000000e-09, 5.000000e-04
*Boundary
bottom_nodes, 1, 2, 0.0
*Boundary
RP, 1, 1, 0.050
*Output, field, frequency=1
*Node Output
U, RF
*Element Output, elset=All_elem
S, E, SDV
*Node Print, nset=RP, summary=NO
U1, RF1
*Node Print, nset=bottom_nodes, summary=NO
RF1, RF2
*El Print, elset=All_elem, summary=NO
SDV13, SDV14, SDV15, SDV16
*End Step
