*Heading
 Automated Layered Phase-Field UEL Deck: CYCLE_000_DONOR
** Physical Elements: 2116 (Quads: 2116, Tris: 0), Physical Nodes: 2232
** Total Layered Elements: 6348
** Parameters: l0=1.500000e-02, Gc=2.700000e-03, E=2.100000e+02, nu=0.3000, k=1.0000e-07, thickness=1.0000e+00
*Preprint, echo=NO, model=NO, history=NO, contact=NO
**
** PARTS
**
*Part, name=PlatePart
** User Element Declarations
*User Element, nodes=4, type=U1, properties=7, coordinates=2, VARIABLES=18, UNSYMM
 3
*User Element, nodes=4, type=U2, properties=7, coordinates=2, VARIABLES=18, UNSYMM
 1, 2
** Part Nodes
*Node
       1,  -5.0000000000e-01,  -5.0000000000e-01
       2,  -4.7602941180e-01,  -5.0000000000e-01
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** Layer 1: Phase Elements (1 .. 2116)
*Element, type=U1, elset=PHASE_QUAD
       1,       1,       2,      49,      48
       2,       2,       3,      50,      49
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** Layer 2: Displacement Elements (2117 .. 4232)
*Element, type=U2, elset=DISP_QUAD
    2117,       1,       2,      49,      48
    2118,       2,       3,      50,      49
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** Layer 3: Facsimile Output Elements (4233 .. 6348)
*Element, type=CPE4, elset=UMAT_QUAD
    4233,       1,       2,      49,      48
    4234,       2,       3,      50,      49
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** Aggregate Element Sets
*Elset, elset=PHASE
 PHASE_QUAD
*Elset, elset=DISP
 DISP_QUAD
*Elset, elset=UMATELEM
 UMAT_QUAD
*Elset, elset=All_elem
 UMATELEM
** UEL Properties: l0, Gc, E, nu, k_res, N_PHYS, EXEC_MODE
*UEL Property, elset=PHASE_QUAD
 1.500000e-02, 2.700000e-03, 2.100000e+02, 3.000000e-01, 1.000000e-07, 2116.0, 0.0
*UEL Property, elset=DISP_QUAD
 1.500000e-02, 2.700000e-03, 2.100000e+02, 3.000000e-01, 1.000000e-07, 2116.0, 0.0
*Solid Section, elset=UMAT_QUAD, material=MAT_QUAD_FACSIMILE
 1.000000e+00
*End Part
**
** ASSEMBLY
**
*Assembly, name=Assembly
*Instance, name=PlateInstance, part=PlatePart
*End Instance
** Assembly Reference Point
*Node
   99999,   0.0000000000e+00,   6.0000000000e-01,   0.0000000000e+00
*Nset, nset=RP
   99999
*Nset, nset=bottom_nodes, instance=PlateInstance
       1,       2,       3,       4,       5,       6
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*Nset, nset=top_nodes, instance=PlateInstance
    2186,    2187,    2188,    2189,    2190,    2191
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*Nset, nset=left_nodes, instance=PlateInstance
       1,      48,      95,     142,     189,     236
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*Nset, nset=right_nodes, instance=PlateInstance
      47,      94,     141,     188,     235,     282
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*Elset, elset=UMATELEM, instance=PlateInstance
 UMATELEM
*Elset, elset=All_elem, instance=PlateInstance
 UMATELEM
** Constraint: Mode-II Pure Shear Coupling (top_nodes U1 -> RP U1)
*Equation
 2
 top_nodes, 1, 1.
 RP, 1, -1.
*End Assembly
** MATERIALS
*Material, name=MAT_QUAD_FACSIMILE
*Depvar
 18
*User Material, constants=4
 1.000000e-11, 3.000000e-01, 2116.0, 4.0
** BOUNDARY CONDITIONS
*Boundary
 bottom_nodes, 1, 1
 bottom_nodes, 2, 2
 top_nodes, 2, 2
** STEP: Step-1
*Step, name=Step-1, nlgeom=NO
*Static
 0.001, 1.0, 1.0e-5, 1.0
*Boundary
 RP, 1, 1, 0.00750000
*Output, field
*Node Output
 RF, U
*Node Output, nset=RP
 RF, U
*Element Output, elset=UMATELEM
 S, E, SDV, EVOL
*Output, history, variable=PRESELECT
*Energy Output
 ALLAE, ALLCD, ALLIE, ALLKE, ALLPD, ALLSE, ALLWK, ETOTAL
*End Step
