*Heading
 M2ADAPT_REAL_PILOT_CYCLE_011_RESTART: 4-Stage Adaptive Remeshing Restart (REAL_PILOT_CYCLE_011)
** Handoff Displacement U1 = 0.03551289 mm -> Target Displacement U1 = 0.03801289 mm
** Physical elements = 5112 (Quads: 5112, Tris: 0), Physical nodes = 5287
** Total Layered elements = 15336
** Sequence: STATE_INSTALL -> MECH_EQUILIBRATION -> PHASE_RELEASE (IA=20, dt_min=1e-14) -> CONTINUATION
** UEL Mode: PROPS(7) = 1.0 (Staged Transfer Restart)
*Preprint, echo=NO, model=NO, history=NO, contact=NO
**
*User Element, nodes=4, type=U1, properties=7, coordinates=2, VARIABLES=18, UNSYMM
 3
*User Element, nodes=4, type=U2, properties=7, coordinates=2, VARIABLES=18, UNSYMM
 1, 2
*Node
       1,  -5.0000000000e-01,  -5.0000000000e-01
       2,  -4.7597656250e-01,  -5.0000000000e-01
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** Layer 1: Phase Elements (1 .. 5112)
*Element, type=U1, elset=PHASE_QUAD
       1,       1,       2,      74,      73
       2,       2,       3,      75,      74
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** Layer 2: Displacement Elements (5113 .. 10224)
*Element, type=U2, elset=DISP_QUAD
    5113,       1,       2,      74,      73
    5114,       2,       3,      75,      74
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** Layer 3: Companion Facsimile Output Elements (10225 .. 15336)
*Element, type=CPE4, elset=UMAT_QUAD
   10225,       1,       2,      74,      73
   10226,       2,       3,      75,      74
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** Aggregate Element Sets
*Elset, elset=PHASE
 PHASE_QUAD
*Elset, elset=DISP
 DISP_QUAD
*Elset, elset=UMATELEM
 UMAT_QUAD
*Elset, elset=All_elem
 UMATELEM
*Nset, nset=bottom_nodes
       1,       2,       3,       4,       5,       6
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*Nset, nset=top_nodes
    5216,    5217,    5218,    5219,    5220,    5221
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*Nset, nset=left_nodes
       1,      73,     145,     217,     289,     361
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*Nset, nset=right_nodes
      72,     144,     216,     288,     360,     432
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*Nset, nset=RP
   99999
*UEL Property, elset=PHASE_QUAD
 1.500000e-02, 2.700000e-03, 2.100000e+02, 3.000000e-01, 1.000000e-07, 5112.0, 1.0
*UEL Property, elset=DISP_QUAD
 1.500000e-02, 2.700000e-03, 2.100000e+02, 3.000000e-01, 1.000000e-07, 5112.0, 1.0
*Solid Section, elset=UMAT_QUAD, material=MAT_QUAD_FACSIMILE
 1.000000e+00
*Material, name=MAT_QUAD_FACSIMILE
*Depvar
 18
*User Material, constants=4
 1.000000e-11, 3.000000e-01, 5112.0, 4.0
** Mode-II Shear Coupling Equations (top_nodes U1 -> RP U1)
*Equation
 2
 5216, 1, 1.0, 99999, 1, -1.0
*Equation
 2
 5217, 1, 1.0, 99999, 1, -1.0
*Equation
 2
 5218, 1, 1.0, 99999, 1, -1.0
*Equation
 2
 5219, 1, 1.0, 99999, 1, -1.0
*Equation
 2
 5220, 1, 1.0, 99999, 1, -1.0
*Equation
 2
 5221, 1, 1.0, 99999, 1, -1.0
*Equation
 2
 5222, 1, 1.0, 99999, 1, -1.0
*Equation
 2
 5223, 1, 1.0, 99999, 1, -1.0
*Equation
 2
 5224, 1, 1.0, 99999, 1, -1.0
*Equation
 2
 5225, 1, 1.0, 99999, 1, -1.0
*Equation
 2
 5226, 1, 1.0, 99999, 1, -1.0
*Equation
 2
 5227, 1, 1.0, 99999, 1, -1.0
*Equation
 2
 5228, 1, 1.0, 99999, 1, -1.0
*Equation
 2
 5229, 1, 1.0, 99999, 1, -1.0
*Equation
 2
 5230, 1, 1.0, 99999, 1, -1.0
*Equation
 2
 5231, 1, 1.0, 99999, 1, -1.0
*Equation
 2
 5232, 1, 1.0, 99999, 1, -1.0
*Equation
 2
 5233, 1, 1.0, 99999, 1, -1.0
*Equation
 2
 5234, 1, 1.0, 99999, 1, -1.0
*Equation
 2
 5235, 1, 1.0, 99999, 1, -1.0
*Equation
 2
 5236, 1, 1.0, 99999, 1, -1.0
*Equation
 2
 5237, 1, 1.0, 99999, 1, -1.0
*Equation
 2
 5238, 1, 1.0, 99999, 1, -1.0
*Equation
 2
 5239, 1, 1.0, 99999, 1, -1.0
*Equation
 2
 5240, 1, 1.0, 99999, 1, -1.0
*Equation
 2
 5241, 1, 1.0, 99999, 1, -1.0
*Equation
 2
 5242, 1, 1.0, 99999, 1, -1.0
*Equation
 2
 5243, 1, 1.0, 99999, 1, -1.0
*Equation
 2
 5244, 1, 1.0, 99999, 1, -1.0
*Equation
 2
 5245, 1, 1.0, 99999, 1, -1.0
*Equation
 2
 5246, 1, 1.0, 99999, 1, -1.0
*Equation
 2
 5247, 1, 1.0, 99999, 1, -1.0
*Equation
 2
 5248, 1, 1.0, 99999, 1, -1.0
*Equation
 2
 5249, 1, 1.0, 99999, 1, -1.0
*Equation
 2
 5250, 1, 1.0, 99999, 1, -1.0
*Equation
 2
 5251, 1, 1.0, 99999, 1, -1.0
*Equation
 2
 5252, 1, 1.0, 99999, 1, -1.0
*Equation
 2
 5253, 1, 1.0, 99999, 1, -1.0
*Equation
 2
 5254, 1, 1.0, 99999, 1, -1.0
*Equation
 2
 5255, 1, 1.0, 99999, 1, -1.0
*Equation
 2
 5256, 1, 1.0, 99999, 1, -1.0
*Equation
 2
 5257, 1, 1.0, 99999, 1, -1.0
*Equation
 2
 5258, 1, 1.0, 99999, 1, -1.0
*Equation
 2
 5259, 1, 1.0, 99999, 1, -1.0
*Equation
 2
 5260, 1, 1.0, 99999, 1, -1.0
*Equation
 2
 5261, 1, 1.0, 99999, 1, -1.0
*Equation
 2
 5262, 1, 1.0, 99999, 1, -1.0
*Equation
 2
 5263, 1, 1.0, 99999, 1, -1.0
*Equation
 2
 5264, 1, 1.0, 99999, 1, -1.0
*Equation
 2
 5265, 1, 1.0, 99999, 1, -1.0
*Equation
 2
 5266, 1, 1.0, 99999, 1, -1.0
*Equation
 2
 5267, 1, 1.0, 99999, 1, -1.0
*Equation
 2
 5268, 1, 1.0, 99999, 1, -1.0
*Equation
 2
 5269, 1, 1.0, 99999, 1, -1.0
*Equation
 2
 5270, 1, 1.0, 99999, 1, -1.0
*Equation
 2
 5271, 1, 1.0, 99999, 1, -1.0
*Equation
 2
 5272, 1, 1.0, 99999, 1, -1.0
*Equation
 2
 5273, 1, 1.0, 99999, 1, -1.0
*Equation
 2
 5274, 1, 1.0, 99999, 1, -1.0
*Equation
 2
 5275, 1, 1.0, 99999, 1, -1.0
*Equation
 2
 5276, 1, 1.0, 99999, 1, -1.0
*Equation
 2
 5277, 1, 1.0, 99999, 1, -1.0
*Equation
 2
 5278, 1, 1.0, 99999, 1, -1.0
*Equation
 2
 5279, 1, 1.0, 99999, 1, -1.0
*Equation
 2
 5280, 1, 1.0, 99999, 1, -1.0
*Equation
 2
 5281, 1, 1.0, 99999, 1, -1.0
*Equation
 2
 5282, 1, 1.0, 99999, 1, -1.0
*Equation
 2
 5283, 1, 1.0, 99999, 1, -1.0
*Equation
 2
 5284, 1, 1.0, 99999, 1, -1.0
*Equation
 2
 5285, 1, 1.0, 99999, 1, -1.0
*Equation
 2
 5286, 1, 1.0, 99999, 1, -1.0
*Equation
 2
 5287, 1, 1.0, 99999, 1, -1.0
** ==========================================================
** STEP 1: State Installation & Binary History Ingestion
** ==========================================================
*Step, name=STATE_INSTALL, nlgeom=NO, inc=10
*Static
 1.0, 1.0, 1.0e-5, 1.0
*Boundary, op=NEW
*Include, input=TARGET_REAL_PILOT_CYCLE_011_STATE_INSTALL_BOUNDARY.inp
*Output, field, freq=1
*Node Output, nset=RP
 U, RF
*End Step
** ==========================================================
** STEP 2: Mechanical Equilibration (Phase Field Locked)
** ==========================================================
*Step, name=MECH_EQUILIBRATION, nlgeom=NO, inc=100
*Static
 1.0, 1.0, 1.0e-5, 1.0
*Boundary, op=NEW
 bottom_nodes, 1, 2, 0.0
 RP, 1, 1, 3.551289111376e-02
 RP, 2, 2, 0.0
*Include, input=TARGET_REAL_PILOT_CYCLE_011_U3_ONLY_BOUNDARY.inp
*Output, field, freq=1
*Node Output, nset=RP
 U, RF
*End Step
** ==========================================================
** STEP 3: Phase Field Release & Equilibrium (IA=25, dt_min=1e-14)
** ==========================================================
*Step, name=PHASE_RELEASE, nlgeom=NO, inc=500
*Static
 0.001, 1.0, 1.0e-14, 1.0
*Controls, parameters=time incrementation
 25, 25, 25, 25, 25, 4, 50, 25
*Controls, parameters=field, field=displacement
 0.01, 10.0
*Controls, parameters=field, field=temperature
 0.01, 10.0
*Boundary, op=NEW
 bottom_nodes, 1, 2, 0.0
 RP, 1, 1, 3.551289111376e-02
 RP, 2, 2, 0.0
*Output, field, freq=1
*Node Output, nset=RP
 U, RF
*End Step
** ==========================================================
** STEP 4: Continuation Monotonic Shear (0.035513 mm -> 0.038013 mm)
** ==========================================================
*Step, name=CONTINUATION, nlgeom=NO, inc=10000
*Static
 0.001, 1.0, 1.0e-14, 0.02
*Controls, parameters=time incrementation
 25, 25, 25, 25, 25, 4, 50, 25
*Controls, parameters=field, field=displacement
 0.05, 10.0
*Controls, parameters=field, field=temperature
 0.05, 10.0
*Boundary, op=MOD
 RP, 1, 1, 3.801289111376e-02
 RP, 2, 2, 0.0
*Output, field, freq=1
*Node Output
 U, RF
*Node Output, nset=RP
 U, RF
*Element Output, elset=UMATELEM
 S, E, SDV, EVOL
*Output, history, variable=PRESELECT
*Energy Output
 ALLAE, ALLCD, ALLIE, ALLKE, ALLPD, ALLSE, ALLWK, ETOTAL
*End Step
