** GEOMETRY-BACKED MODEL GENERATED BY F25 BUILDER
** Geometry Part: Part-1-GEOM (faces=1, CPE4, STRUCTURED)
** Instance: Part-1-1 (geometry-backed dependent instance)
** RemeshingRule: F25_MISESERI_RULE on explicit face Region
*Heading
** Job name: Mode-II Pandey-Kumar MISESERI pre-analysis name: Stage-F-MISESERI-Preanalysis
** Auxiliary continuum: CPE4 4-node plane strain elements (N_elem = 3930)
** Corrected notch topology: 15 coincident node pairs along y=0, x in [-0.5, 0.0) mm
*Preprint, echo=NO, model=NO, history=NO, contact=NO
*Part, name=Part-1
*Node
      1,    0.5000000000,    0.0000000000
      2,    0.0000000000,    0.0000000000
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*Element, TYPE=CPE4, elset=All_elem
      1,      10,     397,     450,       9
      2,     350,      14,      15,     393
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*Nset, nset=bottom
4, 5, 134, 135, 136, 137
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*Nset, nset=top
6, 7, 186, 187, 188, 189
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*Nset, nset=notch_lower_face
3, 122, 121, 120, 119, 118, 117, 116, 115, 114, 113, 112, 111, 110, 109
*Nset, nset=notch_upper_face
8, 221, 222, 223, 224, 225, 226, 227, 228, 229, 230, 231, 232, 233, 234
*Nset, nset=notch_tip
2
*Solid Section, elset=All_elem, material=Elastic_Matrix
1.
*End Part
*Assembly, name=Assembly
*Instance, name=Part-1-1, part=Part-1
*End Instance
*Node
      3999,              0.,             0.5,              0.
*Nset, nset=RP
3999
*Nset, nset=bottom, instance=Part-1-1
4, 5, 134, 135, 136, 137
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*Nset, nset=top, instance=Part-1-1
6, 7, 186, 187, 188, 189
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*Elset, elset=All_elem, instance=Part-1-1, generate
1, 3930, 1
*Equation
2
top, 1, 1.
RP, 1, -1.
*End Assembly
*Material, name=Elastic_Matrix
*Elastic
 210., 0.3
*Step, name=Step-1, nlgeom=NO
Elastic MISESERI Pre-Analysis Stage
*Static
0.1, 1.0, 1e-05, 0.1
*Boundary
bottom, 1, 2
top, 2, 2
*Boundary
RP, 1, 1, 0.001
*Output, field, frequency=1
*Node Output
 U, RF
*Element Output, elset=All_elem
 MISESERI, MISESAVG, S, E, EVOL
*End Step
