*Heading
 F43REM3 Refined Standard Input Deck
** Job name: F43REM3_NATIVE Model name: ModeII_Geometry_Model
** Generated by: Abaqus/CAE 2023
*Preprint, echo=NO, model=NO, history=NO, contact=NO
**
** PARTS
**
*Part, name=PlatePart
*Node
      1,   0.49274233,         -0.5
      2,  0.485449344,         -0.5
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*Element, type=CPE3
   1,  21025,    819,  20088
   2,  58714, 108739, 108738
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*Element, type=CPE4
  3578,  17758,  18984,  18199,    135
  3579,  20417,  19846,    601,  19828
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*Nset, nset=_G5, internal, generate
      1,  112848,       1
*Elset, elset=_G5, internal, generate
      1,  113936,       1
** Section: SolidSection
*Solid Section, elset=_G5, material=Steel
1.,
*End Part
**
**
** ASSEMBLY
**
*Assembly, name=Assembly
**
*Instance, name=PlateInstance, part=PlatePart
*End Instance
**
*Node
      1,           0.,  0.600000024,           0.
*Nset, nset=RP
 1,
*Nset, nset=bottom_nodes, instance=PlateInstance
     1,     2,     3,     4,     5,     6
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*Elset, elset=bottom_nodes, instance=PlateInstance
  3578,  3972,  3973,  3974,  3975,  3976
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*Nset, nset=top_nodes, instance=PlateInstance
   269,   270,   271,   272,   273,   274
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*Elset, elset=top_nodes, instance=PlateInstance
   3834,   3836,   3838,   4228,   4351,   4473
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** Constraint: shear_coupling
*Equation
2
top_nodes, 1, 1.
RP, 1, -1.
*End Assembly
**
** MATERIALS
**
*Material, name=Steel
*Elastic
210000., 0.3
**
** BOUNDARY CONDITIONS
**
** Name: bottom_fix Type: Displacement/Rotation
*Boundary
bottom_nodes, 1, 1
bottom_nodes, 2, 2
** Name: top_vertical_fix Type: Displacement/Rotation
*Boundary
top_nodes, 2, 2
** ----------------------------------------------------------------
**
** STEP: Step-1
**
*Step, name=Step-1, nlgeom=NO
*Static
0.001, 1., 1e-05, 1.
**
** BOUNDARY CONDITIONS
**
** Name: prescribed_shear Type: Displacement/Rotation
*Boundary
RP, 1, 1, 0.001
**
** OUTPUT REQUESTS
**
*Restart, write, frequency=0
**
** FIELD OUTPUT: F-Output-1
**
*Output, field
*Node Output
RF, U
*Element Output, directions=YES
EVOL, MISESAVG, MISESERI, S
**
** FIELD OUTPUT:  from REMESHING RULE: MISESERI_Adaptive_Rule,  from REMESHING RULE: StageC_MISESERI_RemeshingRule
** Stage C MISESERI Native Adaptive Remeshing Rule
**
*Output, field, frequency=99999
*Element Output, directions=YES
MISESERI, MISESAVG, S, EVOL
**
** HISTORY OUTPUT: H-Output-1
**
*Output, history, variable=PRESELECT
*End Step
