*Heading
 F43 Phase-Field Rebuilt 3-Layer Mixed UEL Deck for Candidate F43REM4_PK5
** Lineage: Physical candidate F43REM4_PK5 (4894 elements, 4998 nodes)
** Source Deck SHA256: 87ab62c411f8d14ef9eca2857036e88fb2cbd9ccdf0171a80c5e97e7edc7ffa9
** Layer Mapping: Phase (1..4894), Disp (4895..9788), Facsimile (9789..14682)
** Total Layered Elements: 14682 (U1=4766, U2=4766, U3=128, U4=128, CPE4=4766, CPE3=128)
*Preprint, echo=NO, model=NO, history=NO, contact=NO
**
** PARTS
**
*Part, name=PlatePart
** ==========================================================
** User Element Declarations (Qualified 4-Node and 3-Node Mixed Formulation)
** ==========================================================
*User Element, nodes=4, type=U1, properties=3, coordinates=2, VARIABLES=18
 3
*User Element, nodes=4, type=U2, properties=5, coordinates=2, VARIABLES=18
 1, 2
*User Element, nodes=3, type=U3, properties=3, coordinates=2, VARIABLES=18
 3
*User Element, nodes=3, type=U4, properties=5, coordinates=2, VARIABLES=18
 1, 2
** Part Nodes
*Node
       1,   4.6191349600e-01,  -5.0000000000e-01
       2,   4.3226891800e-01,  -5.0000000000e-01
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** ==========================================================
** Layer 1: Phase Elements (labels 1 .. 4894)
** ==========================================================
*Element, type=U1, elset=PHASE_QUAD
     129,     824,     979,    1017,     825
     130,     945,     992,    1000,     114
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*Element, type=U3, elset=PHASE_TRI
       1,    4741,    4691,    3313
       2,    3781,     272,    3754
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** ==========================================================
** Layer 2: Displacement Elements (labels 4895 .. 9788)
** ==========================================================
*Element, type=U2, elset=DISP_QUAD
    5023,     824,     979,    1017,     825
    5024,     945,     992,    1000,     114
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*Element, type=U4, elset=DISP_TRI
    4895,    4741,    4691,    3313
    4896,    3781,     272,    3754
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** ==========================================================
** Layer 3: Facsimile Output Elements (labels 9789 .. 14682)
** ==========================================================
*Element, type=CPE4, elset=UMAT_QUAD
    9917,     824,     979,    1017,     825
    9918,     945,     992,    1000,     114
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*Element, type=CPE3, elset=UMAT_TRI
    9789,    4741,    4691,    3313
    9790,    3781,     272,    3754
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** Aggregate Element Sets
*Elset, elset=PHASE
 PHASE_QUAD
 PHASE_TRI
*Elset, elset=DISP
 DISP_QUAD
 DISP_TRI
*Elset, elset=UMATELEM
 UMAT_QUAD
 UMAT_TRI
*Elset, elset=All_elem
 UMATELEM
** ==========================================================
** UEL Properties (l0, Gc, thickness, E, nu, park, NPHYS)
** ==========================================================
*UEL Property, elset=PHASE_QUAD
 1.500000e-02, 2.700000e-03, 1.000000e+00
*UEL Property, elset=DISP_QUAD
 2.100000e+02, 3.000000e-01, 1.000000e+00, 1.000000e-07, 4894.0
*UEL Property, elset=PHASE_TRI
 1.500000e-02, 2.700000e-03, 1.000000e+00
*UEL Property, elset=DISP_TRI
 2.100000e+02, 3.000000e-01, 1.000000e+00, 1.000000e-07, 4894.0
** ==========================================================
** Solid Sections for Visualization/Facsimile Layer
** ==========================================================
*Solid Section, elset=UMAT_QUAD, material=MAT_QUAD_FACSIMILE
 1.000000e+00
*Solid Section, elset=UMAT_TRI, material=MAT_TRI_FACSIMILE
 1.000000e+00
*End Part
**
** ASSEMBLY
**
*Assembly, name=Assembly
*Instance, name=PlateInstance, part=PlatePart
*End Instance
** Reference Point for Mode-II Shear Loading
*Node
       1,   0.0000000000e+00,   6.0000002400e-01,   0.0000000000e+00
*Nset, nset=RP
       1
*Nset, nset=bottom_nodes, instance=PlateInstance
       1,       2,       3,       4,       5,       6
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*Nset, nset=top_nodes, instance=PlateInstance
      57,      58,      59,      60,      61,      62
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*Elset, elset=UMATELEM, instance=PlateInstance
 UMATELEM
*Elset, elset=All_elem, instance=PlateInstance
 UMATELEM
** Constraint: Mode-II Pure Shear top_nodes -> RP
*Equation
 2
 top_nodes, 1, 1.
 RP, 1, -1.
*End Assembly
** ==========================================================
** MATERIALS (Passive Facsimile Visualization Material)
** ==========================================================
*Material, name=MAT_QUAD_FACSIMILE
*Depvar
 18
*User Material, constants=4
 1.000000e-11, 3.000000e-01, 4894.0, 4.0
*Material, name=MAT_TRI_FACSIMILE
*Depvar
 18
*User Material, constants=4
 1.000000e-11, 3.000000e-01, 4894.0, 3.0
** ==========================================================
** BOUNDARY CONDITIONS (Pure Shear Baseline)
** ==========================================================
** Name: bottom_fix Type: Displacement/Rotation
*Boundary
 bottom_nodes, 1, 1
 bottom_nodes, 2, 2
** Name: top_vertical_fix Type: Displacement/Rotation
*Boundary
 top_nodes, 2, 2
** ----------------------------------------------------------
** STEP: Step-1 (Dry Elastic Shear / Reference Mode-II Step)
** ----------------------------------------------------------
*Step, name=Step-1, nlgeom=NO
*Static
 0.001, 1.0, 1.0e-05, 1.0
** Prescribed Pure-Shear Displacement on Reference Point
*Boundary
 RP, 1, 1, 0.001
** OUTPUT REQUESTS
*Restart, write, frequency=0
*Output, field
*Node Output
 RF, U
*Node Output, nset=RP
 RF, U
*Element Output, elset=UMATELEM
 S, E, SDV, EVOL
*Output, history, variable=PRESELECT
*Energy Output
 ALLAE, ALLCD, ALLIE, ALLKE, ALLPD, ALLSE, ALLWK, ETOTAL
*End Step
