*Heading
** Stage F8 deterministic 6x4 seeded-notch patch
*Preprint, echo=NO, model=NO, history=NO, contact=NO
*Part, name=PATCH
*Node
1, 0, 0
2, 0.005, 0
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*User element, nodes=4, type=U1, properties=3, coordinates=2, VARIABLES=8
3
*Element, type=U1
1, 1, 2, 9, 8
2, 2, 3, 10, 9
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*Elset, elset=PHASE
1, 2, 3, 4, 5, 6
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*Uel property, elset=PHASE
0.015, 0.0027, 1.0
*User element, nodes=4, type=U2, properties=4, coordinates=2, VARIABLES=56
1, 2
*Element, type=U2
33853, 1, 2, 9, 8
33854, 2, 3, 10, 9
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*Elset, elset=DISP
33853, 33854, 33855, 33856, 33857, 33858
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*Uel property, elset=DISP
210.0, 0.3, 1.0, 1.0e-7
*Element, type=CPE4, elset=UMATELEM
67705, 1, 2, 9, 8
67706, 2, 3, 10, 9
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*Solid Section, elset=UMATELEM, material=UMATELEM
1.0
*End Part
*Assembly, name=Assembly
*Instance, name=PATCH-1, part=PATCH
*End Instance
*Nset, nset=BOTTOM, instance=PATCH-1
1, 2, 3, 4, 5, 6, 7
*Nset, nset=TOP, instance=PATCH-1
29, 30, 31, 32, 33, 34, 35
*Nset, nset=TOPLEFT, instance=PATCH-1
29
*Nset, nset=ALLNODES, instance=PATCH-1, generate
1, 35, 1
*Elset, elset=UMATELEM, instance=PATCH-1
67705, 67706, 67707, 67708, 67709, 67710
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*End Assembly
*Material, name=UMATELEM
*Depvar
16
*User Material, constants=2
1.0e-11, 0.3
*Amplitude, name=CYCLE, time=TOTAL TIME
1.0, 0.003, 1.5, 0.001, 2.0, 0.006
** Step 1: monotonic shear
*Step, name=MONOTONIC, nlgeom=NO, inc=200
*Static, direct
0.02, 1.0
*Boundary
BOTTOM, 1, 2, 0.0
TOPLEFT, 2, 2, 0.0
TOP, 1, 1, 0.003
*Output, field, frequency=1
*Node Output, nset=ALLNODES
U, RF
*Element Output, elset=UMATELEM
SDV
*Energy Output
ALLIE, ALLSE, ALLWK
*End Step
** Step 2: partial unload then reload
*Step, name=UNLOAD_RELOAD, nlgeom=NO, inc=200
*Static, direct
0.02, 1.0
*Boundary, amplitude=CYCLE
TOP, 1, 1, 1.0
*Output, field, frequency=1
*Node Output, nset=ALLNODES
U, RF
*Element Output, elset=UMATELEM
SDV
*Energy Output
ALLIE, ALLSE, ALLWK
*End Step
