*Heading
** Job name: Mode-II Pandey-Kumar MISESERI pre-analysis name: Stage-F-MISESERI-Preanalysis
** Created by: Gergely Molnar and Anthony Gravouil, 2016
** Stage-F Mode-II pure-shear adaptation: geometry/mesh/N_ELEM unchanged;
** only pure-shear BC, RP coupling DOF, and output requests modified.
** WEB: www.molnar-research.com
*Preprint, echo=NO, model=NO, history=NO, contact=NO
**
** PARTS
** Creating parts
*Part, name=Part-1
**
** Crating nodes
*Node
      1,          0.5,           0.
      2,           0.,           0.
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***************************************************************
** Defining the first UEL (U1) - phase-field element
** Number of nodes: 4
** Properties: length scale parameter (lc)
**             fracture surface energy release (gc)
**             thickness (h)
**
** Coordinates: x, y
** VARIABLES: Internal variables 2x4 (phase and history field at
**            each integration point)
**
*Element, TYPE=CPS4, elset=umatelem
7861, 10, 397, 450, 9
7862, 350,  14,  15, 393
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***************************************************************
*Solid Section, elset=umatelem, material=umatelem
1.0
*End Part
**
**
** ASSEMBLY
**
*Assembly, name=Assembly
**
*Instance, name=Part-1-1, part=Part-1
*End Instance
**
** --- Cearting sets for the boundary conditions ---
**
*Node
      1,          0.5,          0.5,           0.
*Nset, nset=RP
 1,
*Nset, nset=bottom, instance=Part-1-1
   4,   5, 134, 135, 136, 137
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*Elset, elset=bottom, instance=Part-1-1
   9,  18,  19,  32,  33, 116
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*Nset, nset=bottoml, instance=Part-1-1
 4,
*Nset, nset=top, instance=Part-1-1
   6,   7, 186, 187, 188, 189
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*Elset, elset=top, instance=Part-1-1
 1920, 1921, 1971, 1979, 1987, 1994
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*Nset, nset=topl, instance=Part-1-1
 7,
** Constraint: Mode-II pure-shear top U1 -> RP U1
*Equation
2
top, 1, 1.
RP, 1, -1.
**
** --- Cearting sets for post processing ---
**
*Elset, elset=umatelem, instance=Part-1-1, generate
7861, 11790, 1
**
*End Assembly
***************************************************************
** Cyclic loading table
**
*Amplitude, name=Amp-1
             0.,              0.,             0.5,           0.005
*Amplitude, name=Amp-2
             0.,           0.005,             0.2,            0.01
**
** MATERIALS
**
*Material, name=umatelem
*Depvar
     16,
*Elastic
 210., 0.3
** ----------------------------------------------------------------
***************************************************************
** STEP: Step-1
**
*Step, name=Step-1, nlgeom=NO, inc=500
*Static, direct
0.001, 0.5,
**
** BOUNDARY CONDITIONS
**
** Name: Mode-II shear load Type: Displacement/Rotation
*Boundary, amplitude=Amp-1
RP, 1, 1, 1.
** Name: bottom_fixed Type: Displacement/Rotation
*Boundary
bottom, 1, 2
** Name: top_vertical_restraint Type: Displacement/Rotation
*Boundary
top, 2, 2
**
** OUTPUT REQUESTS
**
*Restart, write, frequency=0
**
** FIELD OUTPUT: Element
**
*Output, field, frequency=1
*Node Output
 U, RF
*Element Output, elset=umatelem
 MISESERI, MISESAVG, S, E
*End Step
