*Heading
** Mode-II Phase-Field Adaptive Production Model: M2ADAPT_PK5_FRACFIX_PROD
** Candidate: F43REM4_PK5 (4894 physical elements, 4998 nodes)
** 3-Layer Mixed UEL Architecture: U1/U2/U3/U4/CPE4/CPE3 (14682 layered elements)
** Formulation: l0=0.015 mm, Gc=0.0027 kN/mm, E=210.0 kN/mm^2, nu=0.3, k=1e-07, thickness=1.0 mm
** Loading: Two-Step Pure Shear to U1_final = 0.0100 mm
*Preprint, echo=NO, model=NO, history=NO, contact=NO
** ==========================================================
** PARTS & USER ELEMENT DECLARATIONS
** ==========================================================
*Part, name=PlatePart
*User Element, nodes=4, type=U1, properties=3, coordinates=2, VARIABLES=18
 3
*User Element, nodes=4, type=U2, properties=5, coordinates=2, VARIABLES=18
 1, 2
*User Element, nodes=3, type=U3, properties=3, coordinates=2, VARIABLES=18
 3
*User Element, nodes=3, type=U4, properties=5, coordinates=2, VARIABLES=18
 1, 2
*Node
       1,   0.0000000000e+00,   6.0000002400e-01
       2,   4.3226891800e-01,  -5.0000000000e-01
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** ==========================================================
** Layer 1: Phase-Field Elements (U1 Quads & U3 Tris)
** ==========================================================
*Element, type=U1
       1,     824,     979,    1017,     825
       2,     945,     992,    1000,     114
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*Element, type=U3
    4767,    4741,    4691,    3313
    4768,    3781,     272,    3754
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** ==========================================================
** Layer 2: Displacement Elements (U2 Quads & U4 Tris)
** ==========================================================
*Element, type=U2
    4895,     824,     979,    1017,     825
    4896,     945,     992,    1000,     114
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*Element, type=U4
    9661,    4741,    4691,    3313
    9662,    3781,     272,    3754
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** ==========================================================
** Layer 3: Facsimile Visualization Elements (CPE4 Quads & CPE3 Tris)
** ==========================================================
*Element, type=CPE4
    9789,     824,     979,    1017,     825
    9790,     945,     992,    1000,     114
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*Element, type=CPE3
   14555,    4741,    4691,    3313
   14556,    3781,     272,    3754
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** ==========================================================
** ELEMENT SETS
** ==========================================================
*Elset, elset=PHASE_QUAD, generate
 1, 4766, 1
*Elset, elset=DISP_QUAD, generate
 4895, 9660, 1
*Elset, elset=UMAT_QUAD, generate
 9789, 14554, 1
*Elset, elset=PHASE_TRI, generate
 4767, 4894, 1
*Elset, elset=DISP_TRI, generate
 9661, 9788, 1
*Elset, elset=UMAT_TRI, generate
 14555, 14682, 1
*Elset, elset=PHASE_ALL, generate
 1, 4894, 1
*Elset, elset=DISP_ALL, generate
 4895, 9788, 1
*Elset, elset=UMATELEM, generate
 9789, 14682, 1
** ==========================================================
** UEL PROPERTIES (l0, Gc, thickness, E, nu, park, NPHYS)
** ==========================================================
*UEL Property, elset=PHASE_QUAD
 1.500000e-02, 2.700000e-03, 1.000000e+00
*UEL Property, elset=DISP_QUAD
 2.100000e+02, 3.000000e-01, 1.000000e+00, 1.000000e-07, 4894.0
*UEL Property, elset=PHASE_TRI
 1.500000e-02, 2.700000e-03, 1.000000e+00
*UEL Property, elset=DISP_TRI
 2.100000e+02, 3.000000e-01, 1.000000e+00, 1.000000e-07, 4894.0
** ==========================================================
** SOLID SECTIONS FOR FACSIMILE LAYER
** ==========================================================
*Solid Section, elset=UMAT_QUAD, material=MAT_QUAD_FACSIMILE
 1.000000e+00
*Solid Section, elset=UMAT_TRI, material=MAT_TRI_FACSIMILE
 1.000000e+00
*End Part
** ==========================================================
** ASSEMBLY & BOUNDARY SETS
** ==========================================================
*Assembly, name=Assembly
*Instance, name=PlateInstance, part=PlatePart
*End Instance
** Reference Point for Shear Loading
*Node
 1, 0.0, 0.600000024, 0.0
*Nset, nset=RP
 1
*Nset, nset=bottom_nodes, instance=PlateInstance
 2, 3, 4, 5, 6, 7
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*Nset, nset=top_nodes, instance=PlateInstance
 1, 57, 58, 59, 60, 61
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*Elset, elset=UMATELEM, instance=PlateInstance
 UMATELEM
*Elset, elset=All_elem, instance=PlateInstance
 UMATELEM
** Constraint: Mode-II Pure Shear top_nodes -> RP
*Equation
 2
 top_nodes, 1, 1.
 RP, 1, -1.
*End Assembly
** ==========================================================
** MATERIALS (Passive Facsimile Visualization Material)
** ==========================================================
*Material, name=MAT_QUAD_FACSIMILE
*Depvar
 18
*User Material, constants=4
 1.000000e-11, 3.000000e-01, 4894.0, 4.0
*Material, name=MAT_TRI_FACSIMILE
*Depvar
 18
*User Material, constants=4
 1.000000e-11, 3.000000e-01, 4894.0, 3.0
** ==========================================================
** BOUNDARY CONDITIONS (Pure Shear Baseline)
** ==========================================================
*Boundary
 bottom_nodes, 1, 2
*Boundary
 top_nodes, 2, 2
** ==========================================================
** AMPLITUDES (Full Fracture Two-Step Ramp)
** ==========================================================
*Amplitude, name=Amp-1
 0.0, 0.0, 0.5, 0.005
*Amplitude, name=Amp-2
 0.0, 0.005, 0.2, 0.010
** ----------------------------------------------------------
** STEP: Step-1 (Pre-cracking shear to 0.0050 mm)
** ----------------------------------------------------------
*Step, name=Step-1, nlgeom=NO, inc=500
*Static, direct
 0.001, 0.5,
*Boundary, amplitude=Amp-1
 RP, 1, 1, 1.0
*Restart, write, frequency=0
*Output, field, time interval=0.01
*Node Output
 U, RF
*Node Output, nset=RP
 RF, U
*Element Output, elset=UMATELEM
 SDV, S, EVOL
*Output, history, variable=PRESELECT
*Energy Output
 ALLAE, ALLCD, ALLIE, ALLKE, ALLPD, ALLSE, ALLWK, ETOTAL
*End Step
** ----------------------------------------------------------
** STEP: Step-2 (Full fracture shear to 0.0100 mm)
** ----------------------------------------------------------
*Step, name=Step-2, nlgeom=NO, inc=2000
*Static, direct
 0.0001, 0.2,
*Boundary, amplitude=Amp-2
 RP, 1, 1, 1.0
*Restart, write, frequency=0
*Output, field, time interval=0.01
*Node Output
 U, RF
*Node Output, nset=RP
 RF, U
*Element Output, elset=UMATELEM
 SDV, S, EVOL
*Output, history, variable=PRESELECT
*Energy Output
 ALLAE, ALLCD, ALLIE, ALLKE, ALLPD, ALLSE, ALLWK, ETOTAL
*End Step
