*Heading
** Mode-II Phase-Field Uniform Reference Study: M2REF_H1_FULL_U050
** Lineage: Staggered Phase-Mechanical Mixed UEL (12064 physical elements)
** Formulation: l0=0.015 mm, Gc=0.0027 kN/mm, E=210.0 kN/mm^2, nu=0.3, k=1e-07, NPHYS=12064
** Monotonic Shear Loading to U1 = 0.050000 mm
*Preprint, echo=NO, model=NO, history=NO, contact=NO
** ==========================================================
** USER ELEMENTS (Clean 6-slot ABI: Layer 1 Phase U1, Layer 2 Mech U2)
** ==========================================================
*USER ELEMENT, TYPE=U1, NODES=4, COORDINATES=2, PROPERTIES=6, VARIABLES=18, UNSYMM
3
*USER ELEMENT, TYPE=U2, NODES=4, COORDINATES=2, PROPERTIES=6, VARIABLES=18, UNSYMM
1, 2
*USER ELEMENT, TYPE=U3, NODES=3, COORDINATES=2, PROPERTIES=6, VARIABLES=18, UNSYMM
3
*USER ELEMENT, TYPE=U4, NODES=3, COORDINATES=2, PROPERTIES=6, VARIABLES=18, UNSYMM
1, 2
** Mode-II Phase-Field Uniform Reference Study (FRACFIX): M2REF_H1_FRACFIX
** 3-Layer Mixed UEL Architecture: U1/U2/CPE4 (12064 physical -> 36192 layered elements)
** Formulation: l0=0.015 mm, Gc=0.0027 kN/mm, E=210.0 kN/mm^2, nu=0.3, k=1e-07
** Loading: 2-Step Shear Displacement to U1_final = 0.0100 mm
** ==========================================================
** NODES
** ==========================================================
*Node
       1,    -0.5000000000,    -0.5000000000
       2,    -0.4762913603,    -0.5000000000
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*Nset, nset=bottom_nodes
 1, 2, 3, 4, 5, 6
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*Nset, nset=top_nodes
 12149, 12150, 12151, 12152, 12153, 12154
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*Nset, nset=RP
 12383
** ==========================================================
** USER ELEMENTS (Layer 1: Phase U1, Layer 2: Displacement U2)
** ==========================================================
** Layer 1: Phase UEL Elements (U1)
*Element, type=U1, elset=PHASE_QUAD
       1,       1,       2,     235,     234
       2,       2,       3,     236,     235
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** Layer 2: Displacement UEL Elements (U2)
*Element, type=U2, elset=DISP_QUAD
   12065,       1,       2,     235,     234
   12066,       2,       3,     236,     235
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** Layer 3: Passive Facsimile Elements (CPE4)
*Element, type=CPE4, elset=UMAT_QUAD
   24129,       1,       2,     235,     234
   24130,       2,       3,     236,     235
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** Aggregate Element Sets
*Elset, elset=PHASE
 PHASE_QUAD
*Elset, elset=DISP
 DISP_QUAD
*Elset, elset=UMATELEM
 UMAT_QUAD
*Elset, elset=All_elem
 UMATELEM
** ==========================================================
** UEL Properties
** ==========================================================
** ==========================================================
** UEL PROPERTIES (Clean 6-slot ABI)
** ==========================================================
*UEL Property, elset=PHASE_QUAD
 0.015, 0.0027, 210.0, 0.3, 1.0e-7, 12064.0
*UEL Property, elset=DISP_QUAD
 0.015, 0.0027, 210.0, 0.3, 1.0e-7, 12064.0
** ==========================================================
** UEL PROPERTIES (Clean 6-slot ABI)
** ==========================================================
*UEL Property, elset=PHASE_QUAD
 0.015, 0.0027, 210.0, 0.3, 1.0e-7, 12064.0
*UEL Property, elset=DISP_QUAD
 0.015, 0.0027, 210.0, 0.3, 1.0e-7, 12064.0
** ==========================================================
** Solid Sections for Visualization/Facsimile Layer
** ==========================================================
*Solid Section, elset=UMAT_QUAD, material=MAT_QUAD_FACSIMILE
 1.000000,
*Material, name=MAT_QUAD_FACSIMILE
*Depvar
 18
*User Material, constants=4
 1.000000e-11, 3.000000e-01, 12064.0, 4.0
** ==========================================================
** EQUATIONS (Multi-Point Top Shear Constraint to RP)
** ==========================================================
*Equation
 2
 12149, 1, 1.0, 12383, 1, -1.0
*Equation
 2
 12150, 1, 1.0, 12383, 1, -1.0
*Equation
 2
 12151, 1, 1.0, 12383, 1, -1.0
*Equation
 2
 12152, 1, 1.0, 12383, 1, -1.0
*Equation
 2
 12153, 1, 1.0, 12383, 1, -1.0
*Equation
 2
 12154, 1, 1.0, 12383, 1, -1.0
*Equation
 2
 12155, 1, 1.0, 12383, 1, -1.0
*Equation
 2
 12156, 1, 1.0, 12383, 1, -1.0
*Equation
 2
 12157, 1, 1.0, 12383, 1, -1.0
*Equation
 2
 12158, 1, 1.0, 12383, 1, -1.0
*Equation
 2
 12159, 1, 1.0, 12383, 1, -1.0
*Equation
 2
 12160, 1, 1.0, 12383, 1, -1.0
*Equation
 2
 12161, 1, 1.0, 12383, 1, -1.0
*Equation
 2
 12162, 1, 1.0, 12383, 1, -1.0
*Equation
 2
 12163, 1, 1.0, 12383, 1, -1.0
*Equation
 2
 12164, 1, 1.0, 12383, 1, -1.0
*Equation
 2
 12165, 1, 1.0, 12383, 1, -1.0
*Equation
 2
 12166, 1, 1.0, 12383, 1, -1.0
*Equation
 2
 12167, 1, 1.0, 12383, 1, -1.0
*Equation
 2
 12168, 1, 1.0, 12383, 1, -1.0
*Equation
 2
 12169, 1, 1.0, 12383, 1, -1.0
*Equation
 2
 12170, 1, 1.0, 12383, 1, -1.0
*Equation
 2
 12171, 1, 1.0, 12383, 1, -1.0
*Equation
 2
 12172, 1, 1.0, 12383, 1, -1.0
*Equation
 2
 12173, 1, 1.0, 12383, 1, -1.0
*Equation
 2
 12174, 1, 1.0, 12383, 1, -1.0
*Equation
 2
 12175, 1, 1.0, 12383, 1, -1.0
*Equation
 2
 12176, 1, 1.0, 12383, 1, -1.0
*Equation
 2
 12177, 1, 1.0, 12383, 1, -1.0
*Equation
 2
 12178, 1, 1.0, 12383, 1, -1.0
*Equation
 2
 12179, 1, 1.0, 12383, 1, -1.0
*Equation
 2
 12180, 1, 1.0, 12383, 1, -1.0
*Equation
 2
 12181, 1, 1.0, 12383, 1, -1.0
*Equation
 2
 12182, 1, 1.0, 12383, 1, -1.0
*Equation
 2
 12183, 1, 1.0, 12383, 1, -1.0
*Equation
 2
 12184, 1, 1.0, 12383, 1, -1.0
*Equation
 2
 12185, 1, 1.0, 12383, 1, -1.0
*Equation
 2
 12186, 1, 1.0, 12383, 1, -1.0
*Equation
 2
 12187, 1, 1.0, 12383, 1, -1.0
*Equation
 2
 12188, 1, 1.0, 12383, 1, -1.0
*Equation
 2
 12189, 1, 1.0, 12383, 1, -1.0
*Equation
 2
 12190, 1, 1.0, 12383, 1, -1.0
*Equation
 2
 12191, 1, 1.0, 12383, 1, -1.0
*Equation
 2
 12192, 1, 1.0, 12383, 1, -1.0
*Equation
 2
 12193, 1, 1.0, 12383, 1, -1.0
*Equation
 2
 12194, 1, 1.0, 12383, 1, -1.0
*Equation
 2
 12195, 1, 1.0, 12383, 1, -1.0
*Equation
 2
 12196, 1, 1.0, 12383, 1, -1.0
*Equation
 2
 12197, 1, 1.0, 12383, 1, -1.0
*Equation
 2
 12198, 1, 1.0, 12383, 1, -1.0
*Equation
 2
 12199, 1, 1.0, 12383, 1, -1.0
*Equation
 2
 12200, 1, 1.0, 12383, 1, -1.0
*Equation
 2
 12201, 1, 1.0, 12383, 1, -1.0
*Equation
 2
 12202, 1, 1.0, 12383, 1, -1.0
*Equation
 2
 12203, 1, 1.0, 12383, 1, -1.0
*Equation
 2
 12204, 1, 1.0, 12383, 1, -1.0
*Equation
 2
 12205, 1, 1.0, 12383, 1, -1.0
*Equation
 2
 12206, 1, 1.0, 12383, 1, -1.0
*Equation
 2
 12207, 1, 1.0, 12383, 1, -1.0
*Equation
 2
 12208, 1, 1.0, 12383, 1, -1.0
*Equation
 2
 12209, 1, 1.0, 12383, 1, -1.0
*Equation
 2
 12210, 1, 1.0, 12383, 1, -1.0
*Equation
 2
 12211, 1, 1.0, 12383, 1, -1.0
*Equation
 2
 12212, 1, 1.0, 12383, 1, -1.0
*Equation
 2
 12213, 1, 1.0, 12383, 1, -1.0
*Equation
 2
 12214, 1, 1.0, 12383, 1, -1.0
*Equation
 2
 12215, 1, 1.0, 12383, 1, -1.0
*Equation
 2
 12216, 1, 1.0, 12383, 1, -1.0
*Equation
 2
 12217, 1, 1.0, 12383, 1, -1.0
*Equation
 2
 12218, 1, 1.0, 12383, 1, -1.0
*Equation
 2
 12219, 1, 1.0, 12383, 1, -1.0
*Equation
 2
 12220, 1, 1.0, 12383, 1, -1.0
*Equation
 2
 12221, 1, 1.0, 12383, 1, -1.0
*Equation
 2
 12222, 1, 1.0, 12383, 1, -1.0
*Equation
 2
 12223, 1, 1.0, 12383, 1, -1.0
*Equation
 2
 12224, 1, 1.0, 12383, 1, -1.0
*Equation
 2
 12225, 1, 1.0, 12383, 1, -1.0
*Equation
 2
 12226, 1, 1.0, 12383, 1, -1.0
*Equation
 2
 12227, 1, 1.0, 12383, 1, -1.0
*Equation
 2
 12228, 1, 1.0, 12383, 1, -1.0
*Equation
 2
 12229, 1, 1.0, 12383, 1, -1.0
*Equation
 2
 12230, 1, 1.0, 12383, 1, -1.0
*Equation
 2
 12231, 1, 1.0, 12383, 1, -1.0
*Equation
 2
 12232, 1, 1.0, 12383, 1, -1.0
*Equation
 2
 12233, 1, 1.0, 12383, 1, -1.0
*Equation
 2
 12234, 1, 1.0, 12383, 1, -1.0
*Equation
 2
 12235, 1, 1.0, 12383, 1, -1.0
*Equation
 2
 12236, 1, 1.0, 12383, 1, -1.0
*Equation
 2
 12237, 1, 1.0, 12383, 1, -1.0
*Equation
 2
 12238, 1, 1.0, 12383, 1, -1.0
*Equation
 2
 12239, 1, 1.0, 12383, 1, -1.0
*Equation
 2
 12240, 1, 1.0, 12383, 1, -1.0
*Equation
 2
 12241, 1, 1.0, 12383, 1, -1.0
*Equation
 2
 12242, 1, 1.0, 12383, 1, -1.0
*Equation
 2
 12243, 1, 1.0, 12383, 1, -1.0
*Equation
 2
 12244, 1, 1.0, 12383, 1, -1.0
*Equation
 2
 12245, 1, 1.0, 12383, 1, -1.0
*Equation
 2
 12246, 1, 1.0, 12383, 1, -1.0
*Equation
 2
 12247, 1, 1.0, 12383, 1, -1.0
*Equation
 2
 12248, 1, 1.0, 12383, 1, -1.0
*Equation
 2
 12249, 1, 1.0, 12383, 1, -1.0
*Equation
 2
 12250, 1, 1.0, 12383, 1, -1.0
*Equation
 2
 12251, 1, 1.0, 12383, 1, -1.0
*Equation
 2
 12252, 1, 1.0, 12383, 1, -1.0
*Equation
 2
 12253, 1, 1.0, 12383, 1, -1.0
*Equation
 2
 12254, 1, 1.0, 12383, 1, -1.0
*Equation
 2
 12255, 1, 1.0, 12383, 1, -1.0
*Equation
 2
 12256, 1, 1.0, 12383, 1, -1.0
*Equation
 2
 12257, 1, 1.0, 12383, 1, -1.0
*Equation
 2
 12258, 1, 1.0, 12383, 1, -1.0
*Equation
 2
 12259, 1, 1.0, 12383, 1, -1.0
*Equation
 2
 12260, 1, 1.0, 12383, 1, -1.0
*Equation
 2
 12261, 1, 1.0, 12383, 1, -1.0
*Equation
 2
 12262, 1, 1.0, 12383, 1, -1.0
*Equation
 2
 12263, 1, 1.0, 12383, 1, -1.0
*Equation
 2
 12264, 1, 1.0, 12383, 1, -1.0
*Equation
 2
 12265, 1, 1.0, 12383, 1, -1.0
*Equation
 2
 12266, 1, 1.0, 12383, 1, -1.0
*Equation
 2
 12267, 1, 1.0, 12383, 1, -1.0
*Equation
 2
 12268, 1, 1.0, 12383, 1, -1.0
*Equation
 2
 12269, 1, 1.0, 12383, 1, -1.0
*Equation
 2
 12270, 1, 1.0, 12383, 1, -1.0
*Equation
 2
 12271, 1, 1.0, 12383, 1, -1.0
*Equation
 2
 12272, 1, 1.0, 12383, 1, -1.0
*Equation
 2
 12273, 1, 1.0, 12383, 1, -1.0
*Equation
 2
 12274, 1, 1.0, 12383, 1, -1.0
*Equation
 2
 12275, 1, 1.0, 12383, 1, -1.0
*Equation
 2
 12276, 1, 1.0, 12383, 1, -1.0
*Equation
 2
 12277, 1, 1.0, 12383, 1, -1.0
*Equation
 2
 12278, 1, 1.0, 12383, 1, -1.0
*Equation
 2
 12279, 1, 1.0, 12383, 1, -1.0
*Equation
 2
 12280, 1, 1.0, 12383, 1, -1.0
*Equation
 2
 12281, 1, 1.0, 12383, 1, -1.0
*Equation
 2
 12282, 1, 1.0, 12383, 1, -1.0
*Equation
 2
 12283, 1, 1.0, 12383, 1, -1.0
*Equation
 2
 12284, 1, 1.0, 12383, 1, -1.0
*Equation
 2
 12285, 1, 1.0, 12383, 1, -1.0
*Equation
 2
 12286, 1, 1.0, 12383, 1, -1.0
*Equation
 2
 12287, 1, 1.0, 12383, 1, -1.0
*Equation
 2
 12288, 1, 1.0, 12383, 1, -1.0
*Equation
 2
 12289, 1, 1.0, 12383, 1, -1.0
*Equation
 2
 12290, 1, 1.0, 12383, 1, -1.0
*Equation
 2
 12291, 1, 1.0, 12383, 1, -1.0
*Equation
 2
 12292, 1, 1.0, 12383, 1, -1.0
*Equation
 2
 12293, 1, 1.0, 12383, 1, -1.0
*Equation
 2
 12294, 1, 1.0, 12383, 1, -1.0
*Equation
 2
 12295, 1, 1.0, 12383, 1, -1.0
*Equation
 2
 12296, 1, 1.0, 12383, 1, -1.0
*Equation
 2
 12297, 1, 1.0, 12383, 1, -1.0
*Equation
 2
 12298, 1, 1.0, 12383, 1, -1.0
*Equation
 2
 12299, 1, 1.0, 12383, 1, -1.0
*Equation
 2
 12300, 1, 1.0, 12383, 1, -1.0
*Equation
 2
 12301, 1, 1.0, 12383, 1, -1.0
*Equation
 2
 12302, 1, 1.0, 12383, 1, -1.0
*Equation
 2
 12303, 1, 1.0, 12383, 1, -1.0
*Equation
 2
 12304, 1, 1.0, 12383, 1, -1.0
*Equation
 2
 12305, 1, 1.0, 12383, 1, -1.0
*Equation
 2
 12306, 1, 1.0, 12383, 1, -1.0
*Equation
 2
 12307, 1, 1.0, 12383, 1, -1.0
*Equation
 2
 12308, 1, 1.0, 12383, 1, -1.0
*Equation
 2
 12309, 1, 1.0, 12383, 1, -1.0
*Equation
 2
 12310, 1, 1.0, 12383, 1, -1.0
*Equation
 2
 12311, 1, 1.0, 12383, 1, -1.0
*Equation
 2
 12312, 1, 1.0, 12383, 1, -1.0
*Equation
 2
 12313, 1, 1.0, 12383, 1, -1.0
*Equation
 2
 12314, 1, 1.0, 12383, 1, -1.0
*Equation
 2
 12315, 1, 1.0, 12383, 1, -1.0
*Equation
 2
 12316, 1, 1.0, 12383, 1, -1.0
*Equation
 2
 12317, 1, 1.0, 12383, 1, -1.0
*Equation
 2
 12318, 1, 1.0, 12383, 1, -1.0
*Equation
 2
 12319, 1, 1.0, 12383, 1, -1.0
*Equation
 2
 12320, 1, 1.0, 12383, 1, -1.0
*Equation
 2
 12321, 1, 1.0, 12383, 1, -1.0
*Equation
 2
 12322, 1, 1.0, 12383, 1, -1.0
*Equation
 2
 12323, 1, 1.0, 12383, 1, -1.0
*Equation
 2
 12324, 1, 1.0, 12383, 1, -1.0
*Equation
 2
 12325, 1, 1.0, 12383, 1, -1.0
*Equation
 2
 12326, 1, 1.0, 12383, 1, -1.0
*Equation
 2
 12327, 1, 1.0, 12383, 1, -1.0
*Equation
 2
 12328, 1, 1.0, 12383, 1, -1.0
*Equation
 2
 12329, 1, 1.0, 12383, 1, -1.0
*Equation
 2
 12330, 1, 1.0, 12383, 1, -1.0
*Equation
 2
 12331, 1, 1.0, 12383, 1, -1.0
*Equation
 2
 12332, 1, 1.0, 12383, 1, -1.0
*Equation
 2
 12333, 1, 1.0, 12383, 1, -1.0
*Equation
 2
 12334, 1, 1.0, 12383, 1, -1.0
*Equation
 2
 12335, 1, 1.0, 12383, 1, -1.0
*Equation
 2
 12336, 1, 1.0, 12383, 1, -1.0
*Equation
 2
 12337, 1, 1.0, 12383, 1, -1.0
*Equation
 2
 12338, 1, 1.0, 12383, 1, -1.0
*Equation
 2
 12339, 1, 1.0, 12383, 1, -1.0
*Equation
 2
 12340, 1, 1.0, 12383, 1, -1.0
*Equation
 2
 12341, 1, 1.0, 12383, 1, -1.0
*Equation
 2
 12342, 1, 1.0, 12383, 1, -1.0
*Equation
 2
 12343, 1, 1.0, 12383, 1, -1.0
*Equation
 2
 12344, 1, 1.0, 12383, 1, -1.0
*Equation
 2
 12345, 1, 1.0, 12383, 1, -1.0
*Equation
 2
 12346, 1, 1.0, 12383, 1, -1.0
*Equation
 2
 12347, 1, 1.0, 12383, 1, -1.0
*Equation
 2
 12348, 1, 1.0, 12383, 1, -1.0
*Equation
 2
 12349, 1, 1.0, 12383, 1, -1.0
*Equation
 2
 12350, 1, 1.0, 12383, 1, -1.0
*Equation
 2
 12351, 1, 1.0, 12383, 1, -1.0
*Equation
 2
 12352, 1, 1.0, 12383, 1, -1.0
*Equation
 2
 12353, 1, 1.0, 12383, 1, -1.0
*Equation
 2
 12354, 1, 1.0, 12383, 1, -1.0
*Equation
 2
 12355, 1, 1.0, 12383, 1, -1.0
*Equation
 2
 12356, 1, 1.0, 12383, 1, -1.0
*Equation
 2
 12357, 1, 1.0, 12383, 1, -1.0
*Equation
 2
 12358, 1, 1.0, 12383, 1, -1.0
*Equation
 2
 12359, 1, 1.0, 12383, 1, -1.0
*Equation
 2
 12360, 1, 1.0, 12383, 1, -1.0
*Equation
 2
 12361, 1, 1.0, 12383, 1, -1.0
*Equation
 2
 12362, 1, 1.0, 12383, 1, -1.0
*Equation
 2
 12363, 1, 1.0, 12383, 1, -1.0
*Equation
 2
 12364, 1, 1.0, 12383, 1, -1.0
*Equation
 2
 12365, 1, 1.0, 12383, 1, -1.0
*Equation
 2
 12366, 1, 1.0, 12383, 1, -1.0
*Equation
 2
 12367, 1, 1.0, 12383, 1, -1.0
*Equation
 2
 12368, 1, 1.0, 12383, 1, -1.0
*Equation
 2
 12369, 1, 1.0, 12383, 1, -1.0
*Equation
 2
 12370, 1, 1.0, 12383, 1, -1.0
*Equation
 2
 12371, 1, 1.0, 12383, 1, -1.0
*Equation
 2
 12372, 1, 1.0, 12383, 1, -1.0
*Equation
 2
 12373, 1, 1.0, 12383, 1, -1.0
*Equation
 2
 12374, 1, 1.0, 12383, 1, -1.0
*Equation
 2
 12375, 1, 1.0, 12383, 1, -1.0
*Equation
 2
 12376, 1, 1.0, 12383, 1, -1.0
*Equation
 2
 12377, 1, 1.0, 12383, 1, -1.0
*Equation
 2
 12378, 1, 1.0, 12383, 1, -1.0
*Equation
 2
 12379, 1, 1.0, 12383, 1, -1.0
*Equation
 2
 12380, 1, 1.0, 12383, 1, -1.0
*Equation
 2
 12381, 1, 1.0, 12383, 1, -1.0
*Equation
 2
 12382, 1, 1.0, 12383, 1, -1.0
** ==========================================================
** BOUNDARY CONDITIONS (Pure Shear Baseline)
** ==========================================================
*Boundary
 bottom_nodes, 1, 2
*Boundary
** ==========================================================
** AMPLITUDES (Full Fracture Two-Step Ramp)
** ==========================================================
** ==========================================================
** STEP: Monotonic Shear Loading to U1 = 0.050000 mm
** ==========================================================
** ==========================================================
** STEP 1: State Install (Nodal Displacement & Phase Bound)
** ==========================================================
*STEP, NAME=STATE_INSTALL, NLGEOM=NO, INC=100
*STATIC
1.0, 1.0, 1.0e-5, 1.0
*BOUNDARY, OP=NEW
*INCLUDE, INPUT=STAGE_D_PRIMARY_STATE_BOUNDARY.inp
*OUTPUT, FIELD, FREQ=1
*NODE OUTPUT
U, RF
*END STEP

** ==========================================================
** STEP 2: Mechanical Equilibration (Phase Field Locked)
** ==========================================================
*STEP, NAME=MECH_EQUILIBRATION, NLGEOM=NO, INC=100
*STATIC
1.0, 1.0, 1.0e-5, 1.0
*BOUNDARY, OP=NEW
bottom_nodes, 1, 2, 0.0
RP, 1, 1, 1.014330051839e-02
RP, 2, 2, 0.0
*INCLUDE, INPUT=STAGE_D_U3_ONLY_BOUNDARY.inp
*OUTPUT, FIELD, FREQ=1
*NODE OUTPUT
U, RF
*END STEP

** ==========================================================
** STEP 3: Phase Field Release & Equilibrium
** ==========================================================
*STEP, NAME=PHASE_RELEASE, NLGEOM=NO, INC=100
*STATIC
1.0, 1.0, 1.0e-5, 1.0
*BOUNDARY, OP=NEW
bottom_nodes, 1, 2, 0.0
RP, 1, 1, 1.014330051839e-02
RP, 2, 2, 0.0
*OUTPUT, FIELD, FREQ=1
*NODE OUTPUT
U, RF
*END STEP

** ==========================================================
** STEP 4: Continuation Monotonic Shear to U1 = 0.050 mm
** ==========================================================
*STEP, NAME=CONTINUATION, NLGEOM=NO, INC=10000
*STATIC
0.001, 1.0, 1.0e-9, 0.02
*BOUNDARY, OP=MOD
RP, 1, 1, 0.050000
RP, 2, 2, 0.0
*OUTPUT, FIELD, FREQ=1
*NODE OUTPUT
U, RF
*END STEP
