*HEADING
M2CORR_STAGE_D_CORRECTED_DISPLACEMENT_TRANSFER_VAL - Stage-D Sliver-Free Nonmatching State Transfer
** Source: H1 1389686.mmaster02 Frame 29 (U1 = 0.010143 mm)
** Target Mesh: Sliver-Free Graded Nonmatching 8836 quads (Nx=94, Ny=94), open slit topology
** Staged 4-step sequence: STATE_INSTALL -> MECH_EQUILIBRATION -> PHASE_RELEASE -> CONTINUATION
**
*USER ELEMENT, TYPE=U1, NODES=4, COORDINATES=2, I PROPERTIES=0, PROPERTIES=6, VARIABLES=18, UNSYMM
3
*USER ELEMENT, TYPE=U2, NODES=4, COORDINATES=2, I PROPERTIES=0, PROPERTIES=6, VARIABLES=18, UNSYMM
1, 2
*NODE
1, -0.50000000, -0.50000000
2, -0.49361867, -0.50000000
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*ELEMENT, TYPE=U1, ELSET=E_QUAD_PHASE
1, 1, 2, 97, 96
2, 2, 3, 98, 97
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*ELEMENT, TYPE=U2, ELSET=E_QUAD_MECH
8837, 1, 2, 97, 96
8838, 2, 3, 98, 97
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*NSET, NSET=N_BOTTOM
1, 2, 3, 4, 5, 6
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*NSET, NSET=N_TOP
8979, 8980, 8981, 8982, 8983, 8984
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*NSET, NSET=N_RP
99999
*UEL PROPERTY, ELSET=E_QUAD_PHASE
0.015, 0.0027, 210.0, 0.3, 1e-07, 8836.0
*UEL PROPERTY, ELSET=E_QUAD_MECH
0.015, 0.0027, 210.0, 0.3, 1e-07, 8836.0
*EQUATION
2
8979, 1, 1.0, 99999, 1, -1.0
*EQUATION
2
8980, 1, 1.0, 99999, 1, -1.0
*EQUATION
2
8981, 1, 1.0, 99999, 1, -1.0
*EQUATION
2
8982, 1, 1.0, 99999, 1, -1.0
*EQUATION
2
8983, 1, 1.0, 99999, 1, -1.0
*EQUATION
2
8984, 1, 1.0, 99999, 1, -1.0
*EQUATION
2
8985, 1, 1.0, 99999, 1, -1.0
*EQUATION
2
8986, 1, 1.0, 99999, 1, -1.0
*EQUATION
2
8987, 1, 1.0, 99999, 1, -1.0
*EQUATION
2
8988, 1, 1.0, 99999, 1, -1.0
*EQUATION
2
8989, 1, 1.0, 99999, 1, -1.0
*EQUATION
2
8990, 1, 1.0, 99999, 1, -1.0
*EQUATION
2
8991, 1, 1.0, 99999, 1, -1.0
*EQUATION
2
8992, 1, 1.0, 99999, 1, -1.0
*EQUATION
2
8993, 1, 1.0, 99999, 1, -1.0
*EQUATION
2
8994, 1, 1.0, 99999, 1, -1.0
*EQUATION
2
8995, 1, 1.0, 99999, 1, -1.0
*EQUATION
2
8996, 1, 1.0, 99999, 1, -1.0
*EQUATION
2
8997, 1, 1.0, 99999, 1, -1.0
*EQUATION
2
8998, 1, 1.0, 99999, 1, -1.0
*EQUATION
2
8999, 1, 1.0, 99999, 1, -1.0
*EQUATION
2
9000, 1, 1.0, 99999, 1, -1.0
*EQUATION
2
9001, 1, 1.0, 99999, 1, -1.0
*EQUATION
2
9002, 1, 1.0, 99999, 1, -1.0
*EQUATION
2
9003, 1, 1.0, 99999, 1, -1.0
*EQUATION
2
9004, 1, 1.0, 99999, 1, -1.0
*EQUATION
2
9005, 1, 1.0, 99999, 1, -1.0
*EQUATION
2
9006, 1, 1.0, 99999, 1, -1.0
*EQUATION
2
9007, 1, 1.0, 99999, 1, -1.0
*EQUATION
2
9008, 1, 1.0, 99999, 1, -1.0
*EQUATION
2
9009, 1, 1.0, 99999, 1, -1.0
*EQUATION
2
9010, 1, 1.0, 99999, 1, -1.0
*EQUATION
2
9011, 1, 1.0, 99999, 1, -1.0
*EQUATION
2
9012, 1, 1.0, 99999, 1, -1.0
*EQUATION
2
9013, 1, 1.0, 99999, 1, -1.0
*EQUATION
2
9014, 1, 1.0, 99999, 1, -1.0
*EQUATION
2
9015, 1, 1.0, 99999, 1, -1.0
*EQUATION
2
9016, 1, 1.0, 99999, 1, -1.0
*EQUATION
2
9017, 1, 1.0, 99999, 1, -1.0
*EQUATION
2
9018, 1, 1.0, 99999, 1, -1.0
*EQUATION
2
9019, 1, 1.0, 99999, 1, -1.0
*EQUATION
2
9020, 1, 1.0, 99999, 1, -1.0
*EQUATION
2
9021, 1, 1.0, 99999, 1, -1.0
*EQUATION
2
9022, 1, 1.0, 99999, 1, -1.0
*EQUATION
2
9023, 1, 1.0, 99999, 1, -1.0
*EQUATION
2
9024, 1, 1.0, 99999, 1, -1.0
*EQUATION
2
9025, 1, 1.0, 99999, 1, -1.0
*EQUATION
2
9026, 1, 1.0, 99999, 1, -1.0
*EQUATION
2
9027, 1, 1.0, 99999, 1, -1.0
*EQUATION
2
9028, 1, 1.0, 99999, 1, -1.0
*EQUATION
2
9029, 1, 1.0, 99999, 1, -1.0
*EQUATION
2
9030, 1, 1.0, 99999, 1, -1.0
*EQUATION
2
9031, 1, 1.0, 99999, 1, -1.0
*EQUATION
2
9032, 1, 1.0, 99999, 1, -1.0
*EQUATION
2
9033, 1, 1.0, 99999, 1, -1.0
*EQUATION
2
9034, 1, 1.0, 99999, 1, -1.0
*EQUATION
2
9035, 1, 1.0, 99999, 1, -1.0
*EQUATION
2
9036, 1, 1.0, 99999, 1, -1.0
*EQUATION
2
9037, 1, 1.0, 99999, 1, -1.0
*EQUATION
2
9038, 1, 1.0, 99999, 1, -1.0
*EQUATION
2
9039, 1, 1.0, 99999, 1, -1.0
*EQUATION
2
9040, 1, 1.0, 99999, 1, -1.0
*EQUATION
2
9041, 1, 1.0, 99999, 1, -1.0
*EQUATION
2
9042, 1, 1.0, 99999, 1, -1.0
*EQUATION
2
9043, 1, 1.0, 99999, 1, -1.0
*EQUATION
2
9044, 1, 1.0, 99999, 1, -1.0
*EQUATION
2
9045, 1, 1.0, 99999, 1, -1.0
*EQUATION
2
9046, 1, 1.0, 99999, 1, -1.0
*EQUATION
2
9047, 1, 1.0, 99999, 1, -1.0
*EQUATION
2
9048, 1, 1.0, 99999, 1, -1.0
*EQUATION
2
9049, 1, 1.0, 99999, 1, -1.0
*EQUATION
2
9050, 1, 1.0, 99999, 1, -1.0
*EQUATION
2
9051, 1, 1.0, 99999, 1, -1.0
*EQUATION
2
9052, 1, 1.0, 99999, 1, -1.0
*EQUATION
2
9053, 1, 1.0, 99999, 1, -1.0
*EQUATION
2
9054, 1, 1.0, 99999, 1, -1.0
*EQUATION
2
9055, 1, 1.0, 99999, 1, -1.0
*EQUATION
2
9056, 1, 1.0, 99999, 1, -1.0
*EQUATION
2
9057, 1, 1.0, 99999, 1, -1.0
*EQUATION
2
9058, 1, 1.0, 99999, 1, -1.0
*EQUATION
2
9059, 1, 1.0, 99999, 1, -1.0
*EQUATION
2
9060, 1, 1.0, 99999, 1, -1.0
*EQUATION
2
9061, 1, 1.0, 99999, 1, -1.0
*EQUATION
2
9062, 1, 1.0, 99999, 1, -1.0
*EQUATION
2
9063, 1, 1.0, 99999, 1, -1.0
*EQUATION
2
9064, 1, 1.0, 99999, 1, -1.0
*EQUATION
2
9065, 1, 1.0, 99999, 1, -1.0
*EQUATION
2
9066, 1, 1.0, 99999, 1, -1.0
*EQUATION
2
9067, 1, 1.0, 99999, 1, -1.0
*EQUATION
2
9068, 1, 1.0, 99999, 1, -1.0
*EQUATION
2
9069, 1, 1.0, 99999, 1, -1.0
*EQUATION
2
9070, 1, 1.0, 99999, 1, -1.0
*EQUATION
2
9071, 1, 1.0, 99999, 1, -1.0
*EQUATION
2
9072, 1, 1.0, 99999, 1, -1.0
*EQUATION
2
9073, 1, 1.0, 99999, 1, -1.0
** ==========================================================
** STEP 1: State Installation & Binary History Ingestion
** ==========================================================
*STEP, NAME=STATE_INSTALL, NLGEOM=NO, INC=10
*STATIC
1.0, 1.0, 1.0e-5, 1.0
*BOUNDARY, OP=NEW
*INCLUDE, INPUT=STAGE_D_PRIMARY_STATE_BOUNDARY.inp
*OUTPUT, FIELD, FREQ=1
*NODE OUTPUT
U, RF
*END STEP

** ==========================================================
** STEP 2: Mechanical Equilibration (Phase Field Locked)
** ==========================================================
*STEP, NAME=MECH_EQUILIBRATION, NLGEOM=NO, INC=100
*STATIC
1.0, 1.0, 1.0e-5, 1.0
*BOUNDARY, OP=NEW
N_BOTTOM, 1, 2, 0.0
N_RP, 1, 1, 1.014330051839e-02
N_RP, 2, 2, 0.0
*INCLUDE, INPUT=STAGE_D_U3_ONLY_BOUNDARY.inp
*OUTPUT, FIELD, FREQ=1
*NODE OUTPUT
U, RF
*END STEP

** ==========================================================
** STEP 3: Phase Field Release & Equilibrium
** ==========================================================
*STEP, NAME=PHASE_RELEASE, NLGEOM=NO, INC=100
*STATIC
1.0, 1.0, 1.0e-5, 1.0
*BOUNDARY, OP=NEW
N_BOTTOM, 1, 2, 0.0
N_RP, 1, 1, 1.014330051839e-02
N_RP, 2, 2, 0.0
*OUTPUT, FIELD, FREQ=1
*NODE OUTPUT
U, RF
*END STEP

** ==========================================================
** STEP 4: Continuation Monotonic Shear to U1 = 0.050 mm
** ==========================================================
*STEP, NAME=CONTINUATION, NLGEOM=NO, INC=10000
*STATIC
0.001, 1.0, 1.0e-9, 0.02
*BOUNDARY, OP=MOD
N_RP, 1, 1, 0.050000
N_RP, 2, 2, 0.0
*OUTPUT, FIELD, FREQ=1
*NODE OUTPUT
U, RF
*NODE PRINT, FREQ=1
U, RF
*EL PRINT, FREQ=1, ELSET=E_QUAD_MECH
SDV14, SDV15, SDV16
*END STEP
