*HEADING
M2STATE_FRACFIX_RESTART1: Mode-II Evolving-Remesh / State-Transfer Continuation Restart
** Source State: M2ADAPT_MM_FRACFIX_PROD at u1 = 0.005000 mm (Step-1 frame 500)
** Target Mesh: PK5 nonmatching remeshed mesh (4894 physical elements, 14682 layered elements)
** Formulation: FRACFIX, l0=0.015 mm, Gc=0.0027 kN/mm, E=210.0 kN/mm^2, nu=0.3, k=1e-7
** NPHYS: 4894 carried in 5th property slot of U2/U4 headers.
**
*NODE, NSET=ALLNODES
     1,       0.000000,       0.600000
     2,       0.432269,      -0.500000
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**
** USER ELEMENT DEFINITIONS
** Quad UEL Layers (U1, U2)
*USER ELEMENT, TYPE=U1, NODES=4, COORDINATES=2, PROPERTIES=5, VARIABLES=18
1, 2
*USER ELEMENT, TYPE=U2, NODES=4, COORDINATES=2, PROPERTIES=5, VARIABLES=18
3, 0
** Tri UEL Layers (U3, U4)
*USER ELEMENT, TYPE=U3, NODES=3, COORDINATES=2, PROPERTIES=5, VARIABLES=18
1, 2
*USER ELEMENT, TYPE=U4, NODES=3, COORDINATES=2, PROPERTIES=5, VARIABLES=18
3, 0
**
** LAYERED ELEMENT TOPOLOGY
*ELEMENT, TYPE=U1, ELSET=E_U1
   129,    824,    979,   1017,    825
   130,    945,    992,   1000,    114
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*ELEMENT, TYPE=U2, ELSET=E_U2
  4895,    824,    979,   1017,    825
  4896,    945,    992,   1000,    114
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*ELEMENT, TYPE=U3, ELSET=E_U3
  9533,   4741,   4691,   3313
  9534,   3781,    272,   3754
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*ELEMENT, TYPE=U4, ELSET=E_U4
  9661,   4741,   4691,   3313
  9662,   3781,    272,   3754
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*ELEMENT, TYPE=CPE4, ELSET=E_CPE4
  9789,    824,    979,   1017,    825
  9790,    945,    992,   1000,    114
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*ELEMENT, TYPE=CPE3, ELSET=E_CPE3
 14555,   4741,   4691,   3313
 14556,   3781,    272,   3754
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**
** ELEMENT PROPERTIES
*UEL PROPERTY, ELSET=E_U1
    0.015000,     0.002700,   210.000000,     0.300000,   1.0000e-07
*UEL PROPERTY, ELSET=E_U2
    0.015000,     0.002700,   210.000000,     0.300000,         4894
*UEL PROPERTY, ELSET=E_U3
    0.015000,     0.002700,   210.000000,     0.300000,   1.0000e-07
*UEL PROPERTY, ELSET=E_U4
    0.015000,     0.002700,   210.000000,     0.300000,         4894
*SOLID SECTION, ELSET=E_CPE4, MATERIAL=MAT_PASSIVE
1.0
*SOLID SECTION, ELSET=E_CPE3, MATERIAL=MAT_PASSIVE
1.0
*MATERIAL, NAME=MAT_PASSIVE
*ELASTIC
1e-11, 0.3
**
*NSET, NSET=N_TOP
*NSET, NSET=N_BOT
    99,    100,    101,    102,    103,    104
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*NODE, NSET=N_RP
 99999,  -0.500000,   0.500000
*EQUATION
2
N_TOP, 1, 1.0, 99999, 1, -1.0
**
** INITIAL STATE INGESTION FROM MM CHECKPOINT (u1 = 0.005000 mm)
*INITIAL CONDITIONS, TYPE=SOLUTION
     1,   0.124500,   0.000350, 0.0, 0.0, 0.0
     2,   0.124500,   0.000350, 0.0, 0.0, 0.0
     3,   0.124500,   0.000350, 0.0, 0.0, 0.0
     4,   0.124500,   0.000350, 0.0, 0.0, 0.0
     5,   0.124500,   0.000350, 0.0, 0.0, 0.0
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  4766,   0.000000,   0.000000, 0.0, 0.0, 0.0
**
*BOUNDARY
N_BOT, 1, 2, 0.0
N_TOP, 2, 2, 0.0
99999, 2, 2, 0.0
**
** STEP 1: MECHANICAL RE-EQUILIBRATION AT TRANSFER CHECKPOINT (u1 = 0.005000 mm)
*STEP, NAME=Step-1_Reequilibration, NLGEOM=NO, INC=100
*STATIC, DIRECT
0.01, 1.0, 0.01, 0.01
*BOUNDARY
99999, 1, 1, 0.005000
*OUTPUT, FIELD, FREQUENCY=1
*NODE OUTPUT
U, RF
*ELEMENT OUTPUT, ELSET=E_CPE4
S, E, EVOL
*ELEMENT OUTPUT, ELSET=E_U2
SDV, EVOL
*OUTPUT, HISTORY, FREQUENCY=1
*NODE OUTPUT, NSET=N_RP
U, RF
*ENERGY OUTPUT
ALLAE, ALLCD, ALLIE, ALLKE, ALLPD, ALLSE, ALLWK, ETOTAL
*END STEP
**
** STEP 2: FRACTURE CONTINUATION TO ENDPOINT (u1 = 0.010000 mm)
*STEP, NAME=Step-2_Continuation, NLGEOM=NO, INC=3000
*STATIC, DIRECT
0.0001, 1.0, 0.0001, 0.0001
*AMPLITUDE, NAME=AMP_STEP2
0.0, 0.005000, 1.0, 0.010000
*BOUNDARY, AMPLITUDE=AMP_STEP2
99999, 1, 1, 1.0
*OUTPUT, FIELD, FREQUENCY=10
*NODE OUTPUT
U, RF
*ELEMENT OUTPUT, ELSET=E_CPE4
S, E, EVOL
*ELEMENT OUTPUT, ELSET=E_U2
SDV, EVOL
*OUTPUT, HISTORY, FREQUENCY=1
*NODE OUTPUT, NSET=N_RP
U, RF
*ENERGY OUTPUT
ALLAE, ALLCD, ALLIE, ALLKE, ALLPD, ALLSE, ALLWK, ETOTAL
*END STEP
