*HEADING
Mode-II Nonmatching State-Transfer Restart: M2STATE_FRACFIX_RESTART1R1R11
** Revision: M2STATE_FRACFIX_RESTART1R1R11 (Safe Jacobian Inversion + Clean 6-Property ABI)
** Source State: M2ADAPT_MM_FRACFIX_PROD (1386469.mmaster02) at u1 = 0.005000 mm
** Target Mesh: PK5 (Nphys = 4894, 4998 nodes, 9788 UELs, 14682 total layered)
** Corrected Contiguous UEL Ranges: U1 1..4766, U3 4767..4894, U2 4895..9660, U4 9661..9788
** Clean 6-Slot Property ABI: PROPS(1..6) = (l0, Gc, E, nu, k, Nphys)
** Revision: M2STATE_FRACFIX_RESTART1R1R6R2
** Source State: M2ADAPT_MM_FRACFIX_PROD (1386469.mmaster02) at u1 = 0.005000 mm
** Target Mesh: PK5 (Nphys = 4894, 4998 nodes, 9788 UELs, 14682 total layered)
** Corrected Contiguous UEL Ranges: U1 1..4766, U3 4767..4894, U2 4895..9660, U4 9661..9788
**
*USER ELEMENT, TYPE=U1, NODES=4, COORDINATES=2, PROPERTIES=6, VARIABLES=18, UNSYMM
3
*USER ELEMENT, TYPE=U2, NODES=4, COORDINATES=2, PROPERTIES=6, VARIABLES=18, UNSYMM
1, 2
*USER ELEMENT, TYPE=U3, NODES=3, COORDINATES=2, PROPERTIES=6, VARIABLES=18, UNSYMM
3
*USER ELEMENT, TYPE=U4, NODES=3, COORDINATES=2, PROPERTIES=6, VARIABLES=18, UNSYMM
1, 2
**
** NODES
*NODE
     1,       0.461913,      -0.500000
     2,       0.432269,      -0.500000
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**
*NSET, NSET=N_PHYSICAL, GENERATE
1, 4998, 1
**
**
** LAYERED ELEMENT TOPOLOGY (Contiguous non-overlapping ranges)
*ELEMENT, TYPE=U1, ELSET=E_U1
     1,    824,    979,   1017,    825
     2,    945,    992,   1000,    114
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*ELEMENT, TYPE=U3, ELSET=E_U3
  4767,   4741,   4691,   3313
  4768,   3781,    272,   3754
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*ELEMENT, TYPE=U2, ELSET=E_U2
  4895,    824,    979,   1017,    825
  4896,    945,    992,   1000,    114
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*ELEMENT, TYPE=U4, ELSET=E_U4
  9661,   4741,   4691,   3313
  9662,   3781,    272,   3754
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*ELEMENT, TYPE=CPE4, ELSET=E_CPE4
  9789,    824,    979,   1017,    825
  9790,    945,    992,   1000,    114
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*ELEMENT, TYPE=CPE3, ELSET=E_CPE3
 14555,   4741,   4691,   3313
 14556,   3781,    272,   3754
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**
** ELEMENT PROPERTIES
*UEL PROPERTY, ELSET=E_U1
       0.015000,     0.002700,   210.000000,     0.300000,   1.0000e-07,       4894.0
*UEL PROPERTY, ELSET=E_U2
       0.015000,     0.002700,   210.000000,     0.300000,   1.0000e-07,       4894.0
*UEL PROPERTY, ELSET=E_U3
       0.015000,     0.002700,   210.000000,     0.300000,   1.0000e-07,       4894.0
*UEL PROPERTY, ELSET=E_U4
       0.015000,     0.002700,   210.000000,     0.300000,   1.0000e-07,       4894.0
*SOLID SECTION, ELSET=E_CPE4, MATERIAL=MAT_PASSIVE
    1.000000
*SOLID SECTION, ELSET=E_CPE3, MATERIAL=MAT_PASSIVE
    1.000000
*MATERIAL, NAME=MAT_PASSIVE
*ELASTIC
  1.0000e-11,     0.300000
*DEPVAR
18
**
** NODE SETS FOR BOUNDARY CONDITIONS
*NSET, NSET=N_BOTTOM
     1,      2,      3,      4,      5,      6
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*NSET, NSET=N_TOP
    57,     58,     59,     60,     61,     62
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*EQUATION
2
N_TOP, 1, 1.0, 99999, 1, -1.0
*INITIAL CONDITIONS, TYPE=SOLUTION
     1, 0.000000e+00, 0.000000e+00, 0.000000e+00, 0.000000e+00, 0.000000e+00, 0.000000e+00, 0.000000e+00
0.000000e+00, 0.000000e+00, 0.000000e+00, 0.000000e+00, 0.000000e+00, 0.000000e+00, 0.000000e+00, 0.000000e+00
0.000000e+00, 0.000000e+00, 0.000000e+00
     2, 0.000000e+00, 0.000000e+00, 0.000000e+00, 0.000000e+00, 0.000000e+00, 0.000000e+00, 0.000000e+00
0.000000e+00, 0.000000e+00, 0.000000e+00, 0.000000e+00, 0.000000e+00, 0.000000e+00, 0.000000e+00, 0.000000e+00
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0.000000e+00, 0.000000e+00, 0.000000e+00
**
** STEP 1: PHASE INITIALIZATION (DOF 3 Prescribed, Mechanical u1 = 0.005000 mm)
*NSET, NSET=N_RP
99999
*ELSET, ELSET=E_ALL_UEL
E_U1, E_U2, E_U3, E_U4
*ELSET, ELSET=E_MECH_UEL
E_U2, E_U4
*ELSET, ELSET=E_PHASE_UEL
E_U1, E_U3
*STEP, NAME=Step-1-PhaseInit, INC=10000
*STATIC
1.0, 1.0, 1.0, 1.0
*BOUNDARY
N_BOTTOM, 1, 2, 0.00
99999, 1, 1, 0.005000
99999, 2, 2, 0.00
     1, 3, 3,     0.000000
     2, 3, 3,     0.000000
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  4998, 3, 3,     0.000000
*OUTPUT, FIELD, FREQ=1
*NODE OUTPUT, NSET=N_PHYSICAL
U
*NODE OUTPUT, NSET=N_RP
U, RF
*NODE OUTPUT, NSET=N_BOTTOM
U, RF
*NODE PRINT, FREQ=1
U, RF
*EL PRINT, FREQ=1, ELSET=E_MECH_UEL
SDV14, SDV15, SDV16
*END STEP
**
** STEP 2: CONTINUATION (DOF 3 Released, u1 = 0.005000 mm -> 0.010000 mm)
*STEP, NAME=Step-2-Continuation, INC=10000
*STATIC
1.0e-5, 0.005, 1.0e-9, 0.005
*BOUNDARY, OP=NEW
N_BOTTOM, 1, 2, 0.00
99999, 1, 1, 0.010000
99999, 2, 2, 0.00
*OUTPUT, FIELD, FREQ=1
*NODE OUTPUT, NSET=N_PHYSICAL
U
*NODE OUTPUT, NSET=N_RP
U, RF
*NODE OUTPUT, NSET=N_BOTTOM
U, RF
*NODE PRINT, FREQ=1
U, RF
*EL PRINT, FREQ=1, ELSET=E_MECH_UEL
SDV14, SDV15, SDV16
*END STEP
