*HEADING
M2STATE_FRACFIX_RESTART2: Stage-2 Evolving-Remesh / State-Transfer Continuation Restart
** Source State: M2STATE_FRACFIX_RESTART1 at u1 = 0.007500 mm (Step-2 frame 250)
** Target Mesh: PK10 nonmatching remeshed mesh (9876 physical elements, 29628 layered elements)
** Formulation: FRACFIX, l0=0.015 mm, Gc=0.0027 kN/mm, E=210.0 kN/mm^2, nu=0.3, k=1e-7
** NPHYS: 9876 carried in 5th property slot of U2/U4 headers.
**
*NODE, NSET=ALLNODES
     1,       0.040000,       0.000000
     2,       0.080000,       0.000000
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**
** USER ELEMENT DEFINITIONS
*USER ELEMENT, TYPE=U1, NODES=4, COORDINATES=2, PROPERTIES=5, VARIABLES=18
1, 2
*USER ELEMENT, TYPE=U2, NODES=4, COORDINATES=2, PROPERTIES=5, VARIABLES=18
3, 0
*USER ELEMENT, TYPE=U3, NODES=3, COORDINATES=2, PROPERTIES=5, VARIABLES=18
1, 2
*USER ELEMENT, TYPE=U4, NODES=3, COORDINATES=2, PROPERTIES=5, VARIABLES=18
3, 0
**
** ELEMENT PROPERTIES
*UEL PROPERTY, ELSET=E_U1
    0.015000,     0.002700,   210.000000,     0.300000,   1.0000e-07
*UEL PROPERTY, ELSET=E_U2
    0.015000,     0.002700,   210.000000,     0.300000,         9876
**
** STEP 1: MECHANICAL RE-EQUILIBRATION AT TRANSFER CHECKPOINT (u1 = 0.007500 mm)
*STEP, NAME=Step-1_Reequilibration, NLGEOM=NO, INC=100
*STATIC, DIRECT
0.01, 1.0, 0.01, 0.01
*BOUNDARY
99999, 1, 1, 0.007500
*OUTPUT, FIELD, FREQUENCY=1
*NODE OUTPUT
U, RF
*OUTPUT, HISTORY, FREQUENCY=1
*NODE OUTPUT, NSET=N_RP
U, RF
*ENERGY OUTPUT
ALLAE, ALLCD, ALLIE, ALLKE, ALLPD, ALLSE, ALLWK, ETOTAL
*END STEP
**
** STEP 2: FRACTURE CONTINUATION TO ENDPOINT (u1 = 0.010000 mm)
*STEP, NAME=Step-2_Continuation, NLGEOM=NO, INC=1500
*STATIC, DIRECT
0.0001, 1.0, 0.0001, 0.0001
*AMPLITUDE, NAME=AMP_STEP2
0.0, 0.007500, 1.0, 0.010000
*BOUNDARY, AMPLITUDE=AMP_STEP2
99999, 1, 1, 1.0
*OUTPUT, FIELD, FREQUENCY=10
*NODE OUTPUT
U, RF
*OUTPUT, HISTORY, FREQUENCY=1
*NODE OUTPUT, NSET=N_RP
U, RF
*ENERGY OUTPUT
ALLAE, ALLCD, ALLIE, ALLKE, ALLPD, ALLSE, ALLWK, ETOTAL
*END STEP
