*HEADING
M2STATE_FRACFIX_RESTART2R2: Second Evolving-Remesh / State-Transfer Continuation Restart
** Source State: Job 1388948.mmaster02 Frame 13 (u1 = 0.007585 mm, dmax = 0.124500)
** Target Mesh: PK10R1 nonmatching remeshed mesh (9876 physical elements, 29628 layered elements)
** Formulation: FRACFIX, l0=0.015 mm, Gc=0.0027 kN/mm, E=210.0 kN/mm^2, nu=0.3, k=1e-07
** NPHYS: 9876 carried in 5th property slot of U2/U4 headers.
**
*NODE, NSET=N_PHYSICAL
     1,      -0.500000,      -0.500000
     2,      -0.491597,      -0.500000
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*NSET, NSET=N_BOTTOM
1, 2, 3, 4, 5, 6
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*NSET, NSET=N_TOP
9961, 9962, 9963, 9964, 9965, 9966
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**
** USER ELEMENT DEFINITIONS
*USER ELEMENT, TYPE=U1, NODES=4, COORDINATES=2, I PROPERTIES=0, PROPERTIES=5, VARIABLES=18, UNSYMM
3
*USER ELEMENT, TYPE=U2, NODES=4, COORDINATES=2, I PROPERTIES=0, PROPERTIES=5, VARIABLES=18, UNSYMM
1, 2
*USER ELEMENT, TYPE=U3, NODES=3, COORDINATES=2, I PROPERTIES=0, PROPERTIES=5, VARIABLES=18, UNSYMM
3
*USER ELEMENT, TYPE=U4, NODES=3, COORDINATES=2, I PROPERTIES=0, PROPERTIES=5, VARIABLES=18, UNSYMM
1, 2
*UEL PROPERTY, ELSET=E_U1
    0.015000,     0.002700,   210.000000,     0.300000,   1.0000e-07
*UEL PROPERTY, ELSET=E_U2
    0.015000,     0.002700,   210.000000,     0.300000,         9876
*UEL PROPERTY, ELSET=E_U3
    0.015000,     0.002700,   210.000000,     0.300000,   1.0000e-07
*UEL PROPERTY, ELSET=E_U4
    0.015000,     0.002700,   210.000000,     0.300000,         9876
**
** ELEMENT CARDS (Layered Phase + Mechanical)
*ELEMENT, TYPE=U1, ELSET=E_U1
     1,      1,      2,    122,    121
     2,      2,      3,    123,    122
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*ELEMENT, TYPE=U2, ELSET=E_U2
  9877,      1,      2,    122,    121
  9878,      2,      3,    123,    122
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*ELEMENT, TYPE=U3, ELSET=E_U3
  9601,      1,      2,    121
  9602,      2,      3,    122
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*ELEMENT, TYPE=U4, ELSET=E_U4
 19477,      1,      2,    121
 19478,      2,      3,    122
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** PASSIVE SOLID FACSIMILES
*SOLID SECTION, ELSET=E_CPE4, MATERIAL=MAT_PASSIVE
1.0
*SOLID SECTION, ELSET=E_CPE3, MATERIAL=MAT_PASSIVE
1.0
*MATERIAL, NAME=MAT_PASSIVE
*ELASTIC
1e-11, 0.3
*ELEMENT, TYPE=CPE4, ELSET=E_CPE4
 19753,      1,      2,    122,    121
 19754,      2,      3,    123,    122
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*ELEMENT, TYPE=CPE3, ELSET=E_CPE3
 29353,      1,      2,    121
 29354,      2,      3,    122
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** RIGID LINEAR COUPLING ON N_TOP
*EQUATION
2
N_TOP, 1, 1.0, 99999, 1, -1.0
** INITIAL CONDITIONS (History H via 18-SDV TYPE=SOLUTION)
*INITIAL CONDITIONS, TYPE=SOLUTION
  9877, 0.000000e+00, 0.000000e+00, 0.000000e+00, 0.000000e+00, 0.000000e+00, 0.000000e+00, 0.000000e+00
0.000000e+00, 0.000000e+00, 0.000000e+00, 0.000000e+00, 0.000000e+00, 0.000000e+00, 0.000000e+00, 0.000000e+00
0.000000e+00, 0.000000e+00, 0.000000e+00
  9878, 0.000000e+00, 0.000000e+00, 0.000000e+00, 0.000000e+00, 0.000000e+00, 0.000000e+00, 0.000000e+00
0.000000e+00, 0.000000e+00, 0.000000e+00, 0.000000e+00, 0.000000e+00, 0.000000e+00, 0.000000e+00, 0.000000e+00
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0.000000e+00, 0.000000e+00, 0.000000e+00
**
** STEP 1: PHASE INITIALIZATION (DOF 3 Constrained)
*STEP, NAME=Step-1-PhaseInit, INC=10000
*STATIC
1.0, 1.0, 1.0e-5, 1.0
*BOUNDARY
N_BOTTOM, 1, 2, 0.00
99999, 1, 2, 0.00
  4137, 3, 3, 0.000002
  4138, 3, 3, 0.000003
  4139, 3, 3, 0.000004
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  5944, 3, 3, 0.000002
*OUTPUT, FIELD, FREQ=1
*NODE OUTPUT, NSET=N_PHYSICAL
U
*END STEP
**
** STEP 2: CONTINUATION (DOF 3 Released, u1 = 0.007585 mm -> 0.015000 mm)
*STEP, NAME=Step-2-Continuation, INC=10000
*STATIC
1.0e-5, 0.007415, 1.0e-9, 0.007415
*BOUNDARY, OP=NEW
N_BOTTOM, 1, 2, 0.00
99999, 1, 1, 0.015000
99999, 2, 2, 0.00
*OUTPUT, FIELD, FREQ=1
*NODE OUTPUT, NSET=N_PHYSICAL
U
*END STEP
