*Heading
** Mode-II Phase-Field Verification Study: M2REF_H0_FRACFIX_REPRO
** 3-Layer Mixed UEL Architecture: U1/U2/CPE4 (2601 physical nodes, 2500 quads)
*Preprint, echo=NO, model=NO, history=NO, contact=NO
*Node
       1,    -0.5000000000,    -0.5000000000
       2,    -0.4800000000,    -0.5000000000
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*Nset, nset=bottom_nodes
 1, 2, 3, 4, 5, 6
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*Nset, nset=top_nodes
 2551, 2552, 2553, 2554, 2555, 2556
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*Nset, nset=RP
 2602
*User Element, type=U1, nodes=4, coordinates=2, properties=3, variables=8
 8,
*User Element, type=U2, nodes=4, coordinates=2, properties=5, variables=56
 1, 2
*Element, type=U1, elset=PHASE_QUAD
       1,       1,       2,      53,      52
       2,       2,       3,      54,      53
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*Element, type=U2, elset=DISP_QUAD
    2602,       1,       2,      53,      52
    2603,       2,       3,      54,      53
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*Element, type=CPE4, elset=UMAT_QUAD
    5203,       1,       2,      53,      52
    5204,       2,       3,      54,      53
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*Elset, elset=PHASE
 PHASE_QUAD
*Elset, elset=DISP
 DISP_QUAD
*Elset, elset=UMATELEM
 UMAT_QUAD
*UEL Property, elset=PHASE_QUAD
 1.500000e-02, 2.700000e-03, 1.000000e+00
*UEL Property, elset=DISP_QUAD
 2.100000e+02, 3.000000e-01, 1.000000e+00, 1.000000e-07, 2601.0
*Solid Section, elset=UMAT_QUAD, material=MAT_QUAD_FACSIMILE
 1.000000,
*Material, name=MAT_QUAD_FACSIMILE
*Depvar
 18
*User Material, constants=4
 1.000000e-11, 3.000000e-01, 2601.0, 4.0
*Equation
 2
 2551, 1, 1.0, 2602, 1, -1.0
*Equation
 2
 2552, 1, 1.0, 2602, 1, -1.0
*Equation
 2
 2553, 1, 1.0, 2602, 1, -1.0
*Equation
 2
 2554, 1, 1.0, 2602, 1, -1.0
*Equation
 2
 2555, 1, 1.0, 2602, 1, -1.0
*Equation
 2
 2556, 1, 1.0, 2602, 1, -1.0
*Equation
 2
 2557, 1, 1.0, 2602, 1, -1.0
*Equation
 2
 2558, 1, 1.0, 2602, 1, -1.0
*Equation
 2
 2559, 1, 1.0, 2602, 1, -1.0
*Equation
 2
 2560, 1, 1.0, 2602, 1, -1.0
*Equation
 2
 2561, 1, 1.0, 2602, 1, -1.0
*Equation
 2
 2562, 1, 1.0, 2602, 1, -1.0
*Equation
 2
 2563, 1, 1.0, 2602, 1, -1.0
*Equation
 2
 2564, 1, 1.0, 2602, 1, -1.0
*Equation
 2
 2565, 1, 1.0, 2602, 1, -1.0
*Equation
 2
 2566, 1, 1.0, 2602, 1, -1.0
*Equation
 2
 2567, 1, 1.0, 2602, 1, -1.0
*Equation
 2
 2568, 1, 1.0, 2602, 1, -1.0
*Equation
 2
 2569, 1, 1.0, 2602, 1, -1.0
*Equation
 2
 2570, 1, 1.0, 2602, 1, -1.0
*Equation
 2
 2571, 1, 1.0, 2602, 1, -1.0
*Equation
 2
 2572, 1, 1.0, 2602, 1, -1.0
*Equation
 2
 2573, 1, 1.0, 2602, 1, -1.0
*Equation
 2
 2574, 1, 1.0, 2602, 1, -1.0
*Equation
 2
 2575, 1, 1.0, 2602, 1, -1.0
*Equation
 2
 2576, 1, 1.0, 2602, 1, -1.0
*Equation
 2
 2577, 1, 1.0, 2602, 1, -1.0
*Equation
 2
 2578, 1, 1.0, 2602, 1, -1.0
*Equation
 2
 2579, 1, 1.0, 2602, 1, -1.0
*Equation
 2
 2580, 1, 1.0, 2602, 1, -1.0
*Equation
 2
 2581, 1, 1.0, 2602, 1, -1.0
*Equation
 2
 2582, 1, 1.0, 2602, 1, -1.0
*Equation
 2
 2583, 1, 1.0, 2602, 1, -1.0
*Equation
 2
 2584, 1, 1.0, 2602, 1, -1.0
*Equation
 2
 2585, 1, 1.0, 2602, 1, -1.0
*Equation
 2
 2586, 1, 1.0, 2602, 1, -1.0
*Equation
 2
 2587, 1, 1.0, 2602, 1, -1.0
*Equation
 2
 2588, 1, 1.0, 2602, 1, -1.0
*Equation
 2
 2589, 1, 1.0, 2602, 1, -1.0
*Equation
 2
 2590, 1, 1.0, 2602, 1, -1.0
*Equation
 2
 2591, 1, 1.0, 2602, 1, -1.0
*Equation
 2
 2592, 1, 1.0, 2602, 1, -1.0
*Equation
 2
 2593, 1, 1.0, 2602, 1, -1.0
*Equation
 2
 2594, 1, 1.0, 2602, 1, -1.0
*Equation
 2
 2595, 1, 1.0, 2602, 1, -1.0
*Equation
 2
 2596, 1, 1.0, 2602, 1, -1.0
*Equation
 2
 2597, 1, 1.0, 2602, 1, -1.0
*Equation
 2
 2598, 1, 1.0, 2602, 1, -1.0
*Equation
 2
 2599, 1, 1.0, 2602, 1, -1.0
*Equation
 2
 2600, 1, 1.0, 2602, 1, -1.0
*Equation
 2
 2601, 1, 1.0, 2602, 1, -1.0
*Boundary
 bottom_nodes, 1, 2
*Boundary
 top_nodes, 2, 2
*Amplitude, name=Amp-1
 0.0, 0.0, 0.5, 0.005
*Amplitude, name=Amp-2
 0.0, 0.005, 0.2, 0.010
*Step, name=Step-1, nlgeom=NO, inc=500
*Static, direct
 0.001, 0.5,
*Boundary, amplitude=Amp-1
 RP, 1, 1, 1.0
*Restart, write, frequency=0
*Output, field, time interval=0.01
*Node Output
 U, RF
*Node Output, nset=RP
 RF, U
*Element Output, elset=UMATELEM
 SDV, S, EVOL
*Output, history, variable=PRESELECT
*Energy Output
 ALLAE, ALLCD, ALLIE, ALLKE, ALLPD, ALLSE, ALLWK, ETOTAL
*End Step
*Step, name=Step-2, nlgeom=NO, inc=2000
*Static, direct
 0.0001, 0.2,
*Boundary, amplitude=Amp-2
 RP, 1, 1, 1.0
*Restart, write, frequency=0
*Output, field, time interval=0.01
*Node Output
 U, RF
*Node Output, nset=RP
 RF, U
*Element Output, elset=UMATELEM
 SDV, S, EVOL
*Output, history, variable=PRESELECT
*Energy Output
 ALLAE, ALLCD, ALLIE, ALLKE, ALLPD, ALLSE, ALLWK, ETOTAL
*End Step
