*Heading
** Stage C C2A auxiliary continuum H0 MISESERI pre-analysis
** No UEL, no UMAT, no residual stiffness
** physical_elements=3930
** U_pre_mm=0.00464
** units: mm, N, MPa (E=210000 MPa, nu=0.3)
** element: CPE4 plane strain
*Preprint, echo=NO, model=NO, history=NO, contact=NO
*Part, name=Part-1
*Node
1, 0.5, 0
2, 0, 0
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*Element, type=CPE4, elset=PLATE
1, 10, 397, 450, 9
2, 350, 14, 15, 393
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*Elset, elset=PLATE, generate
1, 3930, 1
*Elset, elset=All_elem, generate
1, 3930, 1
*Solid Section, elset=PLATE, material=Steel
,
*End Part
*Assembly, name=Assembly
*Instance, name=Part-1-1, part=Part-1
*End Instance
*Node
3999, 0.5, 0.5, 0.0
*Nset, nset=RP
3999,
*Nset, nset=bottom, instance=Part-1-1
     4,      5,    134,    135,    136,    137
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*Nset, nset=top, instance=Part-1-1
     6,      7,    186,    187,    188,    189
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*Nset, nset=bottoml, instance=Part-1-1
     4
*Nset, nset=topl, instance=Part-1-1
     7
*Elset, elset=PLATE, instance=Part-1-1, generate
1, 3930, 1
*Elset, elset=All_elem, instance=Part-1-1, generate
1, 3930, 1
*Equation
2
top, 2, 1.
RP, 2, -1.
*End Assembly
** U_pre = 0.00464 mm
*Amplitude, name=Amp-pre
0., 0., 1., 0.00464
*Material, name=Steel
*Elastic
210000.0, 0.3
*Step, name=Step-pre, nlgeom=NO, inc=200
*Static, direct
0.005, 1.0,
*Boundary, amplitude=Amp-pre
RP, 2, 2, 1.
*Boundary
bottom, 2, 2
*Boundary
bottoml, 1, 1
*Boundary
topl, 1, 1
*Restart, write, frequency=0
*Output, field, time interval=0.05
*Node Output
U,
*Node Output, nset=RP
RF, U
*Element Output, elset=PLATE
S, EVOL, MISESERI, MISESAVG
*End Step
