*Heading
** Deterministic reconstruction candidate; do not run until reviewed.
** reconstruction_version: paper_matched_candidate_v1
** source: Molnar and Gravouil 2017 Fig. 6/Fig. 7 plus documented reconstruction choices
*Preprint, echo=NO, model=NO, history=NO, contact=NO
*Part, name=Part-1
*Node
1, -0.50000000, -0.50000000
2, -0.49816176, -0.50000000
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*User Element, nodes=4, type=U1, properties=3, coordinates=2, variables=16
1
*Element, type=U1, elset=plate_phase
1, 1, 2, 547, 546
2, 2, 3, 548, 547
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*User Element, nodes=4, type=U2, properties=4, coordinates=2, variables=16
1, 2
*Element, type=U2, elset=plate_disp
21761, 1, 2, 547, 546
21762, 2, 3, 548, 547
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*Element, type=CPS4, elset=umatelem
43521, 1, 2, 547, 546
43522, 2, 3, 548, 547
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*Elset, elset=All_elem, generate
1, 43520, 1
*Elset, elset=umatelem, generate
43521, 65280, 1
*Solid Section, elset=umatelem, material=umatelem
1.0
*End Part
*Assembly, name=Assembly
*Instance, name=Part-1-1, part=Part-1
*End Instance
*Node
22346, 0.0, 0.5, 0.0
*Nset, nset=RP
22346,
*Nset, nset=bottom, instance=Part-1-1, generate
1, 545, 1
*Nset, nset=top, instance=Part-1-1, generate
21801, 22345, 1
*Equation
2
top, 2, 1.
RP, 2, -1.
*End Assembly
*Amplitude, name=Amp-1
0., 0., 1., 0.005
*Amplitude, name=Amp-2
0., 0.005, 1., 0.0067
*Material, name=umatelem
*Depvar
16,
*User Material, constants=2
1e-11, 0.3
*Step, name=Step-1, nlgeom=NO, inc=500
*Static, direct
0.002, 1.
*Boundary, amplitude=Amp-1
RP, 2, 2, 1.
*Boundary
bottom, 2, 2
*Output, field, time interval=0.01
*Node Output
U,
*Node Output, nset=RP
RF, U
*Element Output, elset=umatelem
SDV
*End Step
*Step, name=Step-2, nlgeom=NO, inc=170
*Static, direct
0.00588235294117647, 1.
*Boundary, amplitude=Amp-2
RP, 2, 2, 1.
*Output, field, time interval=0.01
*Node Output
U,
*Node Output, nset=RP
RF, U
*Element Output, elset=umatelem
SDV
*End Step
