*Heading
** Unified full generation: H1
** mesh_role=H1
** local_target_h_mm=0.0025
** physical_elements=12064
** layered_elements=36192
** phase_field_convention intact=0 broken=1
** output_profile=fracture_baseline
** config_id=molnar_h0_h1_unified
** Pipeline: geometry/mesh -> U1 -> U2 -> CPS4 -> sets/BC -> outputs
*Preprint, echo=NO, model=NO, history=NO, contact=NO
*Part, name=Part-1
*Node
1, -0.5, -0.5
2, -0.4762913603, -0.5
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*User Element, nodes=4, type=U1, properties=3, coordinates=2, VARIABLES=8
3
*Element, type=U1, elset=PLATE
1, 1, 2, 235, 234
2, 2, 3, 236, 235
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*Elset, elset=PLATE, generate
1, 12064, 1
*Uel property, elset=PLATE
0.015, 0.0027, 1
*User Element, nodes=4, type=U2, properties=4, coordinates=2, VARIABLES=56
1, 2
*Element, type=U2, elset=PLATE_SS
12065, 1, 2, 235, 234
12066, 2, 3, 236, 235
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*Elset, elset=PLATE_SS, generate
12065, 24128, 1
*Uel property, elset=PLATE_SS
210, 0.3, 1, 1.0000000000e-07
*Element, type=CPS4, elset=umatelem
24129, 1, 2, 235, 234
24130, 2, 3, 236, 235
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*Solid Section, elset=umatelem, material=umatelem
1
*End Part
*Assembly, name=Assembly
*Instance, name=Part-1-1, part=Part-1
*End Instance
*Node
12382, 0.5, 0.5, 0.0
*Nset, nset=RP
12382,
*Nset, nset=bottom, instance=Part-1-1
     1,      2,      3,      4,      5,      6
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*Nset, nset=top, instance=Part-1-1
 12149,  12150,  12151,  12152,  12153,  12154
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*Nset, nset=bottoml, instance=Part-1-1
     1
*Nset, nset=topl, instance=Part-1-1
 12149
*Nset, nset=notch_lower_face, instance=Part-1-1
  6059,   6061,   6063,   6065,   6067,   6069
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*Nset, nset=notch_upper_face, instance=Part-1-1
  6060,   6062,   6064,   6066,   6068,   6070
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*Elset, elset=umatelem, instance=Part-1-1, generate
24129, 36192, 1
*Equation
2
top, 2, 1.
RP, 2, -1.
*End Assembly
*Amplitude, name=Amp-1
0, 0, 0.5, 0.005
*Amplitude, name=Amp-2
0, 0.005, 0.5, 0.01
*Material, name=umatelem
*Depvar
16,
*User Material, constants=2
1.0000000000e-11, 0.3
*Step, name=Step-1, nlgeom=NO, inc=500
*Static, direct
0.001, 0.5,
*Boundary, amplitude=Amp-1
RP, 2, 2, 1.
*Boundary
bottom, 2, 2
*Boundary
bottoml, 1, 1
*Boundary
topl, 1, 1
*Restart, write, frequency=0
*Output, field, time interval=0.01
*Node Output
U,
*Node Output, nset=RP
RF, U
*Element Output, elset=umatelem
SDV
*End Step
*Step, name=Step-2, nlgeom=NO, inc=2000
*Static, direct
1.0000000000e-04, 0.2,
*Boundary, amplitude=Amp-2
RP, 2, 2, 1.
*Restart, write, frequency=0
*Output, field, time interval=0.01
*Node Output
U,
*Node Output, nset=RP
RF, U
*Element Output, elset=umatelem
SDV
*End Step
