*Heading
 Coarse Plate with Hole Solve
** Job name: JOB_PLATE_HOLE_COARSE Model name: PLATE_WITH_HOLE_MODEL
** Generated by: Abaqus/CAE 2023
*Preprint, echo=NO, model=NO, history=NO, contact=NO
**
** PARTS
**
*Part, name=PLATE
*Node
      1,  0.592387974,  0.538268328
      2,  0.570710659,  0.570710659
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*Element, type=CPE3
 1, 488, 416, 412
 2, 460, 426, 400
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*Element, type=CPE4
 27, 118, 737,  12,  11
 28, 185, 184, 237, 242
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*Nset, nset=ALL_ELEM, generate
   1,  773,    1
*Elset, elset=ALL_ELEM, generate
   1,  728,    1
** Section: PlateSec
*Solid Section, elset=ALL_ELEM, material=Steel
1.,
*End Part
**
**
** ASSEMBLY
**
*Assembly, name=Assembly
**
*Instance, name=PLATE-1, part=PLATE
*End Instance
**
*Nset, nset=_PickedSet3, internal, instance=PLATE-1
 15, 16, 21, 22, 23, 24
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*Elset, elset=_PickedSet3, internal, instance=PLATE-1
  29,  31,  47,  48,  49,  50
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*Nset, nset=_PickedSet4, internal, instance=PLATE-1
 16,
*Nset, nset=_PickedSet5, internal, instance=PLATE-1
 17, 18, 69, 70, 71, 72
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*Elset, elset=_PickedSet5, internal, instance=PLATE-1
  39,  45,  67,  88,  91,  92
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*End Assembly
**
** MATERIALS
**
*Material, name=Steel
*Elastic
210000., 0.3
**
** BOUNDARY CONDITIONS
**
** Name: BC_Bottom_Y Type: Displacement/Rotation
*Boundary
_PickedSet3, 2, 2
** Name: BC_Pin_X Type: Displacement/Rotation
*Boundary
_PickedSet4, 1, 1
** ----------------------------------------------------------------
**
** STEP: Step-1
**
*Step, name=Step-1, nlgeom=NO
*Static
1., 1., 1e-05, 1.
**
** BOUNDARY CONDITIONS
**
** Name: BC_Top_Tension Type: Displacement/Rotation
*Boundary
_PickedSet5, 2, 2, 0.001
**
** OUTPUT REQUESTS
**
*Restart, write, frequency=0
**
** FIELD OUTPUT: F-Output-1
**
*Output, field, variable=PRESELECT
**
** HISTORY OUTPUT: H-Output-1
**
*Output, history, variable=PRESELECT
*OUTPUT, FIELD
*NODE OUTPUT
U, RF
*ELEMENT OUTPUT
S, MISESERI, MISESAVG, EVOL, ENER
*End Step
