*Heading
 Adapted Plate Hole errorTarget=2.0%
** Job name: PLATE_HOLE_ADAPTED_ERR_20PCT Model name: PLATE_HOLE_ERR_20
** Generated by: Abaqus/CAE 2023
*Preprint, echo=NO, model=NO, history=NO, contact=NO
**
** PARTS
**
*Part, name=PLATE
*Node
      1,  0.593078077,  0.536557794
      2,  0.571489394,  0.569923282
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*Element, type=CPE3
  1, 2329, 2204, 2162
  2, 3716, 3655,  501
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*Element, type=CPE4
 120,  934,  927,  838,   12
 121,  934, 1054, 1049,  927
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*Nset, nset=ALL_ELEM, generate
    1,  4699,     1
*Elset, elset=ALL_ELEM, generate
    1,  4645,     1
** Section: PlateSec
*Solid Section, elset=ALL_ELEM, material=Steel
1.,
*End Part
**
**
** ASSEMBLY
**
*Assembly, name=Assembly
**
*Instance, name=PLATE-1, part=PLATE
*End Instance
**
*End Assembly
**
** MATERIALS
**
*Material, name=Steel
*Elastic
210000., 0.3
** ----------------------------------------------------------------
**
** STEP: Step-1
**
*Step, name=Step-1, nlgeom=NO
*Static
1., 1., 1e-05, 1.
**
** OUTPUT REQUESTS
**
*Restart, write, frequency=0
**
** FIELD OUTPUT:  from REMESHING RULE: RR_HOLE_20
** Plate with Hole Remeshing Rule errorTarget=2.0%
**
*Output, field
*Element Output, elset=PLATE-1.ALL_ELEM, directions=YES
MISESERI, MISESAVG, S, EVOL
**
** FIELD OUTPUT: F-Output-1
**
*Output, field, variable=PRESELECT
**
** HISTORY OUTPUT: H-Output-1
**
*Output, history, variable=PRESELECT
*End Step
