*Heading
** Pandey & Kumar (2025) Mode-I Tension Benchmark: PK_MODE1_AUX_CONTINUUM
** Geometry: 1.0 x 1.0 mm, Slit at y=0.5 (a0=0.5 mm), Local h=0.0200 mm, NPHYS=2700
** Material: E=210.0 kN/mm^2, nu=0.3, Gc=0.0027 kN/mm, l0=0.0075 mm, k=1.0e-7
*Preprint, echo=NO, model=NO, history=NO, contact=NO
** ==========================================================
** NODES
** ==========================================================
*Node
1, 0.0000000000, 0.0000000000
2, 0.0195454545, 0.0000000000
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** ==========================================================
** CONTINUUM CPS4 ELEMENTS (Elements 1..2700)
** ==========================================================
*Element, type=CPS4, elset=All_elem
1, 1, 2, 53, 52
2, 2, 3, 54, 53
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** ==========================================================
** NODE SETS
** ==========================================================
*Nset, nset=N_RP
999999
*Nset, nset=N_TOP
2780, 2781, 2782, 2783, 2784, 2785
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*Nset, nset=N_BOTTOM
1, 2, 3, 4, 5, 6
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*Nset, nset=N_PIN
1
** ==========================================================
** LINEAR ELASTIC CONTINUUM SECTION
** ==========================================================
*Solid Section, elset=All_elem, material=MAT_ELASTIC
 1.0,
*Material, name=MAT_ELASTIC
*Elastic
 210.0, 0.3
** ==========================================================
** EQUATIONS (Rigid top tensile pull tied to RP)
** ==========================================================
*Equation
2
2780, 2, 1.0, 999999, 2, -1.0
*Equation
2
2781, 2, 1.0, 999999, 2, -1.0
*Equation
2
2782, 2, 1.0, 999999, 2, -1.0
*Equation
2
2783, 2, 1.0, 999999, 2, -1.0
*Equation
2
2784, 2, 1.0, 999999, 2, -1.0
*Equation
2
2785, 2, 1.0, 999999, 2, -1.0
*Equation
2
2786, 2, 1.0, 999999, 2, -1.0
*Equation
2
2787, 2, 1.0, 999999, 2, -1.0
*Equation
2
2788, 2, 1.0, 999999, 2, -1.0
*Equation
2
2789, 2, 1.0, 999999, 2, -1.0
*Equation
2
2790, 2, 1.0, 999999, 2, -1.0
*Equation
2
2791, 2, 1.0, 999999, 2, -1.0
*Equation
2
2792, 2, 1.0, 999999, 2, -1.0
*Equation
2
2793, 2, 1.0, 999999, 2, -1.0
*Equation
2
2794, 2, 1.0, 999999, 2, -1.0
*Equation
2
2795, 2, 1.0, 999999, 2, -1.0
*Equation
2
2796, 2, 1.0, 999999, 2, -1.0
*Equation
2
2797, 2, 1.0, 999999, 2, -1.0
*Equation
2
2798, 2, 1.0, 999999, 2, -1.0
*Equation
2
2799, 2, 1.0, 999999, 2, -1.0
*Equation
2
2800, 2, 1.0, 999999, 2, -1.0
*Equation
2
2801, 2, 1.0, 999999, 2, -1.0
*Equation
2
2802, 2, 1.0, 999999, 2, -1.0
*Equation
2
2803, 2, 1.0, 999999, 2, -1.0
*Equation
2
2804, 2, 1.0, 999999, 2, -1.0
*Equation
2
2805, 2, 1.0, 999999, 2, -1.0
*Equation
2
2806, 2, 1.0, 999999, 2, -1.0
*Equation
2
2807, 2, 1.0, 999999, 2, -1.0
*Equation
2
2808, 2, 1.0, 999999, 2, -1.0
*Equation
2
2809, 2, 1.0, 999999, 2, -1.0
*Equation
2
2810, 2, 1.0, 999999, 2, -1.0
*Equation
2
2811, 2, 1.0, 999999, 2, -1.0
*Equation
2
2812, 2, 1.0, 999999, 2, -1.0
*Equation
2
2813, 2, 1.0, 999999, 2, -1.0
*Equation
2
2814, 2, 1.0, 999999, 2, -1.0
*Equation
2
2815, 2, 1.0, 999999, 2, -1.0
*Equation
2
2816, 2, 1.0, 999999, 2, -1.0
*Equation
2
2817, 2, 1.0, 999999, 2, -1.0
*Equation
2
2818, 2, 1.0, 999999, 2, -1.0
*Equation
2
2819, 2, 1.0, 999999, 2, -1.0
*Equation
2
2820, 2, 1.0, 999999, 2, -1.0
*Equation
2
2821, 2, 1.0, 999999, 2, -1.0
*Equation
2
2822, 2, 1.0, 999999, 2, -1.0
*Equation
2
2823, 2, 1.0, 999999, 2, -1.0
*Equation
2
2824, 2, 1.0, 999999, 2, -1.0
*Equation
2
2825, 2, 1.0, 999999, 2, -1.0
*Equation
2
2826, 2, 1.0, 999999, 2, -1.0
*Equation
2
2827, 2, 1.0, 999999, 2, -1.0
*Equation
2
2828, 2, 1.0, 999999, 2, -1.0
*Equation
2
2829, 2, 1.0, 999999, 2, -1.0
*Equation
2
2830, 2, 1.0, 999999, 2, -1.0
** ==========================================================
** PRE-ANALYSIS ELASTIC STEP: u = 0.0010 mm
** ==========================================================
*Step, name=PreAnalysisStep, nlgeom=NO, inc=100
*Static
 0.01, 1.0, 1.0E-5, 0.1
*Boundary
 N_BOTTOM, 2, 2, 0.0
 N_PIN, 1, 1, 0.0
 N_TOP, 1, 1, 0.0
 N_RP, 2, 2, 0.0010
*Restart, write, frequency=0
*Output, field, frequency=1
*Node Output, nset=N_RP
 U, RF
*Element Output, elset=All_elem
 MISESERI, MISESAVG, S, E, EVOL
*End Step
