*Heading
** Pandey & Kumar (2025) Mode-I Tension Benchmark: PK_MODE1_PROPOSED_PFM (Paper-Faithful Remeshed)
** Geometry: 1.0 x 1.0 mm, Slit at y=0.5 (a0=0.5 mm), Local h=0.0010 mm, NPHYS=14235
** Material: E=210.0 kN/mm^2, nu=0.3, Gc=0.0027 kN/mm, l0=0.0075 mm, k=1.0e-7
*Preprint, echo=NO, model=NO, history=NO, contact=NO
** ==========================================================
** USER ELEMENTS (Phase: 1..NPHYS, Mech: NPHYS+1..2*NPHYS)
** ==========================================================
*USER ELEMENT, TYPE=U1, NODES=4, COORDINATES=2, PROPERTIES=6, VARIABLES=18, UNSYMM
3
*USER ELEMENT, TYPE=U2, NODES=4, COORDINATES=2, PROPERTIES=6, VARIABLES=18, UNSYMM
1, 2
*USER ELEMENT, TYPE=U3, NODES=3, COORDINATES=2, PROPERTIES=6, VARIABLES=18, UNSYMM
3
*USER ELEMENT, TYPE=U4, NODES=3, COORDINATES=2, PROPERTIES=6, VARIABLES=18, UNSYMM
1, 2
** ==========================================================
** NODES
** ==========================================================
*Node
1, 1.0000000000, 0.5000000000
2, 0.0000000000, 0.5000000000
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** ==========================================================
** LAYER 1: PHASE FIELD ELEMENTS (1 .. NPHYS)
** ==========================================================
*Element, type=U1, elset=PHASE_QUAD
1, 14228, 397, 104, 14261
2, 14229, 398, 397, 14228
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*Element, type=U3, elset=PHASE_TRI
13855, 632, 631, 599
13856, 781, 780, 748
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** ==========================================================
** LAYER 2: MECHANICAL DISPLACEMENT ELEMENTS (NPHYS+1 .. 2*NPHYS)
** ==========================================================
*Element, type=U2, elset=DISP_QUAD
14236, 14228, 397, 104, 14261
14237, 14229, 398, 397, 14228
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*Element, type=U4, elset=DISP_TRI
28090, 632, 631, 599
28091, 781, 780, 748
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** ==========================================================
** LAYER 3: FACSIMILE VISUALIZATION OVERLAY ELEMENTS (2*NPHYS+1 .. 3*NPHYS)
** ==========================================================
*Element, type=CPE4, elset=FACSIMILE_QUAD
28471, 14228, 397, 104, 14261
28472, 14229, 398, 397, 14228
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*Element, type=CPE3, elset=FACSIMILE_TRI
42325, 632, 631, 599
42326, 781, 780, 748
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** ==========================================================
** ELEMENT SETS AND PROPERTIES
** ==========================================================
*Elset, elset=PHASE
PHASE_QUAD
PHASE_TRI
*Elset, elset=DISP
DISP_QUAD
DISP_TRI
*Elset, elset=All_elem
FACSIMILE_QUAD
FACSIMILE_TRI
*UEL PROPERTY, ELSET=PHASE_QUAD
0.0075, 0.0027, 210.0, 0.3, 1.0e-7, 14235.0
*UEL PROPERTY, ELSET=DISP_QUAD
0.0075, 0.0027, 210.0, 0.3, 1.0e-7, 14235.0
*UEL PROPERTY, ELSET=PHASE_TRI
0.0075, 0.0027, 210.0, 0.3, 1.0e-7, 14235.0
*UEL PROPERTY, ELSET=DISP_TRI
0.0075, 0.0027, 210.0, 0.3, 1.0e-7, 14235.0
*Solid Section, elset=All_elem, material=DUMMY_ELAS
1.0
*Material, name=DUMMY_ELAS
*Elastic
1.0E-11, 0.3
** ==========================================================
** NODE SETS
** ==========================================================
*Nset, nset=N_BOTTOM
3, 4, 56, 57, 58, 59
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*Nset, nset=N_TOP
5, 6, 179, 180, 181, 182
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*Nset, nset=N_PIN
3
*Nset, nset=N_RP
999999
** ==========================================================
** MULTI-POINT CONSTRAINTS (EQUATIONS FOR TOP LOAD)
** ==========================================================
*Equation
2
5, 2, 1.0, 999999, 2, -1.0
*Equation
2
6, 2, 1.0, 999999, 2, -1.0
*Equation
2
179, 2, 1.0, 999999, 2, -1.0
*Equation
2
180, 2, 1.0, 999999, 2, -1.0
*Equation
2
181, 2, 1.0, 999999, 2, -1.0
*Equation
2
182, 2, 1.0, 999999, 2, -1.0
*Equation
2
183, 2, 1.0, 999999, 2, -1.0
*Equation
2
184, 2, 1.0, 999999, 2, -1.0
*Equation
2
185, 2, 1.0, 999999, 2, -1.0
*Equation
2
186, 2, 1.0, 999999, 2, -1.0
*Equation
2
187, 2, 1.0, 999999, 2, -1.0
*Equation
2
188, 2, 1.0, 999999, 2, -1.0
*Equation
2
189, 2, 1.0, 999999, 2, -1.0
*Equation
2
190, 2, 1.0, 999999, 2, -1.0
*Equation
2
191, 2, 1.0, 999999, 2, -1.0
*Equation
2
192, 2, 1.0, 999999, 2, -1.0
*Equation
2
193, 2, 1.0, 999999, 2, -1.0
*Equation
2
194, 2, 1.0, 999999, 2, -1.0
*Equation
2
195, 2, 1.0, 999999, 2, -1.0
*Equation
2
196, 2, 1.0, 999999, 2, -1.0
*Equation
2
197, 2, 1.0, 999999, 2, -1.0
*Equation
2
198, 2, 1.0, 999999, 2, -1.0
*Equation
2
199, 2, 1.0, 999999, 2, -1.0
*Equation
2
200, 2, 1.0, 999999, 2, -1.0
*Equation
2
201, 2, 1.0, 999999, 2, -1.0
*Equation
2
202, 2, 1.0, 999999, 2, -1.0
*Equation
2
203, 2, 1.0, 999999, 2, -1.0
*Equation
2
204, 2, 1.0, 999999, 2, -1.0
*Equation
2
205, 2, 1.0, 999999, 2, -1.0
*Equation
2
206, 2, 1.0, 999999, 2, -1.0
*Equation
2
207, 2, 1.0, 999999, 2, -1.0
*Equation
2
208, 2, 1.0, 999999, 2, -1.0
*Equation
2
209, 2, 1.0, 999999, 2, -1.0
*Equation
2
210, 2, 1.0, 999999, 2, -1.0
*Equation
2
211, 2, 1.0, 999999, 2, -1.0
*Equation
2
212, 2, 1.0, 999999, 2, -1.0
*Equation
2
213, 2, 1.0, 999999, 2, -1.0
*Equation
2
214, 2, 1.0, 999999, 2, -1.0
*Equation
2
215, 2, 1.0, 999999, 2, -1.0
*Equation
2
216, 2, 1.0, 999999, 2, -1.0
*Equation
2
217, 2, 1.0, 999999, 2, -1.0
*Equation
2
218, 2, 1.0, 999999, 2, -1.0
*Equation
2
219, 2, 1.0, 999999, 2, -1.0
*Equation
2
220, 2, 1.0, 999999, 2, -1.0
*Equation
2
221, 2, 1.0, 999999, 2, -1.0
*Equation
2
222, 2, 1.0, 999999, 2, -1.0
*Equation
2
223, 2, 1.0, 999999, 2, -1.0
*Equation
2
224, 2, 1.0, 999999, 2, -1.0
*Equation
2
225, 2, 1.0, 999999, 2, -1.0
*Equation
2
226, 2, 1.0, 999999, 2, -1.0
*Equation
2
227, 2, 1.0, 999999, 2, -1.0
*Equation
2
228, 2, 1.0, 999999, 2, -1.0
*Equation
2
229, 2, 1.0, 999999, 2, -1.0
*Equation
2
230, 2, 1.0, 999999, 2, -1.0
*Equation
2
231, 2, 1.0, 999999, 2, -1.0
*Equation
2
232, 2, 1.0, 999999, 2, -1.0
*Equation
2
233, 2, 1.0, 999999, 2, -1.0
*Equation
2
234, 2, 1.0, 999999, 2, -1.0
*Equation
2
235, 2, 1.0, 999999, 2, -1.0
*Equation
2
236, 2, 1.0, 999999, 2, -1.0
*Equation
2
237, 2, 1.0, 999999, 2, -1.0
*Equation
2
238, 2, 1.0, 999999, 2, -1.0
*Equation
2
239, 2, 1.0, 999999, 2, -1.0
*Equation
2
240, 2, 1.0, 999999, 2, -1.0
*Equation
2
241, 2, 1.0, 999999, 2, -1.0
*Equation
2
242, 2, 1.0, 999999, 2, -1.0
*Equation
2
243, 2, 1.0, 999999, 2, -1.0
*Equation
2
244, 2, 1.0, 999999, 2, -1.0
*Equation
2
245, 2, 1.0, 999999, 2, -1.0
*Equation
2
246, 2, 1.0, 999999, 2, -1.0
*Equation
2
247, 2, 1.0, 999999, 2, -1.0
*Equation
2
248, 2, 1.0, 999999, 2, -1.0
*Equation
2
249, 2, 1.0, 999999, 2, -1.0
*Equation
2
250, 2, 1.0, 999999, 2, -1.0
*Equation
2
251, 2, 1.0, 999999, 2, -1.0
*Equation
2
252, 2, 1.0, 999999, 2, -1.0
*Equation
2
253, 2, 1.0, 999999, 2, -1.0
*Equation
2
254, 2, 1.0, 999999, 2, -1.0
*Equation
2
255, 2, 1.0, 999999, 2, -1.0
*Equation
2
256, 2, 1.0, 999999, 2, -1.0
*Equation
2
257, 2, 1.0, 999999, 2, -1.0
*Equation
2
258, 2, 1.0, 999999, 2, -1.0
*Equation
2
259, 2, 1.0, 999999, 2, -1.0
*Equation
2
260, 2, 1.0, 999999, 2, -1.0
*Equation
2
261, 2, 1.0, 999999, 2, -1.0
*Equation
2
262, 2, 1.0, 999999, 2, -1.0
*Equation
2
263, 2, 1.0, 999999, 2, -1.0
*Equation
2
264, 2, 1.0, 999999, 2, -1.0
*Equation
2
265, 2, 1.0, 999999, 2, -1.0
*Equation
2
266, 2, 1.0, 999999, 2, -1.0
*Equation
2
267, 2, 1.0, 999999, 2, -1.0
*Equation
2
268, 2, 1.0, 999999, 2, -1.0
*Equation
2
269, 2, 1.0, 999999, 2, -1.0
*Equation
2
270, 2, 1.0, 999999, 2, -1.0
*Equation
2
271, 2, 1.0, 999999, 2, -1.0
*Equation
2
272, 2, 1.0, 999999, 2, -1.0
*Equation
2
273, 2, 1.0, 999999, 2, -1.0
*Equation
2
274, 2, 1.0, 999999, 2, -1.0
*Equation
2
275, 2, 1.0, 999999, 2, -1.0
*Equation
2
276, 2, 1.0, 999999, 2, -1.0
*Equation
2
277, 2, 1.0, 999999, 2, -1.0
*Equation
2
278, 2, 1.0, 999999, 2, -1.0
*Equation
2
279, 2, 1.0, 999999, 2, -1.0
*Equation
2
280, 2, 1.0, 999999, 2, -1.0
*Equation
2
281, 2, 1.0, 999999, 2, -1.0
*Equation
2
282, 2, 1.0, 999999, 2, -1.0
*Equation
2
283, 2, 1.0, 999999, 2, -1.0
*Equation
2
284, 2, 1.0, 999999, 2, -1.0
*Equation
2
285, 2, 1.0, 999999, 2, -1.0
*Equation
2
286, 2, 1.0, 999999, 2, -1.0
*Equation
2
287, 2, 1.0, 999999, 2, -1.0
*Equation
2
288, 2, 1.0, 999999, 2, -1.0
*Equation
2
289, 2, 1.0, 999999, 2, -1.0
*Equation
2
290, 2, 1.0, 999999, 2, -1.0
*Equation
2
291, 2, 1.0, 999999, 2, -1.0
*Equation
2
292, 2, 1.0, 999999, 2, -1.0
*Equation
2
293, 2, 1.0, 999999, 2, -1.0
*Equation
2
294, 2, 1.0, 999999, 2, -1.0
*Equation
2
295, 2, 1.0, 999999, 2, -1.0
*Equation
2
296, 2, 1.0, 999999, 2, -1.0
*Equation
2
297, 2, 1.0, 999999, 2, -1.0
*Equation
2
298, 2, 1.0, 999999, 2, -1.0
*Equation
2
299, 2, 1.0, 999999, 2, -1.0
*Equation
2
300, 2, 1.0, 999999, 2, -1.0
*Equation
2
301, 2, 1.0, 999999, 2, -1.0
*Equation
2
302, 2, 1.0, 999999, 2, -1.0
*Equation
2
303, 2, 1.0, 999999, 2, -1.0
*Equation
2
304, 2, 1.0, 999999, 2, -1.0
*Equation
2
305, 2, 1.0, 999999, 2, -1.0
*Equation
2
306, 2, 1.0, 999999, 2, -1.0
*Equation
2
307, 2, 1.0, 999999, 2, -1.0
*Equation
2
308, 2, 1.0, 999999, 2, -1.0
*Equation
2
309, 2, 1.0, 999999, 2, -1.0
*Equation
2
310, 2, 1.0, 999999, 2, -1.0
*Equation
2
311, 2, 1.0, 999999, 2, -1.0
*Equation
2
312, 2, 1.0, 999999, 2, -1.0
*Equation
2
313, 2, 1.0, 999999, 2, -1.0
*Equation
2
314, 2, 1.0, 999999, 2, -1.0
*Equation
2
315, 2, 1.0, 999999, 2, -1.0
*Equation
2
316, 2, 1.0, 999999, 2, -1.0
*Equation
2
317, 2, 1.0, 999999, 2, -1.0
*Equation
2
318, 2, 1.0, 999999, 2, -1.0
*Equation
2
319, 2, 1.0, 999999, 2, -1.0
*Equation
2
320, 2, 1.0, 999999, 2, -1.0
*Equation
2
321, 2, 1.0, 999999, 2, -1.0
*Equation
2
322, 2, 1.0, 999999, 2, -1.0
*Equation
2
323, 2, 1.0, 999999, 2, -1.0
*Equation
2
324, 2, 1.0, 999999, 2, -1.0
*Equation
2
325, 2, 1.0, 999999, 2, -1.0
*Equation
2
326, 2, 1.0, 999999, 2, -1.0
*Equation
2
327, 2, 1.0, 999999, 2, -1.0
*Equation
2
328, 2, 1.0, 999999, 2, -1.0
*Equation
2
329, 2, 1.0, 999999, 2, -1.0
*Equation
2
330, 2, 1.0, 999999, 2, -1.0
*Equation
2
331, 2, 1.0, 999999, 2, -1.0
*Equation
2
332, 2, 1.0, 999999, 2, -1.0
*Equation
2
333, 2, 1.0, 999999, 2, -1.0
*Equation
2
334, 2, 1.0, 999999, 2, -1.0
*Equation
2
335, 2, 1.0, 999999, 2, -1.0
*Equation
2
336, 2, 1.0, 999999, 2, -1.0
*Equation
2
337, 2, 1.0, 999999, 2, -1.0
*Equation
2
338, 2, 1.0, 999999, 2, -1.0
** ==========================================================
** STEP 1: Monotonic Tensile Loading to u = 0.0050 mm
** ==========================================================
*Step, name=Step-1, nlgeom=NO, inc=6000
*Static
 5.0E-4, 1.0, 1.0E-9, 5.0E-4
*Boundary
 N_BOTTOM, 2, 2, 0.0
 N_PIN, 1, 1, 0.0
 N_TOP, 1, 1, 0.0
 N_RP, 2, 2, 0.0050
*Restart, write, frequency=0
*Output, field, frequency=1
*Node Output, nset=N_RP
 U, RF
*Element Output, elset=DISP_QUAD
 SDV
*Node Print, freq=1, nset=N_RP
 U2, RF2
*End Step
** ==========================================================
** STEP 2: Monotonic Tensile Loading to u = 0.0100 mm
** ==========================================================
*Step, name=Step-2, nlgeom=NO, inc=6000
*Static
 2.0E-4, 1.0, 1.0E-9, 2.0E-4
*Boundary
 N_RP, 2, 2, 0.0100
*Restart, write, frequency=0
*Output, field, frequency=1
*Node Output, nset=N_RP
 U, RF
*Element Output, elset=DISP_QUAD
 SDV
*Node Print, freq=1, nset=N_RP
 U2, RF2
*End Step
