*Heading
** Job name: PK_MODE1_PROPOSED_PFM_PHYS Model name: PK_MODE1_SHARP_ADAPT
** Generated by: Abaqus/CAE 2023
*Preprint, echo=NO, model=NO, history=NO, contact=NO
**
** PARTS
**
*Part, name=Plate
*Node
      1,  0.968595982,           0.
      2,   0.95054698,           0.
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*Element, type=CPE3
   1, 61345,   670, 61270
   2, 39182, 38715, 39150
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*Element, type=CPE4
 1878,  2180,  1430,  1429,  2976
 1879,  1935,  2070,  2125,  1936
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*Nset, nset=_PickedSet5, internal, generate
     1,  70845,      1
*Elset, elset=_PickedSet5, internal, generate
     1,  71320,      1
** Section: SolidSec
*Solid Section, elset=_PickedSet5, material=Steel
1.,
*End Part
**
**
** ASSEMBLY
**
*Assembly, name=Assembly
**
*Instance, name=Plate-1, part=Plate
*End Instance
**
*Nset, nset=Bottom, instance=Plate-1
    1,    2,    3,    4,    5,    6
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*Elset, elset=Bottom, instance=Plate-1
  1878,  1897,  1917,  1936,  1955,  1972
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*Nset, nset=Pin, instance=Plate-1
 37,
*Nset, nset=Top, instance=Plate-1
   73,   74,   75,   76,   77,   78
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*Elset, elset=Top, instance=Plate-1
  2258,  2311,  2312,  2313,  2364,  2400
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*Nset, nset=_PickedSet3, internal, instance=Plate-1, generate
     1,  70845,      1
*Elset, elset=_PickedSet3, internal, instance=Plate-1, generate
     1,  71320,      1
*Nset, nset=_PickedSet7, internal, instance=Plate-1, generate
     1,  70845,      1
*Elset, elset=_PickedSet7, internal, instance=Plate-1, generate
     1,  71320,      1
*End Assembly
**
** MATERIALS
**
*Material, name=Steel
*Elastic
210., 0.3
** ----------------------------------------------------------------
**
** STEP: Step-1
**
*Step, name=Step-1, nlgeom=NO
*Static
0.1, 1., 1e-05, 0.1
**
** BOUNDARY CONDITIONS
**
** Name: FixBottom Type: Displacement/Rotation
*Boundary
Bottom, 2, 2
** Name: FixPin Type: Displacement/Rotation
*Boundary
Pin, 1, 1
** Name: TensionTop Type: Displacement/Rotation
*Boundary
Top, 1, 1
Top, 2, 2, 0.005
**
** OUTPUT REQUESTS
**
*Restart, write, frequency=0
**
** FIELD OUTPUT: F-Output-1
**
*Output, field
*Node Output, nset=_PickedSet3
RF, U
*Element Output, elset=_PickedSet3, directions=YES
E, EVOL, MISESAVG, MISESERI, S
**
** FIELD OUTPUT:  from REMESHING RULE: RR: 1
** Publication-faithful Remeshing Rule for Proposed PFM (errorTarget=1.0%)
**
*Element Output, elset=_PickedSet7, directions=YES
MISESERI, MISESAVG, S, EVOL
**
** HISTORY OUTPUT: H-Output-1
**
*Output, history, variable=PRESELECT
*End Step
