*Heading
** Small Mode-I Verification Model (64 Quads, 85 Nodes)
** Geometry: 1.0 x 1.0 mm, slit at y=0.5 (a0=0.5 mm)
** Material: E=210.0 kN/mm^2, nu=0.3, Gc=0.0027 kN/mm, l0=0.0075 mm, k=1.0e-7
*Preprint, echo=NO, model=NO, history=NO, contact=NO
** ==========================================================
** USER ELEMENTS (Phase U1: 1..NPHYS, Mech U2: NPHYS+1..2*NPHYS)
** ==========================================================
*USER ELEMENT, TYPE=U1, NODES=4, COORDINATES=2, PROPERTIES=6, VARIABLES=18, UNSYMM
3
*USER ELEMENT, TYPE=U2, NODES=4, COORDINATES=2, PROPERTIES=6, VARIABLES=18, UNSYMM
1, 2
** ==========================================================
** NODES
** ==========================================================
*Node
1, 0.0000000000, 0.0000000000
2, 0.1250000000, 0.0000000000
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** ==========================================================
** LAYER 1: Phase-Field User Elements (1..64)
** ==========================================================
*Element, type=U1, elset=PHASE_QUADS
1, 1, 2, 11, 10
2, 2, 3, 12, 11
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** ==========================================================
** LAYER 2: Mechanical User Elements (65..128)
** ==========================================================
*Element, type=U2, elset=MECH_QUADS
65, 1, 2, 11, 10
66, 2, 3, 12, 11
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** ==========================================================
** LAYER 3: Visualization CPE4 Elements (129..192)
** ==========================================================
*Element, type=CPE4, elset=VIS_QUADS
129, 1, 2, 11, 10
130, 2, 3, 12, 11
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*Elset, elset=umatelem
VIS_QUADS
*Nset, nset=N_BOTTOM
1, 2, 3, 4, 5, 6, 7, 8, 9
*Nset, nset=N_TOP
73, 74, 75, 76, 77, 78, 79, 80, 81
*Nset, nset=N_PIN
1
*Nset, nset=N_RP
999999
*UEL PROPERTY, ELSET=PHASE_QUADS
0.0075, 0.0027, 210.0, 0.3, 1.0e-7, 64.
*UEL PROPERTY, ELSET=MECH_QUADS
0.0075, 0.0027, 210.0, 0.3, 1.0e-7, 64.
*Solid Section, elset=VIS_QUADS, material=DUMMY_MAT
1.0
*Material, name=DUMMY_MAT
*User Material, constants=3
210.0, 0.3, 64.
*Depvar
18
** Coupling Equations for Rigid Pull
*Equation
2
73, 2, 1.0, 999999, 2, -1.0
*Equation
2
74, 2, 1.0, 999999, 2, -1.0
*Equation
2
75, 2, 1.0, 999999, 2, -1.0
*Equation
2
76, 2, 1.0, 999999, 2, -1.0
*Equation
2
77, 2, 1.0, 999999, 2, -1.0
*Equation
2
78, 2, 1.0, 999999, 2, -1.0
*Equation
2
79, 2, 1.0, 999999, 2, -1.0
*Equation
2
80, 2, 1.0, 999999, 2, -1.0
*Equation
2
81, 2, 1.0, 999999, 2, -1.0
** ==========================================================
** STEP 1: Monotonic Tensile Loading to u = 0.0010 mm (5 incs)
** ==========================================================
** ==========================================================
** STEP 1: Monotonic Tensile Loading to u = 0.0010 mm (5 incs)
** ==========================================================
*Step, name=Step-1, nlgeom=NO, inc=100
*Static
0.2, 1.0, 1.0E-5, 0.2
*Boundary
N_BOTTOM, 2, 2, 0.0
N_PIN, 1, 1, 0.0
N_TOP, 1, 1, 0.0
N_RP, 2, 2, 0.0010
*Restart, write, frequency=0
*Output, field, frequency=1
*Node Output, nset=N_RP
U, RF
*Node Output
U, RF
*Element Output, elset=PHASE_QUADS
SDV
*Element Output, elset=MECH_QUADS
SDV
*Element Output, elset=umatelem
SDV, S, E
*Output, history, frequency=1
*Energy Output
ALLSE, ALLIE, ALLWK, ALLFD, ALLCD, ALLVD, ALLPD, ALLAE, ETOTAL
*Node Output, nset=N_RP
U2, RF2
*Node Print, freq=1, nset=N_RP
U2, RF2
*End Step
** ==========================================================
** STEP 2: Monotonic Tensile Loading to u = 0.0060 mm (25 incs)
** ==========================================================
*Step, name=Step-2, nlgeom=NO, inc=500
*Static
0.04, 1.0, 1.0E-6, 0.04
*Boundary
N_RP, 2, 2, 0.0060
*Restart, write, frequency=0
*Output, field, frequency=1
*Node Output, nset=N_RP
U, RF
*Node Output
U, RF
*Element Output, elset=PHASE_QUADS
SDV
*Element Output, elset=MECH_QUADS
SDV
*Element Output, elset=umatelem
SDV, S, E
*Output, history, frequency=1
*Energy Output
ALLSE, ALLIE, ALLWK, ALLFD, ALLCD, ALLVD, ALLPD, ALLAE, ETOTAL
*Node Output, nset=N_RP
U2, RF2
*Node Print, freq=1, nset=N_RP
U2, RF2
*End Step
