*HEADING
PK_M1_STAGE14_ADAPT_14K_FRACTURE - 3-Layer UEL Fracture Solve
** Finite Elements: 14483 (14082 quads, 401 tris), Nodes: 14456
** Parameters: E=210 GPa, nu=0.3, l0=0.0075 mm, Gc=0.0027 kN/mm, eta=1e-7
** ----------------------------------------------------------
*USER ELEMENT, TYPE=U1, NODES=4, COORDINATES=2, PROPERTIES=6, VARIABLES=18, UNSYMM
3
*USER ELEMENT, TYPE=U2, NODES=4, COORDINATES=2, PROPERTIES=6, VARIABLES=18, UNSYMM
1, 2
*USER ELEMENT, TYPE=U3, NODES=3, COORDINATES=2, PROPERTIES=6, VARIABLES=18, UNSYMM
3
*USER ELEMENT, TYPE=U4, NODES=3, COORDINATES=2, PROPERTIES=6, VARIABLES=18, UNSYMM
1, 2
*NODE
1, 0.9604716300, 0.0000000000
2, 0.9406933780, 0.0000000000
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*ELEMENT, TYPE=U1, ELSET=PHASE_QUADS
1, 991, 10356, 1111, 33
2, 1111, 10356, 10458, 130
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*ELEMENT, TYPE=U3, ELSET=PHASE_TRIS
14083, 11391, 11271, 213
14084, 11739, 11532, 11382
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*ELEMENT, TYPE=U2, ELSET=MECH_QUADS
14484, 991, 10356, 1111, 33
14485, 1111, 10356, 10458, 130
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*ELEMENT, TYPE=U4, ELSET=MECH_TRIS
28566, 11391, 11271, 213
28567, 11739, 11532, 11382
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*ELEMENT, TYPE=CPE4, ELSET=UMAT_QUADS
28967, 991, 10356, 1111, 33
28968, 1111, 10356, 10458, 130
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*ELEMENT, TYPE=CPE3, ELSET=UMAT_TRIS
43049, 11391, 11271, 213
43050, 11739, 11532, 11382
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*ELSET, ELSET=PHASE_ELEM
PHASE_QUADS, PHASE_TRIS
*ELSET, ELSET=MECH_ELEM
MECH_QUADS, MECH_TRIS
*ELSET, ELSET=UMATELEM
UMAT_QUADS, UMAT_TRIS
*ELSET, ELSET=All_elem
PHASE_ELEM, MECH_ELEM, UMATELEM
*UEL PROPERTY, ELSET=PHASE_ELEM
 0.0075, 0.0027, 210.0, 0.3, 1.0e-7, 14483.0
*UEL PROPERTY, ELSET=MECH_ELEM
 0.0075, 0.0027, 210.0, 0.3, 1.0e-7, 14483.0
*SOLID SECTION, ELSET=UMATELEM, MATERIAL=UMAT_MAT
 1.0,
*MATERIAL, NAME=UMAT_MAT
*USER MATERIAL, CONSTANTS=3
 210.0, 0.3, 14483.
*DEPVAR
 20
*NSET, NSET=N_BOTTOM
1, 2, 3, 4, 5, 6
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*NSET, NSET=N_TOP
65, 66, 67, 68, 69, 70
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*NSET, NSET=N_PIN
33
*NSET, NSET=N_RP
999999
** ==========================================================
** KINEMATIC CONSTRAINTS: N_TOP coupling to N_RP (u_y)
** ==========================================================
*EQUATION
2
65, 2, 1.0, 999999, 2, -1.0
*EQUATION
2
66, 2, 1.0, 999999, 2, -1.0
*EQUATION
2
67, 2, 1.0, 999999, 2, -1.0
*EQUATION
2
68, 2, 1.0, 999999, 2, -1.0
*EQUATION
2
69, 2, 1.0, 999999, 2, -1.0
*EQUATION
2
70, 2, 1.0, 999999, 2, -1.0
*EQUATION
2
71, 2, 1.0, 999999, 2, -1.0
*EQUATION
2
72, 2, 1.0, 999999, 2, -1.0
*EQUATION
2
73, 2, 1.0, 999999, 2, -1.0
*EQUATION
2
74, 2, 1.0, 999999, 2, -1.0
*EQUATION
2
75, 2, 1.0, 999999, 2, -1.0
*EQUATION
2
76, 2, 1.0, 999999, 2, -1.0
*EQUATION
2
77, 2, 1.0, 999999, 2, -1.0
*EQUATION
2
78, 2, 1.0, 999999, 2, -1.0
*EQUATION
2
79, 2, 1.0, 999999, 2, -1.0
*EQUATION
2
80, 2, 1.0, 999999, 2, -1.0
*EQUATION
2
81, 2, 1.0, 999999, 2, -1.0
*EQUATION
2
82, 2, 1.0, 999999, 2, -1.0
*EQUATION
2
83, 2, 1.0, 999999, 2, -1.0
*EQUATION
2
84, 2, 1.0, 999999, 2, -1.0
*EQUATION
2
85, 2, 1.0, 999999, 2, -1.0
*EQUATION
2
86, 2, 1.0, 999999, 2, -1.0
*EQUATION
2
87, 2, 1.0, 999999, 2, -1.0
*EQUATION
2
88, 2, 1.0, 999999, 2, -1.0
*EQUATION
2
89, 2, 1.0, 999999, 2, -1.0
*EQUATION
2
90, 2, 1.0, 999999, 2, -1.0
*EQUATION
2
91, 2, 1.0, 999999, 2, -1.0
*EQUATION
2
92, 2, 1.0, 999999, 2, -1.0
*EQUATION
2
93, 2, 1.0, 999999, 2, -1.0
*EQUATION
2
94, 2, 1.0, 999999, 2, -1.0
*EQUATION
2
95, 2, 1.0, 999999, 2, -1.0
*EQUATION
2
96, 2, 1.0, 999999, 2, -1.0
*EQUATION
2
97, 2, 1.0, 999999, 2, -1.0
*EQUATION
2
1045, 2, 1.0, 999999, 2, -1.0
*EQUATION
2
1046, 2, 1.0, 999999, 2, -1.0
*EQUATION
2
1047, 2, 1.0, 999999, 2, -1.0
*EQUATION
2
1048, 2, 1.0, 999999, 2, -1.0
*EQUATION
2
1049, 2, 1.0, 999999, 2, -1.0
*EQUATION
2
1050, 2, 1.0, 999999, 2, -1.0
*EQUATION
2
1051, 2, 1.0, 999999, 2, -1.0
*EQUATION
2
1052, 2, 1.0, 999999, 2, -1.0
*EQUATION
2
1053, 2, 1.0, 999999, 2, -1.0
*EQUATION
2
1054, 2, 1.0, 999999, 2, -1.0
*EQUATION
2
1055, 2, 1.0, 999999, 2, -1.0
*EQUATION
2
1056, 2, 1.0, 999999, 2, -1.0
*EQUATION
2
1057, 2, 1.0, 999999, 2, -1.0
*EQUATION
2
1058, 2, 1.0, 999999, 2, -1.0
*EQUATION
2
1059, 2, 1.0, 999999, 2, -1.0
*EQUATION
2
1060, 2, 1.0, 999999, 2, -1.0
*EQUATION
2
1061, 2, 1.0, 999999, 2, -1.0
*EQUATION
2
1062, 2, 1.0, 999999, 2, -1.0
*EQUATION
2
1063, 2, 1.0, 999999, 2, -1.0
** ==========================================================
** STEP 1: Monotonic Tensile Loading to u = 0.0050 mm
** ==========================================================
*STEP, NAME=Step-1, NLGEOM=NO, INC=2500
*STATIC
 5.0E-4, 1.0, 1.0E-9, 5.0E-4
*BOUNDARY
 N_BOTTOM, 2, 2, 0.0
 N_PIN, 1, 1, 0.0
 N_TOP, 1, 1, 0.0
 N_RP, 2, 2, 0.0050
*RESTART, WRITE, FREQUENCY=0
*OUTPUT, FIELD, FREQUENCY=1
*NODE OUTPUT, NSET=N_RP
 U, RF
*ELEMENT OUTPUT, ELSET=All_elem
 SDV
*NODE PRINT, FREQ=1, NSET=N_RP
 U2, RF2
*END STEP
** ==========================================================
** STEP 2: Monotonic Tensile Loading to u = 0.0100 mm
** ==========================================================
*STEP, NAME=Step-2, NLGEOM=NO, INC=6000
*STATIC
 2.0E-4, 1.0, 1.0E-9, 2.0E-4
*CONTROLS, PARAMETERS=TIME INCREMENTATION
 4, 10, 9, 20, 10, 4, 0, 10
*CONTROLS, PARAMETERS=FIELD, FIELD=DISPLACEMENT
0.005, 0.50
*BOUNDARY
 N_RP, 2, 2, 0.0100
*RESTART, WRITE, FREQUENCY=0
*OUTPUT, FIELD, FREQUENCY=1
*NODE OUTPUT, NSET=N_RP
 U, RF
*ELEMENT OUTPUT, ELSET=All_elem
 SDV
*NODE PRINT, FREQ=1, NSET=N_RP
 U2, RF2
*END STEP
