*HEADING
PK_MODE1_STAGE14_ADAPT_SPATIAL_FINE_FRACTURE - 3-Layer UEL Spatial Fine Fracture Solve
** Finite Elements: 57929 (56339 quads, 1590 tris), Nodes: 57491
** Parameters: E=210 GPa, nu=0.3, l0=0.0075 mm, Gc=0.0027 kN/mm, eta=1e-7
** Stage 14U-AM: minElementSize=0.0005 mm (0.5 um resolution floor)
** ----------------------------------------------------------
*USER ELEMENT, TYPE=U1, NODES=4, COORDINATES=2, PROPERTIES=6, VARIABLES=18, UNSYMM
3
*USER ELEMENT, TYPE=U2, NODES=4, COORDINATES=2, PROPERTIES=6, VARIABLES=18, UNSYMM
1, 2
*USER ELEMENT, TYPE=U3, NODES=3, COORDINATES=2, PROPERTIES=6, VARIABLES=18, UNSYMM
3
*USER ELEMENT, TYPE=U4, NODES=3, COORDINATES=2, PROPERTIES=6, VARIABLES=18, UNSYMM
1, 2
*NODE
1, 0.9713330860, 0.0000000000
2, 0.9473867420, 0.0000000000
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*ELEMENT, TYPE=U1, ELSET=PHASE_QUAD
1591, 48540, 48534, 1827, 1826
1592, 49444, 49599, 49612, 49524
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*ELEMENT, TYPE=U3, ELSET=PHASE_TRI
1, 15895, 15397, 15819
2, 27643, 26638, 27618
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*ELEMENT, TYPE=U2, ELSET=MECH_QUAD
59520, 48540, 48534, 1827, 1826
59521, 49444, 49599, 49612, 49524
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*ELEMENT, TYPE=U4, ELSET=MECH_TRI
57930, 15895, 15397, 15819
57931, 27643, 26638, 27618
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*ELEMENT, TYPE=CPE4, ELSET=UMAT_QUADS
117449, 48540, 48534, 1827, 1826
117450, 49444, 49599, 49612, 49524
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*ELEMENT, TYPE=CPE3, ELSET=UMAT_TRIS
115859, 15895, 15397, 15819
115860, 27643, 26638, 27618
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*ELSET, ELSET=PHASE_ELEM
1, 2, 3, 4, 5, 6
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*ELSET, ELSET=MECH_ELEM
57930, 57931, 57932, 57933, 57934, 57935
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*ELSET, ELSET=UMATELEM
115859, 115860, 115861, 115862, 115863, 115864
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*ELSET, ELSET=All_elem
UMATELEM
*NSET, NSET=N_BOTTOM
1, 2, 3, 4, 5, 6
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*NSET, NSET=N_PIN
39
*NSET, NSET=N_TOP
77, 78, 79, 80, 81, 82
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*NSET, NSET=N_RP
999999
*UEL PROPERTY, ELSET=PHASE_ELEM
0.0075, 0.0027, 210.0, 0.3, 1.0e-7, 57929.0
*UEL PROPERTY, ELSET=MECH_ELEM
0.0075, 0.0027, 210.0, 0.3, 1.0e-7, 57929.0
*SOLID SECTION, ELSET=UMATELEM, MATERIAL=UMAT_MAT
1.0,
*MATERIAL, NAME=UMAT_MAT
*USER MATERIAL, CONSTANTS=2
210000.0, 0.3
*DEPVAR
16
** EQUATIONS (Rigid top tensile pull tied to RP)
*EQUATION
2
77, 2, 1.0, 999999, 2, -1.0
*EQUATION
2
78, 2, 1.0, 999999, 2, -1.0
*EQUATION
2
79, 2, 1.0, 999999, 2, -1.0
*EQUATION
2
80, 2, 1.0, 999999, 2, -1.0
*EQUATION
2
81, 2, 1.0, 999999, 2, -1.0
*EQUATION
2
82, 2, 1.0, 999999, 2, -1.0
*EQUATION
2
83, 2, 1.0, 999999, 2, -1.0
*EQUATION
2
84, 2, 1.0, 999999, 2, -1.0
*EQUATION
2
85, 2, 1.0, 999999, 2, -1.0
*EQUATION
2
86, 2, 1.0, 999999, 2, -1.0
*EQUATION
2
87, 2, 1.0, 999999, 2, -1.0
*EQUATION
2
88, 2, 1.0, 999999, 2, -1.0
*EQUATION
2
89, 2, 1.0, 999999, 2, -1.0
*EQUATION
2
90, 2, 1.0, 999999, 2, -1.0
*EQUATION
2
91, 2, 1.0, 999999, 2, -1.0
*EQUATION
2
92, 2, 1.0, 999999, 2, -1.0
*EQUATION
2
93, 2, 1.0, 999999, 2, -1.0
*EQUATION
2
94, 2, 1.0, 999999, 2, -1.0
*EQUATION
2
95, 2, 1.0, 999999, 2, -1.0
*EQUATION
2
96, 2, 1.0, 999999, 2, -1.0
*EQUATION
2
97, 2, 1.0, 999999, 2, -1.0
*EQUATION
2
98, 2, 1.0, 999999, 2, -1.0
*EQUATION
2
99, 2, 1.0, 999999, 2, -1.0
*EQUATION
2
100, 2, 1.0, 999999, 2, -1.0
*EQUATION
2
101, 2, 1.0, 999999, 2, -1.0
*EQUATION
2
102, 2, 1.0, 999999, 2, -1.0
*EQUATION
2
103, 2, 1.0, 999999, 2, -1.0
*EQUATION
2
104, 2, 1.0, 999999, 2, -1.0
*EQUATION
2
105, 2, 1.0, 999999, 2, -1.0
*EQUATION
2
106, 2, 1.0, 999999, 2, -1.0
*EQUATION
2
107, 2, 1.0, 999999, 2, -1.0
*EQUATION
2
108, 2, 1.0, 999999, 2, -1.0
*EQUATION
2
109, 2, 1.0, 999999, 2, -1.0
*EQUATION
2
110, 2, 1.0, 999999, 2, -1.0
*EQUATION
2
111, 2, 1.0, 999999, 2, -1.0
*EQUATION
2
112, 2, 1.0, 999999, 2, -1.0
*EQUATION
2
113, 2, 1.0, 999999, 2, -1.0
*EQUATION
2
114, 2, 1.0, 999999, 2, -1.0
*EQUATION
2
115, 2, 1.0, 999999, 2, -1.0
*EQUATION
2
1633, 2, 1.0, 999999, 2, -1.0
*EQUATION
2
1634, 2, 1.0, 999999, 2, -1.0
*EQUATION
2
1635, 2, 1.0, 999999, 2, -1.0
*EQUATION
2
1636, 2, 1.0, 999999, 2, -1.0
*EQUATION
2
1637, 2, 1.0, 999999, 2, -1.0
*EQUATION
2
1638, 2, 1.0, 999999, 2, -1.0
*EQUATION
2
1639, 2, 1.0, 999999, 2, -1.0
*EQUATION
2
1640, 2, 1.0, 999999, 2, -1.0
*EQUATION
2
1641, 2, 1.0, 999999, 2, -1.0
*EQUATION
2
1642, 2, 1.0, 999999, 2, -1.0
*EQUATION
2
1643, 2, 1.0, 999999, 2, -1.0
*EQUATION
2
1644, 2, 1.0, 999999, 2, -1.0
*EQUATION
2
1645, 2, 1.0, 999999, 2, -1.0
*EQUATION
2
1646, 2, 1.0, 999999, 2, -1.0
*EQUATION
2
1647, 2, 1.0, 999999, 2, -1.0
*EQUATION
2
1648, 2, 1.0, 999999, 2, -1.0
*EQUATION
2
1649, 2, 1.0, 999999, 2, -1.0
*EQUATION
2
1650, 2, 1.0, 999999, 2, -1.0
*EQUATION
2
1651, 2, 1.0, 999999, 2, -1.0
*EQUATION
2
1652, 2, 1.0, 999999, 2, -1.0
*EQUATION
2
1653, 2, 1.0, 999999, 2, -1.0
*EQUATION
2
1654, 2, 1.0, 999999, 2, -1.0
*EQUATION
2
1655, 2, 1.0, 999999, 2, -1.0
*EQUATION
2
1656, 2, 1.0, 999999, 2, -1.0
*EQUATION
2
1657, 2, 1.0, 999999, 2, -1.0
*EQUATION
2
1658, 2, 1.0, 999999, 2, -1.0
*EQUATION
2
1659, 2, 1.0, 999999, 2, -1.0
*EQUATION
2
1660, 2, 1.0, 999999, 2, -1.0
*EQUATION
2
1661, 2, 1.0, 999999, 2, -1.0
*EQUATION
2
1662, 2, 1.0, 999999, 2, -1.0
*EQUATION
2
1663, 2, 1.0, 999999, 2, -1.0
*EQUATION
2
1664, 2, 1.0, 999999, 2, -1.0
*EQUATION
2
1665, 2, 1.0, 999999, 2, -1.0
*EQUATION
2
1666, 2, 1.0, 999999, 2, -1.0
*EQUATION
2
1667, 2, 1.0, 999999, 2, -1.0
*EQUATION
2
1668, 2, 1.0, 999999, 2, -1.0
*EQUATION
2
1669, 2, 1.0, 999999, 2, -1.0
*EQUATION
2
1670, 2, 1.0, 999999, 2, -1.0
*EQUATION
2
1671, 2, 1.0, 999999, 2, -1.0
*EQUATION
2
1672, 2, 1.0, 999999, 2, -1.0
*EQUATION
2
1673, 2, 1.0, 999999, 2, -1.0
*EQUATION
2
1674, 2, 1.0, 999999, 2, -1.0
*EQUATION
2
1675, 2, 1.0, 999999, 2, -1.0
*EQUATION
2
1676, 2, 1.0, 999999, 2, -1.0
*EQUATION
2
1677, 2, 1.0, 999999, 2, -1.0
*EQUATION
2
1678, 2, 1.0, 999999, 2, -1.0
*EQUATION
2
1679, 2, 1.0, 999999, 2, -1.0
*EQUATION
2
1680, 2, 1.0, 999999, 2, -1.0
*EQUATION
2
1681, 2, 1.0, 999999, 2, -1.0
*EQUATION
2
1682, 2, 1.0, 999999, 2, -1.0
*EQUATION
2
1683, 2, 1.0, 999999, 2, -1.0
*EQUATION
2
1684, 2, 1.0, 999999, 2, -1.0
*EQUATION
2
1685, 2, 1.0, 999999, 2, -1.0
*EQUATION
2
1686, 2, 1.0, 999999, 2, -1.0
*EQUATION
2
1687, 2, 1.0, 999999, 2, -1.0
*EQUATION
2
1688, 2, 1.0, 999999, 2, -1.0
*EQUATION
2
1689, 2, 1.0, 999999, 2, -1.0
*EQUATION
2
1690, 2, 1.0, 999999, 2, -1.0
*EQUATION
2
1691, 2, 1.0, 999999, 2, -1.0
*EQUATION
2
1692, 2, 1.0, 999999, 2, -1.0
*EQUATION
2
1693, 2, 1.0, 999999, 2, -1.0
*EQUATION
2
1694, 2, 1.0, 999999, 2, -1.0
*EQUATION
2
1695, 2, 1.0, 999999, 2, -1.0
*EQUATION
2
1696, 2, 1.0, 999999, 2, -1.0
*EQUATION
2
1697, 2, 1.0, 999999, 2, -1.0
*EQUATION
2
1698, 2, 1.0, 999999, 2, -1.0
*EQUATION
2
1699, 2, 1.0, 999999, 2, -1.0
*EQUATION
2
1700, 2, 1.0, 999999, 2, -1.0
*EQUATION
2
1701, 2, 1.0, 999999, 2, -1.0
*EQUATION
2
1702, 2, 1.0, 999999, 2, -1.0
*EQUATION
2
1703, 2, 1.0, 999999, 2, -1.0
*EQUATION
2
1704, 2, 1.0, 999999, 2, -1.0
*EQUATION
2
1705, 2, 1.0, 999999, 2, -1.0
*EQUATION
2
1706, 2, 1.0, 999999, 2, -1.0
*EQUATION
2
1707, 2, 1.0, 999999, 2, -1.0
*EQUATION
2
1708, 2, 1.0, 999999, 2, -1.0
*EQUATION
2
1709, 2, 1.0, 999999, 2, -1.0
*EQUATION
2
1710, 2, 1.0, 999999, 2, -1.0
** ----------------------------------------------------------
** STEP 1: Linear Loading to u = 0.005 mm
** ----------------------------------------------------------
*STEP, NAME=Step-1, NLGEOM=NO, INC=2500
*STATIC
5.0E-4, 1.0, 1.0E-9, 5.0E-4
*BOUNDARY
N_BOTTOM, 2, 2, 0.0
N_PIN, 1, 1, 0.0
N_TOP, 1, 1, 0.0
N_RP, 2, 2, 0.0050
*OUTPUT, FIELD, FREQUENCY=1
*NODE OUTPUT, NSET=N_RP
U, RF
*ELEMENT OUTPUT, ELSET=All_elem
S, MISESERI
*NODE PRINT, FREQ=1, NSET=N_RP
U2, RF2
*END STEP
** ----------------------------------------------------------
** STEP 2: Fracture Propagation to u = 0.010 mm
** ----------------------------------------------------------
*STEP, NAME=Step-2, NLGEOM=NO, INC=6000
*STATIC
2.0E-4, 1.0, 1.0E-9, 2.0E-4
*CONTROLS, PARAMETERS=TIME INCREMENTATION
4, 10, 9, 20, 10, 4, 0, 10
*BOUNDARY
N_RP, 2, 2, 0.0100
*RESTART, WRITE, FREQUENCY=0
*OUTPUT, FIELD, FREQUENCY=1
*NODE OUTPUT, NSET=N_RP
U, RF
*ELEMENT OUTPUT, ELSET=All_elem
S, MISESERI
*NODE PRINT, FREQ=1, NSET=N_RP
U2, RF2
*END STEP
