*Heading
 STEP2_ALL_INCS_CANDIDATE
** Job name: STEP2_ALL_INCS_CANDIDATE Model name: M1_DIAG_STEP2_ALL_INCS_CANDIDATE
** Generated by: Abaqus/CAE 2023
*Preprint, echo=NO, model=NO, history=NO, contact=NO
**
** PARTS
**
*Part, name=PART-1
*Node
      1,  0.974378228,           0.
      2,  0.942256212,           0.
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*Element, type=CPE3
   1,   669, 53125, 52929
   2, 53958, 52886,   699
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*Element, type=CPE4
 1629,  1399,  1398, 51741,  2416
 1630,  2416,  2421,  1850,  1849
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*Nset, nset=ALL_ELEM, generate
     1,  61646,      1
*Elset, elset=ALL_ELEM, generate
     1,  62057,      1
*Nset, nset=UMATELEM, generate
     1,  61646,      1
*Elset, elset=UMATELEM, generate
     1,  62057,      1
** Section: SolidSec
*Solid Section, elset=ALL_ELEM, material=Steel
1.,
*End Part
**
**
** ASSEMBLY
**
*Assembly, name=Assembly
**
*Instance, name=PART-1-1, part=PART-1
*End Instance
**
*End Assembly
**
** MATERIALS
**
*Material, name=Steel
*Elastic
210000., 0.3
** ----------------------------------------------------------------
**
** STEP: Step-1
**
*Step, name=Step-1, nlgeom=NO
*Static
0.002, 1., 1e-09, 0.002
**
** OUTPUT REQUESTS
**
*Restart, write, frequency=0
**
** FIELD OUTPUT: F-Output-1
**
*Output, field, variable=PRESELECT
**
** HISTORY OUTPUT: H-Output-1
**
*Output, history, variable=PRESELECT
*End Step
** ----------------------------------------------------------------
**
** STEP: Step-2
**
*Step, name=Step-2, nlgeom=NO
*Static
0.002, 1., 1e-09, 0.002
**
** OUTPUT REQUESTS
**
*Restart, write, frequency=0
**
** FIELD OUTPUT:  from REMESHING RULE: PK_RR_STEP2_ALL_INCS_CANDIDATE
** Isolated stepName diagnostic (errorTarget=1.0%)
**
*Output, field
*Element Output, elset=PART-1-1.ALL_ELEM, directions=YES
MISESERI, MISESAVG, S, EVOL
**
** FIELD OUTPUT: F-Output-1
**
*Output, field, variable=PRESELECT
**
** HISTORY OUTPUT: H-Output-1
**
*Output, history, variable=PRESELECT
*End Step
