*HEADING
PK_M1_JOB1_INF_COMPANION_2906 - Infinitesimal-Stiffness Companion-Stress Pre-Analysis Job-1_UEL
** Physical Mesh: 2906 elements (2818 quads, 88 tris), 2988 nodes
** Total Layered Elements: 8718
** Parameters: E=210 GPa, nu=0.3, l0=0.0075 mm, Gc=0.0027 kN/mm, k_residual=1e-7
** Lateral-Free Roller BCs: Top tied in DOF 2 only to N_RP, DOF 1 free
** ==========================================================
*PREPRINT, ECHO=NO, MODEL=NO, HISTORY=NO, CONTACT=NO
** ----------------------------------------------------------
** USER ELEMENT INTERFACES (f42_mixed_uel.for)
** ----------------------------------------------------------
*USER ELEMENT, TYPE=U1, NODES=4, COORDINATES=2, PROPERTIES=6, VARIABLES=18, UNSYMM
3
*USER ELEMENT, TYPE=U2, NODES=4, COORDINATES=2, PROPERTIES=6, VARIABLES=18, UNSYMM
1, 2
*USER ELEMENT, TYPE=U3, NODES=3, COORDINATES=2, PROPERTIES=6, VARIABLES=18, UNSYMM
3
*USER ELEMENT, TYPE=U4, NODES=3, COORDINATES=2, PROPERTIES=6, VARIABLES=18, UNSYMM
1, 2
** ----------------------------------------------------------
** NODES
** ----------------------------------------------------------
*NODE
1, 0.959999979, 0
2, 0.920000017, 0
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** ----------------------------------------------------------
** LAYER 1: PHASE-FIELD USER ELEMENTS (U1/U3)
** ----------------------------------------------------------
*ELEMENT, TYPE=U1, ELSET=PF_QUADS
89, 638, 23, 888, 2619
90, 2619, 766, 98, 717
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*ELEMENT, TYPE=U3, ELSET=PF_TRIS
1, 2673, 1504, 331
2, 1904, 1886, 1556
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** ----------------------------------------------------------
** LAYER 2: MECHANICAL DISPLACEMENT USER ELEMENTS (U2/U4)
** ----------------------------------------------------------
*ELEMENT, TYPE=U2, ELSET=MECH_QUADS
2995, 638, 23, 888, 2619
2996, 2619, 766, 98, 717
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*ELEMENT, TYPE=U4, ELSET=MECH_TRIS
2907, 2673, 1504, 331
2908, 1904, 1886, 1556
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** ----------------------------------------------------------
** LAYER 3: COMPANION FACSIMILE CPE4/CPE3 ELEMENTS
** ----------------------------------------------------------
*ELEMENT, TYPE=CPE4, ELSET=UMAT_QUADS
5901, 638, 23, 888, 2619
5902, 2619, 766, 98, 717
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*ELEMENT, TYPE=CPE3, ELSET=UMAT_TRIS
5813, 2673, 1504, 331
5814, 1904, 1886, 1556
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** ----------------------------------------------------------
** ELEMENT SETS
** ----------------------------------------------------------
*ELSET, ELSET=PF_ELEM
PF_QUADS
PF_TRIS
*ELSET, ELSET=MECH_ELEM
MECH_QUADS
MECH_TRIS
*ELSET, ELSET=umatelem
UMAT_QUADS
UMAT_TRIS
*ELSET, ELSET=All_elem
umatelem
** ----------------------------------------------------------
** NODE SETS
** ----------------------------------------------------------
*NSET, NSET=N_RP
999999
*NSET, NSET=N_PIN
25
*NSET, NSET=N_BOTTOM
1, 2, 3, 4, 5, 6
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*NSET, NSET=N_TOP
49, 50, 51, 52, 53, 54
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** ----------------------------------------------------------
** UEL & MATERIAL PROPERTIES
** ----------------------------------------------------------
*UEL PROPERTY, ELSET=PF_ELEM
0.0075, 0.0027, 210.0, 0.3, 1.0E-7, 2906.0
*UEL PROPERTY, ELSET=MECH_ELEM
0.0075, 0.0027, 210.0, 0.3, 1.0E-7, 2906.0
*SOLID SECTION, ELSET=umatelem, MATERIAL=MAT_UMAT
1.0
*MATERIAL, NAME=MAT_UMAT
*USER MATERIAL, CONSTANTS=3
1.0E-11, 0.3, 2906.0
*DEPVAR
20
** ----------------------------------------------------------
** EQUATIONS (Top boundary lateral-free roller tied to RP in DOF 2)
** ----------------------------------------------------------
*EQUATION
2
49, 2, 1.0, 999999, 2, -1.0
*EQUATION
2
50, 2, 1.0, 999999, 2, -1.0
*EQUATION
2
51, 2, 1.0, 999999, 2, -1.0
*EQUATION
2
52, 2, 1.0, 999999, 2, -1.0
*EQUATION
2
53, 2, 1.0, 999999, 2, -1.0
*EQUATION
2
54, 2, 1.0, 999999, 2, -1.0
*EQUATION
2
55, 2, 1.0, 999999, 2, -1.0
*EQUATION
2
56, 2, 1.0, 999999, 2, -1.0
*EQUATION
2
57, 2, 1.0, 999999, 2, -1.0
*EQUATION
2
58, 2, 1.0, 999999, 2, -1.0
*EQUATION
2
59, 2, 1.0, 999999, 2, -1.0
*EQUATION
2
60, 2, 1.0, 999999, 2, -1.0
*EQUATION
2
61, 2, 1.0, 999999, 2, -1.0
*EQUATION
2
62, 2, 1.0, 999999, 2, -1.0
*EQUATION
2
63, 2, 1.0, 999999, 2, -1.0
*EQUATION
2
64, 2, 1.0, 999999, 2, -1.0
*EQUATION
2
65, 2, 1.0, 999999, 2, -1.0
*EQUATION
2
66, 2, 1.0, 999999, 2, -1.0
*EQUATION
2
67, 2, 1.0, 999999, 2, -1.0
*EQUATION
2
68, 2, 1.0, 999999, 2, -1.0
*EQUATION
2
69, 2, 1.0, 999999, 2, -1.0
*EQUATION
2
70, 2, 1.0, 999999, 2, -1.0
*EQUATION
2
71, 2, 1.0, 999999, 2, -1.0
*EQUATION
2
72, 2, 1.0, 999999, 2, -1.0
*EQUATION
2
73, 2, 1.0, 999999, 2, -1.0
*EQUATION
2
665, 2, 1.0, 999999, 2, -1.0
*EQUATION
2
666, 2, 1.0, 999999, 2, -1.0
*EQUATION
2
667, 2, 1.0, 999999, 2, -1.0
*EQUATION
2
668, 2, 1.0, 999999, 2, -1.0
*EQUATION
2
669, 2, 1.0, 999999, 2, -1.0
*EQUATION
2
670, 2, 1.0, 999999, 2, -1.0
*EQUATION
2
671, 2, 1.0, 999999, 2, -1.0
*EQUATION
2
672, 2, 1.0, 999999, 2, -1.0
*EQUATION
2
673, 2, 1.0, 999999, 2, -1.0
*EQUATION
2
674, 2, 1.0, 999999, 2, -1.0
*EQUATION
2
675, 2, 1.0, 999999, 2, -1.0
*EQUATION
2
676, 2, 1.0, 999999, 2, -1.0
*EQUATION
2
677, 2, 1.0, 999999, 2, -1.0
*EQUATION
2
678, 2, 1.0, 999999, 2, -1.0
*EQUATION
2
679, 2, 1.0, 999999, 2, -1.0
*EQUATION
2
680, 2, 1.0, 999999, 2, -1.0
*EQUATION
2
681, 2, 1.0, 999999, 2, -1.0
*EQUATION
2
682, 2, 1.0, 999999, 2, -1.0
*EQUATION
2
683, 2, 1.0, 999999, 2, -1.0
*EQUATION
2
684, 2, 1.0, 999999, 2, -1.0
*EQUATION
2
685, 2, 1.0, 999999, 2, -1.0
*EQUATION
2
686, 2, 1.0, 999999, 2, -1.0
*EQUATION
2
687, 2, 1.0, 999999, 2, -1.0
*EQUATION
2
688, 2, 1.0, 999999, 2, -1.0
*EQUATION
2
689, 2, 1.0, 999999, 2, -1.0
*EQUATION
2
690, 2, 1.0, 999999, 2, -1.0
** ==========================================================
** STEP 1: Monotonic Tensile Loading to u = 0.0050 mm (500 incs)
** ==========================================================
*STEP, NAME=Step-1, NLGEOM=NO, INC=1000
*STATIC
0.002, 1.0, 1.0E-9, 0.002
*BOUNDARY
N_BOTTOM, 2, 2, 0.0
N_PIN, 1, 1, 0.0
N_RP, 2, 2, 0.0050
*RESTART, WRITE, FREQUENCY=0
*OUTPUT, FIELD, FREQUENCY=1
*NODE OUTPUT, NSET=N_RP
U, RF
*ELEMENT OUTPUT, ELSET=All_elem, DIRECTIONS=YES
MISESERI, MISESAVG, S, E, EVOL
*ELEMENT OUTPUT, ELSET=umatelem
SDV
*NODE PRINT, FREQ=1, NSET=N_RP
U2, RF2
*END STEP
** ==========================================================
** STEP 2: Monotonic Tensile Loading to u = 0.0100 mm (1000 incs)
** ==========================================================
*STEP, NAME=Step-2, NLGEOM=NO, INC=2000
*STATIC
0.001, 1.0, 1.0E-9, 0.001
*BOUNDARY
N_RP, 2, 2, 0.0100
*RESTART, WRITE, FREQUENCY=0
*OUTPUT, FIELD, FREQUENCY=1
*NODE OUTPUT, NSET=N_RP
U, RF
*ELEMENT OUTPUT, ELSET=All_elem, DIRECTIONS=YES
MISESERI, MISESAVG, S, E, EVOL
*ELEMENT OUTPUT, ELSET=umatelem
SDV
*NODE PRINT, FREQ=1, NSET=N_RP
U2, RF2
*END STEP
