*Heading
 Stage 10 Native 1% Refined Model from Inf-Companion ODB
** Job name: PK_M1_STAGE10_INF_ADAPTED_RAW_1PCT Model name: PK_M1_STAGE10_INF_CAD
** Generated by: Abaqus/CAE 2023
*Preprint, echo=NO, model=NO, history=NO, contact=NO
**
** PARTS
**
*Part, name=PART-1
*Node
      1,  0.970058262,           0.
      2,  0.944665313,           0.
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*Element, type=CPE3
   1, 49358, 14497,   625
   2, 52275, 25882, 25537
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*Element, type=CPE4
 1507,  1717, 47369, 46974,  1718
 1508,  1718, 46974, 46975,   146
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*Nset, nset=ALL_ELEM, generate
     1,  55943,      1
*Elset, elset=ALL_ELEM, generate
     1,  56344,      1
*Nset, nset=UMATELEM, generate
     1,  55943,      1
*Elset, elset=UMATELEM, generate
     1,  56344,      1
** Section: SolidSec
*Solid Section, elset=ALL_ELEM, material=Steel
1.,
*End Part
**
**
** ASSEMBLY
**
*Assembly, name=Assembly
**
*Instance, name=PART-1-1, part=PART-1
*End Instance
**
*End Assembly
**
** MATERIALS
**
*Material, name=Steel
*Elastic
210000., 0.3
** ----------------------------------------------------------------
**
** STEP: Step-1
**
*Step, name=Step-1, nlgeom=NO
*Static
0.002, 1., 1e-09, 0.002
**
** OUTPUT REQUESTS
**
*Restart, write, frequency=0
**
** FIELD OUTPUT:  from REMESHING RULE: PK_M1_STAGE10_INF_RR
** Stage 10 Native 1% Remeshing Rule for Infinitesimal Companion ODB (errorTarget=1.0%)
**
*Output, field
*Element Output, elset=PART-1-1.ALL_ELEM, directions=YES
MISESERI, MISESAVG, S, EVOL
**
** FIELD OUTPUT: F-Output-1
**
*Output, field, variable=PRESELECT
**
** HISTORY OUTPUT: H-Output-1
**
*Output, history, variable=PRESELECT
*End Step
