*HEADING
PK_M1_JOB1_NONUNIFORM_CONT - Gate-6B Stage 12 Continuum Control (Standard Linear Elastic)
** Physical Mesh: 3019 elements (2940 quads, 79 tris)
** Parameters: E=210 GPa (210000 MPa), nu=0.3
** Roller BCs: Top tied in DOF 2 only to N_RP, DOF 1 free
** ==========================================================
*PREPRINT, ECHO=NO, MODEL=NO, HISTORY=NO, CONTACT=NO
*NODE
1, 0.957446814, 0.000000000
2, 0.914893627, 0.000000000
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*NSET, NSET=N_RP
3107
*NSET, NSET=N_BOTTOM
1, 2, 3, 4, 5, 6
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*NSET, NSET=N_PINNED
25
*NSET, NSET=N_TOP
49, 50, 51, 52, 53, 54
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*ELEMENT, TYPE=CPE4, ELSET=QUAD_ELEMS
80, 634, 23, 966, 916
81, 916, 914, 98, 718
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*ELEMENT, TYPE=CPE3, ELSET=TRI_ELEMS
1, 2074, 2026, 217
2, 3045, 2290, 3046
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*ELSET, ELSET=All_elem
QUAD_ELEMS, TRI_ELEMS
*SOLID SECTION, ELSET=All_elem, MATERIAL=STEEL
1.0
*MATERIAL, NAME=STEEL
*ELASTIC
210000.0, 0.3
*SURFACE, TYPE=NODE, NAME=TOP_SURF
N_TOP
*COUPLING, CONSTRAINT NAME=TOP_COUPLING, REF NODE=N_RP, SURFACE=TOP_SURF
*KINEMATIC
2
*BOUNDARY
N_BOTTOM, 2, 2, 0.0
N_PINNED, 1, 1, 0.0
N_RP, 1, 1, 0.0
*STEP, NAME=Step-1, NLGEOM=NO, INC=2000
*STATIC
0.002, 1.0, 1.0e-9, 0.002
*BOUNDARY
N_RP, 2, 2, 0.005
*OUTPUT, FIELD, FREQ=1
*ELEMENT OUTPUT, ELSET=All_elem, DIRECTIONS=YES
MISESERI, MISESAVG, S, E, EVOL
*OUTPUT, HISTORY, FREQ=1
*NODE PRINT, FREQ=1, NSET=N_RP
U, RF
*END STEP
