*HEADING
Mode-I 3-Layer Infinitesimal Companion Pre-Analysis (3019 Elements, Non-Uniform)
** Units: kN, mm, s
** ----------------------------------------------------------
** USER ELEMENT DEFINITIONS
** ----------------------------------------------------------
*USER ELEMENT, TYPE=U1, NODES=4, COORDINATES=2, PROPERTIES=6, VARIABLES=18, UNSYMM
3
*USER ELEMENT, TYPE=U2, NODES=4, COORDINATES=2, PROPERTIES=6, VARIABLES=18, UNSYMM
1, 2
*USER ELEMENT, TYPE=U3, NODES=3, COORDINATES=2, PROPERTIES=6, VARIABLES=18, UNSYMM
3
*USER ELEMENT, TYPE=U4, NODES=3, COORDINATES=2, PROPERTIES=6, VARIABLES=18, UNSYMM
1, 2
** ----------------------------------------------------------
** NODES
** ----------------------------------------------------------
*NODE
1, 0.95744681, 0.00000000
2, 0.91489363, 0.00000000
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** ----------------------------------------------------------
** LAYER 1: PHASE-FIELD USER ELEMENTS (1 to 3019)
** ----------------------------------------------------------
*ELEMENT, TYPE=U3, ELSET=PF_TRIS
1, 2074, 2026, 217
2, 3045, 2290, 3046
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*ELEMENT, TYPE=U1, ELSET=PF_QUADS
80, 634, 23, 966, 916
81, 916, 914, 98, 718
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** ----------------------------------------------------------
** LAYER 2: MECHANICAL USER ELEMENTS (3020 to 6038)
** ----------------------------------------------------------
*ELEMENT, TYPE=U4, ELSET=MECH_TRIS
3020, 2074, 2026, 217
3021, 3045, 2290, 3046
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*ELEMENT, TYPE=U2, ELSET=MECH_QUADS
3099, 634, 23, 966, 916
3100, 916, 914, 98, 718
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** ----------------------------------------------------------
** LAYER 3: COMPANION UMAT ELEMENTS (6039 to 9057)
** ----------------------------------------------------------
*ELEMENT, TYPE=CPE3, ELSET=UMAT_TRIS
6039, 2074, 2026, 217
6040, 3045, 2290, 3046
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*ELEMENT, TYPE=CPE4, ELSET=UMAT_QUADS
6118, 634, 23, 966, 916
6119, 916, 914, 98, 718
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** ----------------------------------------------------------
** ELEMENT SETS
** ----------------------------------------------------------
*ELSET, ELSET=PF_ELEM
PF_TRIS, PF_QUADS
*ELSET, ELSET=MECH_ELEM
MECH_TRIS, MECH_QUADS
*ELSET, ELSET=All_elem
UMAT_TRIS, UMAT_QUADS
*ELSET, ELSET=umatelem
All_elem
** ----------------------------------------------------------
** NODE SETS
** ----------------------------------------------------------
*NSET, NSET=N_BOTTOM
1, 2, 3, 4, 5, 6
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*NSET, NSET=N_TOP
49, 50, 51, 52, 53, 54
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*NSET, NSET=N_PIN
25
*NSET, NSET=N_RP
999999
** ----------------------------------------------------------
** UEL & MATERIAL PROPERTIES (Package-93 Lineage)
** ----------------------------------------------------------
*UEL PROPERTY, ELSET=PF_ELEM
0.0075, 0.0027, 210.0, 0.3, 1.0E-7, 3019.0
*UEL PROPERTY, ELSET=MECH_ELEM
0.0075, 0.0027, 210.0, 0.3, 1.0E-7, 3019.0
*SOLID SECTION, ELSET=umatelem, MATERIAL=MAT_UMAT
1.0
*MATERIAL, NAME=MAT_UMAT
*USER MATERIAL, CONSTANTS=3
1.0E-11, 0.3, 3019.0
*DEPVAR
20
** ----------------------------------------------------------
** EQUATIONS (Top boundary lateral-free roller tied to RP in DOF 2)
** ----------------------------------------------------------
*EQUATION
2
49, 2, 1.0, 999999, 2, -1.0
*EQUATION
2
50, 2, 1.0, 999999, 2, -1.0
*EQUATION
2
51, 2, 1.0, 999999, 2, -1.0
*EQUATION
2
52, 2, 1.0, 999999, 2, -1.0
*EQUATION
2
53, 2, 1.0, 999999, 2, -1.0
*EQUATION
2
54, 2, 1.0, 999999, 2, -1.0
*EQUATION
2
55, 2, 1.0, 999999, 2, -1.0
*EQUATION
2
56, 2, 1.0, 999999, 2, -1.0
*EQUATION
2
57, 2, 1.0, 999999, 2, -1.0
*EQUATION
2
58, 2, 1.0, 999999, 2, -1.0
*EQUATION
2
59, 2, 1.0, 999999, 2, -1.0
*EQUATION
2
60, 2, 1.0, 999999, 2, -1.0
*EQUATION
2
61, 2, 1.0, 999999, 2, -1.0
*EQUATION
2
62, 2, 1.0, 999999, 2, -1.0
*EQUATION
2
63, 2, 1.0, 999999, 2, -1.0
*EQUATION
2
64, 2, 1.0, 999999, 2, -1.0
*EQUATION
2
65, 2, 1.0, 999999, 2, -1.0
*EQUATION
2
66, 2, 1.0, 999999, 2, -1.0
*EQUATION
2
67, 2, 1.0, 999999, 2, -1.0
*EQUATION
2
68, 2, 1.0, 999999, 2, -1.0
*EQUATION
2
69, 2, 1.0, 999999, 2, -1.0
*EQUATION
2
70, 2, 1.0, 999999, 2, -1.0
*EQUATION
2
71, 2, 1.0, 999999, 2, -1.0
*EQUATION
2
72, 2, 1.0, 999999, 2, -1.0
*EQUATION
2
73, 2, 1.0, 999999, 2, -1.0
*EQUATION
2
662, 2, 1.0, 999999, 2, -1.0
*EQUATION
2
663, 2, 1.0, 999999, 2, -1.0
*EQUATION
2
664, 2, 1.0, 999999, 2, -1.0
*EQUATION
2
665, 2, 1.0, 999999, 2, -1.0
*EQUATION
2
666, 2, 1.0, 999999, 2, -1.0
*EQUATION
2
667, 2, 1.0, 999999, 2, -1.0
*EQUATION
2
668, 2, 1.0, 999999, 2, -1.0
*EQUATION
2
669, 2, 1.0, 999999, 2, -1.0
*EQUATION
2
670, 2, 1.0, 999999, 2, -1.0
*EQUATION
2
671, 2, 1.0, 999999, 2, -1.0
*EQUATION
2
672, 2, 1.0, 999999, 2, -1.0
*EQUATION
2
673, 2, 1.0, 999999, 2, -1.0
*EQUATION
2
674, 2, 1.0, 999999, 2, -1.0
*EQUATION
2
675, 2, 1.0, 999999, 2, -1.0
*EQUATION
2
676, 2, 1.0, 999999, 2, -1.0
*EQUATION
2
677, 2, 1.0, 999999, 2, -1.0
*EQUATION
2
678, 2, 1.0, 999999, 2, -1.0
*EQUATION
2
679, 2, 1.0, 999999, 2, -1.0
*EQUATION
2
680, 2, 1.0, 999999, 2, -1.0
*EQUATION
2
681, 2, 1.0, 999999, 2, -1.0
*EQUATION
2
682, 2, 1.0, 999999, 2, -1.0
*EQUATION
2
683, 2, 1.0, 999999, 2, -1.0
*EQUATION
2
684, 2, 1.0, 999999, 2, -1.0
*EQUATION
2
685, 2, 1.0, 999999, 2, -1.0
*EQUATION
2
686, 2, 1.0, 999999, 2, -1.0
*EQUATION
2
687, 2, 1.0, 999999, 2, -1.0
*EQUATION
2
688, 2, 1.0, 999999, 2, -1.0
*EQUATION
2
689, 2, 1.0, 999999, 2, -1.0
*EQUATION
2
690, 2, 1.0, 999999, 2, -1.0
** ----------------------------------------------------------
** BOUNDARY CONDITIONS
** ----------------------------------------------------------
*BOUNDARY
N_BOTTOM, 2, 2, 0.0
N_PIN, 1, 1, 0.0
** ----------------------------------------------------------
** STEP DEFINITION (Pre-Analysis Displacement u=0.005 mm)
** ----------------------------------------------------------
*STEP, NAME=Step-1, NLGEOM=NO, INC=100
*STATIC
0.05, 1.0, 1.0e-5, 0.05
*BOUNDARY
N_RP, 2, 2, 0.005
*OUTPUT, FIELD, FREQ=1
*NODE OUTPUT
U, RF
*ELEMENT OUTPUT, ELSET=All_elem, DIRECTIONS=YES
MISESERI, MISESAVG, S, E, EVOL
*ELEMENT OUTPUT, ELSET=umatelem
SDV
*OUTPUT, HISTORY, FREQ=1
*NODE OUTPUT, NSET=N_RP
U2, RF2
*END STEP
