*Heading
** Job name: PK_M1_STAGE14_STEP2_LASTINC Model name: MODEL_PK_M1_STAGE14_STEP2_LASTINC
** Generated by: Abaqus/CAE 2024
*Preprint, echo=NO, model=NO, history=NO, contact=NO
**
** PARTS
**
*Part, name=PART-1
*Node
      1,   0.96047163,           0.
      2,  0.940693378,           0.
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*Element, type=CPE3
  1, 11391, 11271,   213
  2, 11739, 11532, 11382
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*Element, type=CPE4
  402,   991, 10356,  1111,    33
  403,  1111, 10356, 10458,   130
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*Nset, nset=ALL_ELEM, generate
     1,  14456,      1
*Elset, elset=ALL_ELEM, generate
     1,  14483,      1
*Nset, nset=UMATELEM, generate
     1,  14456,      1
*Elset, elset=UMATELEM, generate
     1,  14483,      1
** Section: SolidSec
*Solid Section, elset=ALL_ELEM, material=Steel
1.,
*End Part
**
**
** ASSEMBLY
**
*Assembly, name=Assembly
**
*Instance, name=PART-1-1, part=PART-1
*End Instance
**
*End Assembly
**
** MATERIALS
**
*Material, name=Steel
*Elastic
210000., 0.3
** ----------------------------------------------------------------
**
** STEP: Step-1
**
*Step, name=Step-1, nlgeom=NO
*Static
0.002, 1., 1e-09, 0.002
**
** OUTPUT REQUESTS
**
*Restart, write, frequency=0
**
** FIELD OUTPUT: F-Output-1
**
*Output, field, variable=PRESELECT
**
** HISTORY OUTPUT: H-Output-1
**
*Output, history, variable=PRESELECT
*End Step
** ----------------------------------------------------------------
**
** STEP: Step-2
**
*Step, name=Step-2, nlgeom=NO
*Static
0.001, 1., 1e-09, 0.001
**
** OUTPUT REQUESTS
**
*Restart, write, frequency=0
**
** FIELD OUTPUT: F-Output-1
**
*Output, field, variable=PRESELECT
**
** FIELD OUTPUT:  from REMESHING RULE: RR_STAGE14
** Stage 14 Test PK_M1_STAGE14_STEP2_LASTINC
**
*Output, field, frequency=99999
*Element Output, elset=PART-1-1.ALL_ELEM, directions=YES
MISESERI, MISESAVG, S, EVOL
**
** HISTORY OUTPUT: H-Output-1
**
*Output, history, variable=PRESELECT
*End Step
