*Heading
** Job name: PK_M1_2906COARSE_HIST_1PCT Model name: PK_M1_HIST_1PCT
** Generated by: Abaqus/CAE 2024
*Preprint, echo=NO, model=NO, history=NO, contact=NO
**
** PARTS
**
*Part, name=Plate
*Node
      1,  0.976479948,           0.
      2,  0.950163066,           0.
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*Element, type=CPE3
   1, 60997, 60628,  1408
   2, 17803, 17349, 17797
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*Element, type=CPE4
 2006,  2498,  1875,  1874,  2501
 2007,  7154,  7166,  6622,  6609
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*Nset, nset=ALL_ELEM, generate
     1,  71547,      1
*Elset, elset=ALL_ELEM, generate
     1,  72085,      1
*Nset, nset=UMATELEM, generate
     1,  71547,      1
*Elset, elset=UMATELEM, generate
     1,  72085,      1
** Section: SolidSec
*Solid Section, elset=ALL_ELEM, material=Steel
1.,
*End Part
**
**
** ASSEMBLY
**
*Assembly, name=Assembly
**
*Instance, name=Plate-1, part=Plate
*End Instance
**
*End Assembly
**
** MATERIALS
**
*Material, name=Steel
*Elastic
210., 0.3
** ----------------------------------------------------------------
**
** STEP: Step-1
**
*Step, name=Step-1, nlgeom=NO
*Static
0.1, 1., 1e-05, 0.1
**
** OUTPUT REQUESTS
**
*Restart, write, frequency=0
**
** FIELD OUTPUT:  from REMESHING RULE: PK_RR
** Mode-I Causal Isolation Remeshing Rule (errorTarget=1.0%)
**
*Output, field
*Element Output, elset=Plate-1.ALL_ELEM, directions=YES
MISESERI, MISESAVG, S, EVOL
**
** FIELD OUTPUT: F-Output-1
**
*Output, field, variable=PRESELECT
**
** HISTORY OUTPUT: H-Output-1
**
*Output, history, variable=PRESELECT
*End Step
