*Heading
** Pandey & Kumar (2025) Corrected Mode-I Coarse Pre-Analysis Job-1_UEL
** Physical Mesh: 2700 elements (2700 quads, 0 tris), 2831 nodes
** Layered UEL/UMAT System with Material & Fracture Properties
** ==========================================================
*Preprint, echo=NO, model=NO, history=NO, contact=NO
** ----------------------------------------------------------
** USER ELEMENT INTERFACES (f42_mixed_uel.for)
** ----------------------------------------------------------
*User Element, nodes=4, type=U1, properties=6, coordinates=2, variables=18
3
*User Element, nodes=4, type=U2, properties=6, coordinates=2, variables=18
1, 2
** ----------------------------------------------------------
** NODES
** ----------------------------------------------------------
*Node
1, 0.0000000000, 0.0000000000
2, 0.0195454545, 0.0000000000
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** ----------------------------------------------------------
** LAYER 1: PHASE-FIELD USER ELEMENTS (1 .. 2700)
** ----------------------------------------------------------
*Element, type=U1, elset=PF_QUADS
1, 1, 2, 53, 52
2, 2, 3, 54, 53
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** ----------------------------------------------------------
** LAYER 2: MECHANICAL USER ELEMENTS (2701 .. 5400)
** ----------------------------------------------------------
*Element, type=U2, elset=MECH_QUADS
2701, 1, 2, 53, 52
2702, 2, 3, 54, 53
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** ----------------------------------------------------------
** LAYER 3: COMPANION VISUALIZATION ELEMENTS (5401 .. 8100)
** ----------------------------------------------------------
*Element, type=CPE4, elset=UMAT_QUADS
5401, 1, 2, 53, 52
5402, 2, 3, 54, 53
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** ----------------------------------------------------------
** ELEMENT SETS
** ----------------------------------------------------------
*Elset, elset=umatelem
UMAT_QUADS
*Elset, elset=All_elem
umatelem
** ----------------------------------------------------------
** NODE SETS (WRAPPED)
** ----------------------------------------------------------
*Nset, nset=N_RP
999999
*Nset, nset=N_PIN
1
*Nset, nset=N_BOTTOM
1, 2, 3, 4, 5, 6
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*Nset, nset=N_TOP
2780, 2781, 2782, 2783, 2784, 2785
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** ----------------------------------------------------------
** UEL & MATERIAL PROPERTIES
** ----------------------------------------------------------
*UEL Property, elset=PF_QUADS
0.0075, 0.0027, 210.0, 0.3, 1.0E-7, 2700.0
*UEL Property, elset=MECH_QUADS
0.0075, 0.0027, 210.0, 0.3, 1.0E-7, 2700.0
*Solid Section, elset=umatelem, material=MAT_UMAT
1.0,
*Material, name=MAT_UMAT
*User Material, constants=3
1.0E-11, 0.3, 2700.0
*Depvar
20,
** ----------------------------------------------------------
** EQUATIONS (Rigid top tensile pull tied to RP)
** ----------------------------------------------------------
*Equation
2
2780, 2, 1.0, 999999, 2, -1.0
*Equation
2
2781, 2, 1.0, 999999, 2, -1.0
*Equation
2
2782, 2, 1.0, 999999, 2, -1.0
*Equation
2
2783, 2, 1.0, 999999, 2, -1.0
*Equation
2
2784, 2, 1.0, 999999, 2, -1.0
*Equation
2
2785, 2, 1.0, 999999, 2, -1.0
*Equation
2
2786, 2, 1.0, 999999, 2, -1.0
*Equation
2
2787, 2, 1.0, 999999, 2, -1.0
*Equation
2
2788, 2, 1.0, 999999, 2, -1.0
*Equation
2
2789, 2, 1.0, 999999, 2, -1.0
*Equation
2
2790, 2, 1.0, 999999, 2, -1.0
*Equation
2
2791, 2, 1.0, 999999, 2, -1.0
*Equation
2
2792, 2, 1.0, 999999, 2, -1.0
*Equation
2
2793, 2, 1.0, 999999, 2, -1.0
*Equation
2
2794, 2, 1.0, 999999, 2, -1.0
*Equation
2
2795, 2, 1.0, 999999, 2, -1.0
*Equation
2
2796, 2, 1.0, 999999, 2, -1.0
*Equation
2
2797, 2, 1.0, 999999, 2, -1.0
*Equation
2
2798, 2, 1.0, 999999, 2, -1.0
*Equation
2
2799, 2, 1.0, 999999, 2, -1.0
*Equation
2
2800, 2, 1.0, 999999, 2, -1.0
*Equation
2
2801, 2, 1.0, 999999, 2, -1.0
*Equation
2
2802, 2, 1.0, 999999, 2, -1.0
*Equation
2
2803, 2, 1.0, 999999, 2, -1.0
*Equation
2
2804, 2, 1.0, 999999, 2, -1.0
*Equation
2
2805, 2, 1.0, 999999, 2, -1.0
*Equation
2
2806, 2, 1.0, 999999, 2, -1.0
*Equation
2
2807, 2, 1.0, 999999, 2, -1.0
*Equation
2
2808, 2, 1.0, 999999, 2, -1.0
*Equation
2
2809, 2, 1.0, 999999, 2, -1.0
*Equation
2
2810, 2, 1.0, 999999, 2, -1.0
*Equation
2
2811, 2, 1.0, 999999, 2, -1.0
*Equation
2
2812, 2, 1.0, 999999, 2, -1.0
*Equation
2
2813, 2, 1.0, 999999, 2, -1.0
*Equation
2
2814, 2, 1.0, 999999, 2, -1.0
*Equation
2
2815, 2, 1.0, 999999, 2, -1.0
*Equation
2
2816, 2, 1.0, 999999, 2, -1.0
*Equation
2
2817, 2, 1.0, 999999, 2, -1.0
*Equation
2
2818, 2, 1.0, 999999, 2, -1.0
*Equation
2
2819, 2, 1.0, 999999, 2, -1.0
*Equation
2
2820, 2, 1.0, 999999, 2, -1.0
*Equation
2
2821, 2, 1.0, 999999, 2, -1.0
*Equation
2
2822, 2, 1.0, 999999, 2, -1.0
*Equation
2
2823, 2, 1.0, 999999, 2, -1.0
*Equation
2
2824, 2, 1.0, 999999, 2, -1.0
*Equation
2
2825, 2, 1.0, 999999, 2, -1.0
*Equation
2
2826, 2, 1.0, 999999, 2, -1.0
*Equation
2
2827, 2, 1.0, 999999, 2, -1.0
*Equation
2
2828, 2, 1.0, 999999, 2, -1.0
*Equation
2
2829, 2, 1.0, 999999, 2, -1.0
*Equation
2
2830, 2, 1.0, 999999, 2, -1.0
** ==========================================================
** STEP 1: Monotonic Tensile Loading to u = 0.0050 mm (500 incs)
** ==========================================================
*Step, name=Step-1, nlgeom=NO, inc=1000
*Static
0.002, 1.0, 1.0E-9, 0.002
*Boundary
N_BOTTOM, 2, 2, 0.0
N_PIN, 1, 1, 0.0
N_TOP, 1, 1, 0.0
N_RP, 2, 2, 0.0050
*Restart, write, frequency=0
*Output, field, frequency=1
*Node Output, nset=N_RP
U, RF
*Element Output, elset=All_elem, directions=YES
MISESERI, MISESAVG, S, EVOL
*Element Output, elset=umatelem
SDV
*Node Print, freq=1, nset=N_RP
U2, RF2
*End Step
** ==========================================================
** STEP 2: Monotonic Tensile Loading to u = 0.0100 mm (1000 incs)
** ==========================================================
*Step, name=Step-2, nlgeom=NO, inc=2000
*Static
0.001, 1.0, 1.0E-9, 0.001
*Boundary
N_RP, 2, 2, 0.0100
*Restart, write, frequency=0
*Output, field, frequency=1
*Node Output, nset=N_RP
U, RF
*Element Output, elset=All_elem, directions=YES
MISESERI, MISESAVG, S, EVOL
*Element Output, elset=umatelem
SDV
*Node Print, freq=1, nset=N_RP
U2, RF2
*End Step
