*HEADING
Pandey & Kumar (2025) Mode-I 2.0% Corrected Adaptive Refined PFM Solve (Sharp Slit)
** Physical Elements: 15396 (14963 quads, 433 tris), Nodes: 15414
** Parameters: E=210.0 kN/mm^2, nu=0.3, l0=0.0075 mm, Gc=0.0027 kN/mm, k=1.0e-7
** ----------------------------------------------------------
*USER ELEMENT, TYPE=U1, NODES=4, COORDINATES=2, PROPERTIES=6, VARIABLES=18, UNSYMM
3
*USER ELEMENT, TYPE=U2, NODES=4, COORDINATES=2, PROPERTIES=6, VARIABLES=18, UNSYMM
1, 2
*USER ELEMENT, TYPE=U3, NODES=3, COORDINATES=2, PROPERTIES=6, VARIABLES=18, UNSYMM
3
*USER ELEMENT, TYPE=U4, NODES=3, COORDINATES=2, PROPERTIES=6, VARIABLES=18, UNSYMM
1, 2
*NODE
1, 9.8022407300e-01, 0.0000000000e+00
2, 9.4063913800e-01, 0.0000000000e+00
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*ELEMENT, TYPE=U1, ELSET=PHASE_QUAD
434, 1647, 1643, 1534, 1533
435, 1539, 1538, 1646, 1655
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*ELEMENT, TYPE=U3, ELSET=PHASE_TRI
1, 3311, 3019, 3170
2, 13325, 13146, 460
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*ELEMENT, TYPE=U2, ELSET=DISP_QUAD
15830, 1647, 1643, 1534, 1533
15831, 1539, 1538, 1646, 1655
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*ELEMENT, TYPE=U4, ELSET=DISP_TRI
15397, 3311, 3019, 3170
15398, 13325, 13146, 460
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*ELEMENT, TYPE=CPE4, ELSET=UMAT_QUADS
31226, 1647, 1643, 1534, 1533
31227, 1539, 1538, 1646, 1655
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*ELEMENT, TYPE=CPE3, ELSET=UMAT_TRIS
30793, 3311, 3019, 3170
30794, 13325, 13146, 460
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*ELSET, ELSET=All_elem
UMAT_QUADS
UMAT_TRIS
*ELSET, ELSET=umatelem
All_elem
*NSET, NSET=N_BOTTOM
1, 2, 3, 4, 5, 6
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*NSET, NSET=N_PIN
37
*NSET, NSET=N_TOP
73, 74, 75, 76, 77, 78
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*NSET, NSET=N_RP
999999
*UEL PROPERTY, ELSET=PHASE_QUAD
0.0075, 0.0027, 210.0, 0.3, 1.0e-7, 15396.
*UEL PROPERTY, ELSET=DISP_QUAD
0.0075, 0.0027, 210.0, 0.3, 1.0e-7, 15396.
*UEL PROPERTY, ELSET=PHASE_TRI
0.0075, 0.0027, 210.0, 0.3, 1.0e-7, 15396.
*UEL PROPERTY, ELSET=DISP_TRI
0.0075, 0.0027, 210.0, 0.3, 1.0e-7, 15396.
*SOLID SECTION, ELSET=All_elem, MATERIAL=DUMMY_MAT
1.0
*MATERIAL, NAME=DUMMY_MAT
*USER MATERIAL, CONSTANTS=3
210.0, 0.3, 15396.
*DEPVAR
18
** EQUATIONS (Rigid top tensile pull tied to RP)
*EQUATION
2
73, 2, 1.0, 999999, 2, -1.0
*EQUATION
2
74, 2, 1.0, 999999, 2, -1.0
*EQUATION
2
75, 2, 1.0, 999999, 2, -1.0
*EQUATION
2
76, 2, 1.0, 999999, 2, -1.0
*EQUATION
2
77, 2, 1.0, 999999, 2, -1.0
*EQUATION
2
78, 2, 1.0, 999999, 2, -1.0
*EQUATION
2
79, 2, 1.0, 999999, 2, -1.0
*EQUATION
2
80, 2, 1.0, 999999, 2, -1.0
*EQUATION
2
81, 2, 1.0, 999999, 2, -1.0
*EQUATION
2
82, 2, 1.0, 999999, 2, -1.0
*EQUATION
2
83, 2, 1.0, 999999, 2, -1.0
*EQUATION
2
84, 2, 1.0, 999999, 2, -1.0
*EQUATION
2
85, 2, 1.0, 999999, 2, -1.0
*EQUATION
2
86, 2, 1.0, 999999, 2, -1.0
*EQUATION
2
87, 2, 1.0, 999999, 2, -1.0
*EQUATION
2
88, 2, 1.0, 999999, 2, -1.0
*EQUATION
2
89, 2, 1.0, 999999, 2, -1.0
*EQUATION
2
90, 2, 1.0, 999999, 2, -1.0
*EQUATION
2
91, 2, 1.0, 999999, 2, -1.0
*EQUATION
2
92, 2, 1.0, 999999, 2, -1.0
*EQUATION
2
93, 2, 1.0, 999999, 2, -1.0
*EQUATION
2
94, 2, 1.0, 999999, 2, -1.0
*EQUATION
2
95, 2, 1.0, 999999, 2, -1.0
*EQUATION
2
96, 2, 1.0, 999999, 2, -1.0
*EQUATION
2
97, 2, 1.0, 999999, 2, -1.0
*EQUATION
2
98, 2, 1.0, 999999, 2, -1.0
*EQUATION
2
99, 2, 1.0, 999999, 2, -1.0
*EQUATION
2
100, 2, 1.0, 999999, 2, -1.0
*EQUATION
2
101, 2, 1.0, 999999, 2, -1.0
*EQUATION
2
102, 2, 1.0, 999999, 2, -1.0
*EQUATION
2
103, 2, 1.0, 999999, 2, -1.0
*EQUATION
2
104, 2, 1.0, 999999, 2, -1.0
*EQUATION
2
105, 2, 1.0, 999999, 2, -1.0
*EQUATION
2
106, 2, 1.0, 999999, 2, -1.0
*EQUATION
2
107, 2, 1.0, 999999, 2, -1.0
*EQUATION
2
108, 2, 1.0, 999999, 2, -1.0
*EQUATION
2
109, 2, 1.0, 999999, 2, -1.0
*EQUATION
2
1404, 2, 1.0, 999999, 2, -1.0
*EQUATION
2
1405, 2, 1.0, 999999, 2, -1.0
*EQUATION
2
1406, 2, 1.0, 999999, 2, -1.0
*EQUATION
2
1407, 2, 1.0, 999999, 2, -1.0
*EQUATION
2
1408, 2, 1.0, 999999, 2, -1.0
*EQUATION
2
1409, 2, 1.0, 999999, 2, -1.0
*EQUATION
2
1410, 2, 1.0, 999999, 2, -1.0
*EQUATION
2
1411, 2, 1.0, 999999, 2, -1.0
*EQUATION
2
1412, 2, 1.0, 999999, 2, -1.0
*EQUATION
2
1413, 2, 1.0, 999999, 2, -1.0
*EQUATION
2
1414, 2, 1.0, 999999, 2, -1.0
*EQUATION
2
1415, 2, 1.0, 999999, 2, -1.0
*EQUATION
2
1416, 2, 1.0, 999999, 2, -1.0
*EQUATION
2
1417, 2, 1.0, 999999, 2, -1.0
*EQUATION
2
1418, 2, 1.0, 999999, 2, -1.0
*EQUATION
2
1419, 2, 1.0, 999999, 2, -1.0
*EQUATION
2
1420, 2, 1.0, 999999, 2, -1.0
*EQUATION
2
1421, 2, 1.0, 999999, 2, -1.0
*EQUATION
2
1422, 2, 1.0, 999999, 2, -1.0
*EQUATION
2
1423, 2, 1.0, 999999, 2, -1.0
*EQUATION
2
1424, 2, 1.0, 999999, 2, -1.0
*EQUATION
2
1425, 2, 1.0, 999999, 2, -1.0
*EQUATION
2
1426, 2, 1.0, 999999, 2, -1.0
*EQUATION
2
1427, 2, 1.0, 999999, 2, -1.0
*EQUATION
2
1428, 2, 1.0, 999999, 2, -1.0
*EQUATION
2
1429, 2, 1.0, 999999, 2, -1.0
*EQUATION
2
1430, 2, 1.0, 999999, 2, -1.0
*EQUATION
2
1431, 2, 1.0, 999999, 2, -1.0
*EQUATION
2
1432, 2, 1.0, 999999, 2, -1.0
*EQUATION
2
1433, 2, 1.0, 999999, 2, -1.0
*EQUATION
2
1434, 2, 1.0, 999999, 2, -1.0
*EQUATION
2
1435, 2, 1.0, 999999, 2, -1.0
*EQUATION
2
1436, 2, 1.0, 999999, 2, -1.0
*EQUATION
2
1437, 2, 1.0, 999999, 2, -1.0
*EQUATION
2
1438, 2, 1.0, 999999, 2, -1.0
*EQUATION
2
1439, 2, 1.0, 999999, 2, -1.0
*EQUATION
2
1440, 2, 1.0, 999999, 2, -1.0
*EQUATION
2
1441, 2, 1.0, 999999, 2, -1.0
*EQUATION
2
1442, 2, 1.0, 999999, 2, -1.0
*EQUATION
2
1443, 2, 1.0, 999999, 2, -1.0
*EQUATION
2
1444, 2, 1.0, 999999, 2, -1.0
*EQUATION
2
1445, 2, 1.0, 999999, 2, -1.0
*EQUATION
2
1446, 2, 1.0, 999999, 2, -1.0
*EQUATION
2
1447, 2, 1.0, 999999, 2, -1.0
*EQUATION
2
1448, 2, 1.0, 999999, 2, -1.0
*EQUATION
2
1449, 2, 1.0, 999999, 2, -1.0
*EQUATION
2
1450, 2, 1.0, 999999, 2, -1.0
*EQUATION
2
1451, 2, 1.0, 999999, 2, -1.0
*EQUATION
2
1452, 2, 1.0, 999999, 2, -1.0
*EQUATION
2
1453, 2, 1.0, 999999, 2, -1.0
*EQUATION
2
1454, 2, 1.0, 999999, 2, -1.0
*EQUATION
2
1455, 2, 1.0, 999999, 2, -1.0
*EQUATION
2
1456, 2, 1.0, 999999, 2, -1.0
*EQUATION
2
1457, 2, 1.0, 999999, 2, -1.0
*EQUATION
2
1458, 2, 1.0, 999999, 2, -1.0
*EQUATION
2
1459, 2, 1.0, 999999, 2, -1.0
*EQUATION
2
1460, 2, 1.0, 999999, 2, -1.0
*EQUATION
2
1461, 2, 1.0, 999999, 2, -1.0
*EQUATION
2
1462, 2, 1.0, 999999, 2, -1.0
*EQUATION
2
1463, 2, 1.0, 999999, 2, -1.0
*EQUATION
2
1464, 2, 1.0, 999999, 2, -1.0
*EQUATION
2
1465, 2, 1.0, 999999, 2, -1.0
*EQUATION
2
1466, 2, 1.0, 999999, 2, -1.0
*EQUATION
2
1467, 2, 1.0, 999999, 2, -1.0
*EQUATION
2
1468, 2, 1.0, 999999, 2, -1.0
*EQUATION
2
1469, 2, 1.0, 999999, 2, -1.0
*EQUATION
2
1470, 2, 1.0, 999999, 2, -1.0
*EQUATION
2
1471, 2, 1.0, 999999, 2, -1.0
*EQUATION
2
1472, 2, 1.0, 999999, 2, -1.0
*EQUATION
2
1473, 2, 1.0, 999999, 2, -1.0
*EQUATION
2
1474, 2, 1.0, 999999, 2, -1.0
*EQUATION
2
1475, 2, 1.0, 999999, 2, -1.0
*EQUATION
2
1476, 2, 1.0, 999999, 2, -1.0
*EQUATION
2
1477, 2, 1.0, 999999, 2, -1.0
*EQUATION
2
1478, 2, 1.0, 999999, 2, -1.0
** ----------------------------------------------------------
** STEP 1: Monotonic Tensile Loading to u = 0.0050 mm (2000 increments)
** ----------------------------------------------------------
*STEP, NAME=Step-1, NLGEOM=NO, INC=6000
*STATIC
5.0E-4, 1.0, 1.0E-9, 5.0E-4
*BOUNDARY
N_BOTTOM, 2, 2, 0.0
N_PIN, 1, 1, 0.0
N_TOP, 1, 1, 0.0
N_RP, 2, 2, 0.0050
*RESTART, WRITE, FREQUENCY=0
*OUTPUT, FIELD, FREQUENCY=1
*NODE OUTPUT, NSET=N_RP
U, RF
*NODE OUTPUT
U, RF
*ELEMENT OUTPUT, ELSET=umatelem
SDV, S, E
*NODE PRINT, FREQ=1, NSET=N_RP
U2, RF2
*END STEP
** ----------------------------------------------------------
** STEP 2: Fracture Propagation to u = 0.0100 mm (5000 increments)
** ----------------------------------------------------------
*STEP, NAME=Step-2, NLGEOM=NO, INC=10000
*STATIC
2.0E-4, 1.0, 1.0E-14, 2.0E-4
*BOUNDARY
N_RP, 2, 2, 0.0100
*RESTART, WRITE, FREQUENCY=0
*OUTPUT, FIELD, FREQUENCY=1
*NODE OUTPUT, NSET=N_RP
U, RF
*NODE OUTPUT
U, RF
*ELEMENT OUTPUT, ELSET=umatelem
SDV, S, E
*NODE PRINT, FREQ=1, NSET=N_RP
U2, RF2
*END STEP
