*Heading
 Refined mesh et5
** Job name: JOB_MODE2_ADAPTIVE_ET5 Model name: MODE2_UNIFORM_COARSE_MODEL
** Generated by: Abaqus/CAE 2024
*Preprint, echo=NO, model=NO, history=NO, contact=NO
**
** PARTS
**
*Part, name=PLATE
*Node
      1,   0.97175467,           0.
      2,  0.945382297,           0.
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*Element, type=CPE3
  1, 20339, 10613, 20362
  2,  8249,  7354,  7737
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*Element, type=CPE4
  590,  2073,  1428,  1427,  2771
  591,  1816,  1993,  2006,  1817
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*Nset, nset=SEAM_SET
   127,   128,   129,   130,   131,   132
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*Elset, elset=SEAM_SET
   608,   627,   646,   665,   685,   705
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*Nset, nset=ALL_ELEM, generate
     1,  21657,      1
*Elset, elset=ALL_ELEM, generate
     1,  21550,      1
** Section: PlateSec
*Solid Section, elset=ALL_ELEM, material=Steel
1.,
*End Part
**
**
** ASSEMBLY
**
*Assembly, name=Assembly
**
*Instance, name=PLATE-1, part=PLATE
*End Instance
**
*Nset, nset=BOTTOM, instance=PLATE-1
    1,    2,    3,    4,    5,    6
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*Elset, elset=BOTTOM, instance=PLATE-1
   590,   609,   629,   647,   667,   687
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*Nset, nset=TOP, instance=PLATE-1
   73,   74,   75,   76,   77,   78
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*Elset, elset=TOP, instance=PLATE-1
   977,  1030,  1032,  1084,  1120,  1157
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*End Assembly
**
** MATERIALS
**
*Material, name=Steel
*Elastic
210000., 0.3
** ----------------------------------------------------------------
**
** STEP: Step-1
**
*Step, name=Step-1, nlgeom=NO
*Static
1., 1., 1e-05, 1.
**
** BOUNDARY CONDITIONS
**
** Name: FIX_BOTTOM Type: Displacement/Rotation
*Boundary
BOTTOM, 1, 1
BOTTOM, 2, 2
** Name: SHEAR_TOP Type: Displacement/Rotation
*Boundary
TOP, 1, 1, 0.001
TOP, 2, 2
**
** OUTPUT REQUESTS
**
*Restart, write, frequency=0
**
** FIELD OUTPUT: F-Output-1
**
*Output, field
*Node Output, nset=PLATE-1.ALL_ELEM
RF, U
*Element Output, elset=PLATE-1.ALL_ELEM, directions=YES
EVOL, MISESAVG, MISESERI, S
**
** FIELD OUTPUT:  from REMESHING RULE: RR_ET_2
** Mode-II Native Remeshing Rule errorTarget=2.0,  from REMESHING RULE: RR_ET_5
** Mode-II Native Remeshing Rule errorTarget=5.0
**
*Element Output, elset=PLATE-1.ALL_ELEM, directions=YES
MISESERI, MISESAVG, S, EVOL
**
** HISTORY OUTPUT: H-Output-1
**
*Output, history, variable=PRESELECT
*End Step
