*Heading
 Corrected Refined Mode-II Model Step-2 errorTarget=1.0
** Job name: M2_CORRECTED_ADAPTED_RAW_1PCT Model name: MODE2_CORRECTED_ET_1
** Generated by: Abaqus/CAE 2023
*Preprint, echo=NO, model=NO, history=NO, contact=NO
**
** PARTS
**
*Part, name=PART-1
*Node
      1,  0.971990883,           0.
      2,  0.945438802,           0.
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*Element, type=CPE3
   1,  89695,    429,  32822
   2,  24757,  23067,  23926
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*Element, type=CPE4
  2417,   1528,   4143,   4365,   1529
  2418,   3057,   2262,   2261,   3041
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*Nset, nset=ALL_ELEM, generate
      1,  100706,       1
*Elset, elset=ALL_ELEM, generate
      1,  101298,       1
** Section: SolidSec
*Solid Section, elset=ALL_ELEM, material=Steel
1.,
*End Part
**
**
** ASSEMBLY
**
*Assembly, name=Assembly
**
*Instance, name=PART-1-1, part=PART-1
*End Instance
**
*End Assembly
**
** MATERIALS
**
*Material, name=Steel
*Elastic
210000., 0.3
** ----------------------------------------------------------------
**
** STEP: Step-1
**
*Step, name=Step-1, nlgeom=NO
*Static
0.002, 1., 1e-09, 0.002
**
** OUTPUT REQUESTS
**
*Restart, write, frequency=0
**
** FIELD OUTPUT: F-Output-1
**
*Output, field, variable=PRESELECT
**
** HISTORY OUTPUT: H-Output-1
**
*Output, history, variable=PRESELECT
*End Step
** ----------------------------------------------------------------
**
** STEP: Step-2
**
*Step, name=Step-2, nlgeom=NO
*Static
0.002, 1., 1e-09, 0.002
**
** OUTPUT REQUESTS
**
*Restart, write, frequency=0
**
** FIELD OUTPUT:  from REMESHING RULE: RR_MODE2_CORRECTED_1
** Corrected Mode-II Remeshing Rule Step-2 errorTarget=1.0%
**
*Output, field
*Element Output, elset=PART-1-1.ALL_ELEM, directions=YES
MISESERI, MISESAVG, S, EVOL
**
** FIELD OUTPUT: F-Output-1
**
*Output, field, variable=PRESELECT
**
** HISTORY OUTPUT: H-Output-1
**
*Output, history, variable=PRESELECT
*End Step
