*Heading
** M2_CORRECTED_JOB2_ET3PCT: Mode-II Pandey-Kumar (2025) Corrected Adapted PFM Solve (ET_3PCT: 21063 elements)
** Physical Mesh: 21063 elements (20487 quads, 576 tris), 21042 nodes
** Layered UEL/UMAT System: Layer 1 (U1/U3 phase), Layer 2 (U2/U4 mech), Layer 3 (CPE4/CPE3 companion)
** Parameters: E=210 GPa, nu=0.3, l0=0.015 mm, Gc=0.0027 kN/mm, eta=1e-7, N_PHYS=21063.
** ==========================================================
*Preprint, echo=NO, model=NO, history=NO, contact=NO
** ----------------------------------------------------------
** USER ELEMENT INTERFACES (f42_mixed_uel_mode2_miehe.for)
** ----------------------------------------------------------
*User Element, nodes=4, type=U1, properties=6, coordinates=2, variables=18, unsymm
3
*User Element, nodes=4, type=U2, properties=6, coordinates=2, variables=18, unsymm
1, 2
*User Element, nodes=3, type=U3, properties=6, coordinates=2, variables=18, unsymm
3
*User Element, nodes=3, type=U4, properties=6, coordinates=2, variables=18, unsymm
1, 2
** ----------------------------------------------------------
** NODES
** ----------------------------------------------------------
*Node
1, 0.973595202, 0
2, 0.943527281, 0
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** ----------------------------------------------------------
** LAYER 1: PHASE FIELD USER ELEMENTS (1..21063)
** ----------------------------------------------------------
*Element, type=U1, elset=PHASE_QUADS
1, 1926, 1385, 1384, 1953
2, 1926, 1946, 1612, 1611
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*Element, type=U3, elset=PHASE_TRIS
20488, 558, 557, 17994
20489, 18276, 18341, 17626
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** ----------------------------------------------------------
** LAYER 2: MECHANICAL USER ELEMENTS (21064..42126)
** ----------------------------------------------------------
*Element, type=U2, elset=MECH_QUADS
21064, 1926, 1385, 1384, 1953
21065, 1926, 1946, 1612, 1611
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*Element, type=U4, elset=MECH_TRIS
41551, 558, 557, 17994
41552, 18276, 18341, 17626
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** ----------------------------------------------------------
** LAYER 3: COMPANION VISUALIZATION ELEMENTS (42127..63189)
** ----------------------------------------------------------
*Element, type=CPE4, elset=UMAT_QUADS
42127, 1926, 1385, 1384, 1953
42128, 1926, 1946, 1612, 1611
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*Element, type=CPE3, elset=UMAT_TRIS
62614, 558, 557, 17994
62615, 18276, 18341, 17626
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** ----------------------------------------------------------
** ELEMENT SETS
** ----------------------------------------------------------
*Elset, elset=PHASE_ELEM, generate
1, 21063, 1
*Elset, elset=MECH_ELEM, generate
21064, 42126, 1
*Elset, elset=All_elem, generate
42127, 63189, 1
*Elset, elset=umatelem, generate
42127, 63189, 1
** ----------------------------------------------------------
** NODE SETS
** ----------------------------------------------------------
*NSET, NSET=N_BOTTOM
1, 2, 3, 4, 5, 6
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*NSET, NSET=N_TOP
73, 74, 75, 76, 77, 78
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*NSET, NSET=N_RP
999999
** ----------------------------------------------------------
** PROPERTIES & MATERIALS
** ----------------------------------------------------------
*UEL Property, elset=PHASE_ELEM
210.0, 0.3, 0.0027, 0.015, 1.0E-7, 21063.
*UEL Property, elset=MECH_ELEM
210.0, 0.3, 0.0027, 0.015, 1.0E-7, 21063.
*Solid Section, elset=All_elem, material=UMAT_MAT
1.0,
*Material, name=UMAT_MAT
*User Material, constants=3
1.0E-11, 0.3, 21063.
*Depvar
20,
** ----------------------------------------------------------
** EQUATIONS (Rigid top surface coupled to RP 999999 for u1)
** ----------------------------------------------------------
*Equation
2
73, 1, 1.0, 999999, 1, -1.0
*Equation
2
74, 1, 1.0, 999999, 1, -1.0
*Equation
2
75, 1, 1.0, 999999, 1, -1.0
*Equation
2
76, 1, 1.0, 999999, 1, -1.0
*Equation
2
77, 1, 1.0, 999999, 1, -1.0
*Equation
2
78, 1, 1.0, 999999, 1, -1.0
*Equation
2
79, 1, 1.0, 999999, 1, -1.0
*Equation
2
80, 1, 1.0, 999999, 1, -1.0
*Equation
2
81, 1, 1.0, 999999, 1, -1.0
*Equation
2
82, 1, 1.0, 999999, 1, -1.0
*Equation
2
83, 1, 1.0, 999999, 1, -1.0
*Equation
2
84, 1, 1.0, 999999, 1, -1.0
*Equation
2
85, 1, 1.0, 999999, 1, -1.0
*Equation
2
86, 1, 1.0, 999999, 1, -1.0
*Equation
2
87, 1, 1.0, 999999, 1, -1.0
*Equation
2
88, 1, 1.0, 999999, 1, -1.0
*Equation
2
89, 1, 1.0, 999999, 1, -1.0
*Equation
2
90, 1, 1.0, 999999, 1, -1.0
*Equation
2
91, 1, 1.0, 999999, 1, -1.0
*Equation
2
92, 1, 1.0, 999999, 1, -1.0
*Equation
2
93, 1, 1.0, 999999, 1, -1.0
*Equation
2
94, 1, 1.0, 999999, 1, -1.0
*Equation
2
95, 1, 1.0, 999999, 1, -1.0
*Equation
2
96, 1, 1.0, 999999, 1, -1.0
*Equation
2
97, 1, 1.0, 999999, 1, -1.0
*Equation
2
98, 1, 1.0, 999999, 1, -1.0
*Equation
2
99, 1, 1.0, 999999, 1, -1.0
*Equation
2
100, 1, 1.0, 999999, 1, -1.0
*Equation
2
101, 1, 1.0, 999999, 1, -1.0
*Equation
2
102, 1, 1.0, 999999, 1, -1.0
*Equation
2
103, 1, 1.0, 999999, 1, -1.0
*Equation
2
104, 1, 1.0, 999999, 1, -1.0
*Equation
2
105, 1, 1.0, 999999, 1, -1.0
*Equation
2
106, 1, 1.0, 999999, 1, -1.0
*Equation
2
107, 1, 1.0, 999999, 1, -1.0
*Equation
2
108, 1, 1.0, 999999, 1, -1.0
*Equation
2
109, 1, 1.0, 999999, 1, -1.0
*Equation
2
1482, 1, 1.0, 999999, 1, -1.0
*Equation
2
1483, 1, 1.0, 999999, 1, -1.0
*Equation
2
1484, 1, 1.0, 999999, 1, -1.0
*Equation
2
1485, 1, 1.0, 999999, 1, -1.0
*Equation
2
1486, 1, 1.0, 999999, 1, -1.0
*Equation
2
1487, 1, 1.0, 999999, 1, -1.0
*Equation
2
1488, 1, 1.0, 999999, 1, -1.0
*Equation
2
1489, 1, 1.0, 999999, 1, -1.0
*Equation
2
1490, 1, 1.0, 999999, 1, -1.0
*Equation
2
1491, 1, 1.0, 999999, 1, -1.0
*Equation
2
1492, 1, 1.0, 999999, 1, -1.0
*Equation
2
1493, 1, 1.0, 999999, 1, -1.0
*Equation
2
1494, 1, 1.0, 999999, 1, -1.0
*Equation
2
1495, 1, 1.0, 999999, 1, -1.0
*Equation
2
1496, 1, 1.0, 999999, 1, -1.0
*Equation
2
1497, 1, 1.0, 999999, 1, -1.0
*Equation
2
1498, 1, 1.0, 999999, 1, -1.0
*Equation
2
1499, 1, 1.0, 999999, 1, -1.0
*Equation
2
1500, 1, 1.0, 999999, 1, -1.0
*Equation
2
1501, 1, 1.0, 999999, 1, -1.0
*Equation
2
1502, 1, 1.0, 999999, 1, -1.0
*Equation
2
1503, 1, 1.0, 999999, 1, -1.0
*Equation
2
1504, 1, 1.0, 999999, 1, -1.0
*Equation
2
1505, 1, 1.0, 999999, 1, -1.0
*Equation
2
1506, 1, 1.0, 999999, 1, -1.0
*Equation
2
1507, 1, 1.0, 999999, 1, -1.0
*Equation
2
1508, 1, 1.0, 999999, 1, -1.0
*Equation
2
1509, 1, 1.0, 999999, 1, -1.0
*Equation
2
1510, 1, 1.0, 999999, 1, -1.0
*Equation
2
1511, 1, 1.0, 999999, 1, -1.0
*Equation
2
1512, 1, 1.0, 999999, 1, -1.0
*Equation
2
1513, 1, 1.0, 999999, 1, -1.0
*Equation
2
1514, 1, 1.0, 999999, 1, -1.0
*Equation
2
1515, 1, 1.0, 999999, 1, -1.0
*Equation
2
1516, 1, 1.0, 999999, 1, -1.0
*Equation
2
1517, 1, 1.0, 999999, 1, -1.0
*Equation
2
1518, 1, 1.0, 999999, 1, -1.0
*Equation
2
1519, 1, 1.0, 999999, 1, -1.0
*Equation
2
1520, 1, 1.0, 999999, 1, -1.0
*Equation
2
1521, 1, 1.0, 999999, 1, -1.0
*Equation
2
1522, 1, 1.0, 999999, 1, -1.0
*Equation
2
1523, 1, 1.0, 999999, 1, -1.0
*Equation
2
1524, 1, 1.0, 999999, 1, -1.0
*Equation
2
1525, 1, 1.0, 999999, 1, -1.0
*Equation
2
1526, 1, 1.0, 999999, 1, -1.0
*Equation
2
1527, 1, 1.0, 999999, 1, -1.0
*Equation
2
1528, 1, 1.0, 999999, 1, -1.0
*Equation
2
1529, 1, 1.0, 999999, 1, -1.0
*Equation
2
1530, 1, 1.0, 999999, 1, -1.0
*Equation
2
1531, 1, 1.0, 999999, 1, -1.0
*Equation
2
1532, 1, 1.0, 999999, 1, -1.0
*Equation
2
1533, 1, 1.0, 999999, 1, -1.0
*Equation
2
1534, 1, 1.0, 999999, 1, -1.0
*Equation
2
1535, 1, 1.0, 999999, 1, -1.0
*Equation
2
1536, 1, 1.0, 999999, 1, -1.0
*Equation
2
1537, 1, 1.0, 999999, 1, -1.0
*Equation
2
1538, 1, 1.0, 999999, 1, -1.0
*Equation
2
1539, 1, 1.0, 999999, 1, -1.0
*Equation
2
1540, 1, 1.0, 999999, 1, -1.0
*Equation
2
1541, 1, 1.0, 999999, 1, -1.0
** ==========================================================
** STEP 1: Monotonic Shear Loading to u1 = 0.0100 mm (2000 incs, Dt=5e-4, Dux=5.0 nm)
** ==========================================================
*Step, name=Step-1, nlgeom=NO, inc=10000
*Static
5.0E-4, 1.0, 1.0E-12, 5.0E-4
*Controls, parameters=line search
4, 1.0, 0.0001, 0.25, 0.50
*Controls, parameters=time incrementation
8, 12, 9, 16, 10, 5, , , , , 12
0.25, 0.5, 0.75, 0.85, 0.0, 1.5, 0.0, 1.5, 1.0e-5, , 1.0
*Boundary
N_BOTTOM, 1, 2, 0.0
N_TOP, 2, 2, 0.0
N_RP, 1, 1, 0.0100
*Restart, write, frequency=0
*Output, field, time interval=0.001
*Node Output, nset=N_RP
U, RF
*Element Output, elset=All_elem, directions=YES
MISESERI, MISESAVG, S, EVOL
*Element Output, elset=umatelem
SDV
*Node Print, freq=1, nset=N_RP
U1, RF1
*End Step
** ==========================================================
** STEP 2: Monotonic Shear Loading to u1 = 0.0200 mm (2000 incs, Dt=5e-4, Dux=5.0 nm, Paper Horizon)
** ==========================================================
*Step, name=Step-2, nlgeom=NO, inc=10000
*Static
5.0E-4, 1.0, 1.0E-12, 5.0E-4
*Controls, parameters=line search
4, 1.0, 0.0001, 0.25, 0.50
*Controls, parameters=time incrementation
8, 12, 9, 16, 10, 5, , , , , 12
0.25, 0.5, 0.75, 0.85, 0.0, 1.5, 0.0, 1.5, 1.0e-5, , 1.0
*Boundary
N_RP, 1, 1, 0.0200
*Restart, write, frequency=0
*Output, field, time interval=0.001
*Node Output, nset=N_RP
U, RF
*Element Output, elset=All_elem, directions=YES
MISESERI, MISESAVG, S, EVOL
*Element Output, elset=umatelem
SDV
*Node Print, freq=1, nset=N_RP
U1, RF1
*End Step
