*Heading
** D3A2 deterministic nonmatching target mesh package.
** Generated locally; not submitted as a solver job.
*Preprint, echo=NO, model=NO, history=NO, contact=NO
*Node
1, -0.5, -0.5
2, -0.4875, -0.5
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*User Element, nodes=4, type=U1, properties=3, coordinates=2, VARIABLES=2
3
*Element, type=U1, elset=TARGET_PHASE
1, 1, 2, 83, 82
2, 2, 3, 84, 83
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*Elset, elset=TARGET_PHASE, generate
1, 6400, 1
*Uel Property, elset=TARGET_PHASE
0.015, 0.0027, 1.0
** The open split notch runs from x=-0.5 to x=0.0 on the exact y=0 line.
