*Heading
** D3D-A1H0 fixed-phase mechanical checkpoint hold.
** Corrected nodal d and unchanged actual F3 H from package_d3d_a1_checkpoint_r1.
*Preprint, echo=NO, model=NO, history=NO, contact=NO
*Node
1, -0.5, -0.5
2, -0.4875, -0.5
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*User Element, nodes=4, type=U1, properties=3, coordinates=2, VARIABLES=8
3
*Element, type=U1, elset=PHASE
1, 1, 2, 83, 82
2, 2, 3, 84, 83
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*Elset, elset=PHASE, generate
1, 6400, 1
*Uel Property, elset=PHASE
0.015, 0.0027, 1.0
*User Element, nodes=4, type=U2, properties=4, coordinates=2, VARIABLES=56
1, 2
*Element, type=U2, elset=DISP
6401, 100001, 100002, 100083, 100082
6402, 100002, 100003, 100084, 100083
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*Elset, elset=DISP, generate
6401, 12800, 1
*Uel Property, elset=DISP
210, 0.3, 1, 1e-07
*Element, type=CPS4, elset=UMATVIS
12801, 100001, 100002, 100083, 100082
12802, 100002, 100003, 100084, 100083
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*Elset, elset=UMATVIS, generate
12801, 19200, 1
*Solid Section, elset=UMATVIS, material=UMATVIS
1.0,
*Material, name=UMATVIS
*Depvar
18,
*User Material, constants=2
1.0e-11, 0.3
*Nset, nset=TOP
106521, 106522, 106523, 106524, 106525, 106526
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*Nset, nset=BOTTOM
100001, 100002, 100003, 100004, 100005, 100006
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*Nset, nset=ANCHOR
100001
*Nset, nset=ACTIVE_PHASE
1, 2, 3, 4, 5, 6
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*Nset, nset=FREE_PHASE
252, 330, 411, 412, 656, 737
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*Step, name=INGEST_D3D_A1_CANDIDATE, nlgeom=NO
*Static
1.0, 1.0
*Boundary
BOTTOM, 2, 2, 0.0
ANCHOR, 1, 1, 0.0
1, 3, 3, 0.00036864133223632098
2, 3, 3, 0.00035086221410741297
3, 3, 3, 0.00032040439540420671
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6601, 3, 3, 0.014136027452670501
*Output, field
*Element Output, elset=UMATVIS
SDV
*Node Output
U, RF
*End Step
*Step, name=D3D_A1_MECHANICAL_CHECKPOINT_EQUILIBRATION, nlgeom=NO
*Static
0.1, 1.0, 1.0e-08, 0.1
*Boundary
BOTTOM, 2, 2, 0.0
ANCHOR, 1, 1, 0.0
TOP, 2, 2, 0.0030000000260770321
1, 3, 3, 0.00036864133223632098
2, 3, 3, 0.00035086221410741297
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6601, 3, 3, 0.014136027452670501
*Output, field
*Element Output, elset=UMATVIS
SDV
*Node Output
U, RF
*End Step
