*Heading
 Adapted L-Panel mesh
** Job name: JOB_LPANEL_ADAPTED Model name: LPANEL_COARSE
** Generated by: Abaqus/CAE 2024
*Preprint, echo=NO, model=NO, history=NO, contact=NO
**
** PARTS
**
*Part, name=LPANEL
*Node
      1,           0.,           1.
      2,           0.,           0.
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*Element, type=CPE3
  1, 2483, 2531, 4265
  2, 1962, 2165, 2070
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*Element, type=CPE4
 117, 2811, 3622, 1740, 1596
 118, 3587, 3465,  764,   98
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*Nset, nset=ALL_FACES, generate
    1,  4414,     1
*Elset, elset=ALL_FACES, generate
    1,  4324,     1
** Section: PanelSec
*Solid Section, elset=ALL_FACES, material=Steel
1.,
*End Part
**
**
** ASSEMBLY
**
*Assembly, name=Assembly
**
*Instance, name=LPANEL-1, part=LPANEL
*End Instance
**
*Nset, nset=BOTTOM, instance=LPANEL-1
   2,   3,  31,  32,  33,  34
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*Elset, elset=BOTTOM, instance=LPANEL-1
  122,  149,  161,  164,  167,  171
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*Nset, nset=TOP, instance=LPANEL-1
   1,   6,  91,  92,  93,  94
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*Elset, elset=TOP, instance=LPANEL-1
  118,  125,  238,  252,  253,  258
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*End Assembly
**
** MATERIALS
**
*Material, name=Steel
*Elastic
210000., 0.3
** ----------------------------------------------------------------
**
** STEP: Step-1
**
*Step, name=Step-1, nlgeom=NO
*Static
1., 1., 1e-05, 1.
**
** BOUNDARY CONDITIONS
**
** Name: FIX_BOTTOM Type: Displacement/Rotation
*Boundary
BOTTOM, 1, 1
BOTTOM, 2, 2
** Name: PULL_TOP Type: Displacement/Rotation
*Boundary
TOP, 1, 1
TOP, 2, 2, 0.001
**
** OUTPUT REQUESTS
**
*Restart, write, frequency=0
**
** FIELD OUTPUT: F-Output-1
**
*Output, field
*Node Output, nset=LPANEL-1.ALL_FACES
RF, U
*Element Output, elset=LPANEL-1.ALL_FACES, directions=YES
EVOL, MISESAVG, MISESERI, S
**
** FIELD OUTPUT:  from REMESHING RULE: RR_LPANEL_ADAPTIVE
** L-Panel Adaptive Remeshing Rule
**
*Element Output, elset=LPANEL-1.ALL_FACES, directions=YES
MISESERI, MISESAVG, S, EVOL
**
** HISTORY OUTPUT: H-Output-1
**
*Output, history, variable=PRESELECT
*End Step
