*Heading
** Job name: F12_MISESERI_COARSE_INPUT Model name: F12_MISESERI_COARSE
** Generated by: Abaqus/CAE 2023
*Preprint, echo=NO, model=NO, history=NO, contact=NO
**
** PARTS
**
*Part, name=PART-1
*Node
      1,          0.5,           0.
      2,           0.,           0.
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*Element, type=CPE4
   1,   10,  397,  450,    9
   2,  350,   14,   15,  393
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*Elset, elset=ALL_ELEM, generate
    1,  3930,     1
*Nset, nset=BOTTOM
   4,   5, 134, 135, 136, 137
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*Nset, nset=TOP
   6,   7, 186, 187, 188, 189
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*Nset, nset=NOTCH_LOWER_FACE
   3, 109, 110, 111, 112, 113, 114, 115, 116, 117, 118, 119, 120, 121, 122
*Nset, nset=NOTCH_UPPER_FACE
   8, 221, 222, 223, 224, 225, 226, 227, 228, 229, 230, 231, 232, 233, 234
*Nset, nset=NOTCH_TIP
 2,
** Section: Section-1-ALL_ELEM
*Solid Section, elset=ALL_ELEM, material=ELASTIC_MATRIX
1.,
*End Part
**
**
** ASSEMBLY
**
*Assembly, name=Assembly
**
*Instance, name=PART-1-1, part=PART-1
*End Instance
**
*Node
   3999,           0.,          0.5
*Elset, elset=ALL_ELEM, instance=PART-1-1, generate
    1,  3930,     1
*Nset, nset=BOTTOM, instance=PART-1-1
   4,   5, 134, 135, 136, 137
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*Nset, nset=RP
 3999,
*Nset, nset=TOP, instance=PART-1-1
   6,   7, 186, 187, 188, 189
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** Constraint: Eqn-1
*Equation
2
TOP, 1, 1.
RP, 1, -1.
*End Assembly
**
** MATERIALS
**
*Material, name=ELASTIC_MATRIX
*Elastic
210., 0.3
** ----------------------------------------------------------------
**
** STEP: Step-1
**
*Step, name=Step-1, nlgeom=NO
Elastic MISESERI Pre-Analysis Stage
*Static
0.1, 1., 1e-05, 0.1
**
** BOUNDARY CONDITIONS
**
** Name: Disp-BC-1 Type: Displacement/Rotation
*Boundary
BOTTOM, 1, 1
BOTTOM, 2, 2
** Name: Disp-BC-2 Type: Displacement/Rotation
*Boundary
TOP, 2, 2
** Name: Disp-BC-3 Type: Displacement/Rotation
*Boundary
RP, 1, 1, 0.001
**
** OUTPUT REQUESTS
**
*Restart, write, frequency=0
**
** FIELD OUTPUT: F-Output-1
**
*Output, field
*Node Output
RF, U
**
** FIELD OUTPUT: F-Output-2
**
*Element Output, elset=ALL_ELEM, directions=YES
E, EVOL, MISESAVG, MISESERI, S
**
** FIELD OUTPUT:  from REMESHING RULE: F12_MISESERI_RULE
**
*Output, field, frequency=99999
*Element Output, directions=YES
MISESERI, MISESAVG, S, EVOL
*Output, history, frequency=0
*End Step
