*HEADING
Minimal Abaqus 2023 Semantics Test for *EQUATION with NSET and Single RP
*NODE
1, 0.0, 0.0
2, 1.0, 0.0
3, 2.0, 0.0
4, 0.0, 1.0
5, 1.0, 1.0
6, 2.0, 1.0
999, 1.0, 2.0
*NSET, NSET=N_TEST
4, 5, 6
*NSET, NSET=N_BASE
1, 2, 3
*ELEMENT, TYPE=CPS4, ELSET=E_TEST
1, 1, 2, 5, 4
2, 2, 3, 6, 5
*SOLID SECTION, ELSET=E_TEST, MATERIAL=MAT_STEEL
*MATERIAL, NAME=MAT_STEEL
*ELASTIC
210000., 0.3
*EQUATION
2
N_TEST, 1, 1.0, 999, 1, -1.0
*STEP, NAME=Step-1
*STATIC
1.0, 1.0
*BOUNDARY
N_BASE, 1, 2, 0.0
999, 1, 1, 0.1
*OUTPUT, FIELD
*NODE OUTPUT
U, RF
*END STEP
