*HEADING
Standalone Test for f42_mixed_uel.for on 2 Elements (1 Quad, 1 Tri)
*USER ELEMENT, TYPE=U1, NODES=4, COORDINATES=2, PROPERTIES=5, VARIABLES=18, UNSYMM
3
*USER ELEMENT, TYPE=U2, NODES=4, COORDINATES=2, PROPERTIES=5, VARIABLES=18, UNSYMM
1, 2
*USER ELEMENT, TYPE=U3, NODES=3, COORDINATES=2, PROPERTIES=5, VARIABLES=18, UNSYMM
3
*USER ELEMENT, TYPE=U4, NODES=3, COORDINATES=2, PROPERTIES=5, VARIABLES=18, UNSYMM
1, 2
*NODE
1, 0.0, 0.0
2, 1.0, 0.0
3, 1.0, 1.0
4, 0.0, 1.0
5, 2.0, 0.0
99999, 1.0, 2.0
*NSET, NSET=N_BOTTOM
1, 2, 5
*NSET, NSET=N_TOP
3, 4
*NSET, NSET=N_PHYSICAL, GENERATE
1, 5, 1
*ELEMENT, TYPE=U1, ELSET=E_U1
1, 1, 2, 3, 4
*ELEMENT, TYPE=U3, ELSET=E_U3
2, 2, 5, 3
*ELEMENT, TYPE=U2, ELSET=E_U2
3, 1, 2, 3, 4
*ELEMENT, TYPE=U4, ELSET=E_U4
4, 2, 5, 3
*ELEMENT, TYPE=CPE4, ELSET=E_CPE4
5, 1, 2, 3, 4
*ELEMENT, TYPE=CPE3, ELSET=E_CPE3
6, 2, 5, 3
*SOLID SECTION, ELSET=E_CPE4, MATERIAL=MAT_PASSIVE
*SOLID SECTION, ELSET=E_CPE3, MATERIAL=MAT_PASSIVE
*MATERIAL, NAME=MAT_PASSIVE
*ELASTIC
1.0e-9, 0.3
*DEPVAR
18
*UEL PROPERTY, ELSET=E_U1
0.010, 0.0010, 210.0, 0.30, 1.0e-7
*UEL PROPERTY, ELSET=E_U2
0.010, 0.0010, 210.0, 0.30, 1.0e-7
*UEL PROPERTY, ELSET=E_U3
0.010, 0.0010, 210.0, 0.30, 1.0e-7
*UEL PROPERTY, ELSET=E_U4
0.010, 0.0010, 210.0, 0.30, 1.0e-7
*EQUATION
2
N_TOP, 1, 1.0, 99999, 1, -1.0
*INITIAL CONDITIONS, TYPE=SOLUTION
1, 0.0, 0.0, 0.0, 0.0, 0.0, 0.0, 0.0
0.0, 0.0, 0.0, 0.0, 0.0, 0.0, 0.0, 0.0
0.0, 0.0, 0.0
2, 0.0, 0.0, 0.0, 0.0, 0.0, 0.0, 0.0
0.0, 0.0, 0.0, 0.0, 0.0, 0.0, 0.0, 0.0
0.0, 0.0, 0.0
3, 0.0, 0.0, 0.0, 0.0, 0.0, 0.0, 0.0
0.0, 0.0, 0.0, 0.0, 0.0, 0.0, 0.0, 0.0
0.0, 0.0, 0.0
4, 0.0, 0.0, 0.0, 0.0, 0.0, 0.0, 0.0
0.0, 0.0, 0.0, 0.0, 0.0, 0.0, 0.0, 0.0
0.0, 0.0, 0.0
*STEP, NAME=Step-1-PhaseInit
*STATIC
1.0, 1.0
*BOUNDARY
N_BOTTOM, 1, 2, 0.0
99999, 1, 1, 0.007585
99999, 2, 2, 0.0
1, 3, 3, 0.0
2, 3, 3, 0.0
3, 3, 3, 0.0
4, 3, 3, 0.0
5, 3, 3, 0.0
*OUTPUT, FIELD
*NODE OUTPUT, NSET=N_PHYSICAL
U, RF
*END STEP
